// SBML level 2 version 4

model Immune_Oncology_Model()
  // Immune Oncology Model

  // Compartments:
  // Central compartment (C) volume
  compartment V_C = 5 MWBUILTINUNIT_liter;
  // Peripheral compartment (P) volume
  compartment V_P = 60 MWBUILTINUNIT_liter;
  // Tumor compartment (T) volume
  compartment V_T; V_T has MWBUILTINPREFIX_milli_MWBUILTINUNIT_liter;
  // Lymph node (LN) compartment volume
  compartment V_LN = 1112.647 MWDERIVEDUNIT_millimeter___3;
  // APC endosomal compartment
  compartment V_e = 4e-16 litre;
  // APC endosomal surface compartment
  compartment A_e = 15 MWDERIVEDUNIT_micrometer___2;  // 2-D
  // APC surface compartment
  compartment A_s = 900 MWDERIVEDUNIT_micrometer___2;  // 2-D
  // synapse compartment between CD8 and C1
  compartment syn_CD8_C1 = 37.8 MWDERIVEDUNIT_micrometer___2;  // 2-D
  // synapse compartment between CD8 and APC
  compartment syn_CD8_APC = 37.8 MWDERIVEDUNIT_micrometer___2;  // 2-D
  // Central compartment (V1) for nab-paclitaxel PK
  compartment V_1 = 15.8 MWBUILTINUNIT_liter;
  // Peripheral compartment (V2) for nab-paclitaxel PK
  compartment V_2 = 1650 MWBUILTINUNIT_liter;
  // Peripheral compartment (V3) for nab-paclitaxel PK
  compartment V_3 = 75.4 MWBUILTINUNIT_liter;
  // Central PK compartment for gem
  compartment C_gem = 15 MWBUILTINUNIT_liter;
  // Peripheral PK compartment 1 for gem
  compartment P1_gem = 15 MWBUILTINUNIT_liter;
  // Central PK compartment for fu5
  compartment C_fu5 = 30 MWBUILTINUNIT_liter;
  // Central PK compartment for oxa
  compartment C_oxa = 30 MWBUILTINUNIT_liter;
  // Peripheral PK compartment 1 for oxa
  compartment P1_oxa = 435 MWBUILTINUNIT_liter;
  // Peripheral PK compartment 2 for oxa
  compartment P2_oxa = 1183 MWBUILTINUNIT_liter;
  // Central PK compartment for iri
  compartment C_iri = 40 MWBUILTINUNIT_liter;
  // Peripheral PK compartment 1 for iri
  compartment P1_iri = 220 MWBUILTINUNIT_liter;
  // Central PK compartment for metabolite sn38
  compartment C_sn38 = 2880 MWBUILTINUNIT_liter;
  // synapse compartment between macrophage and cancer cell
  compartment syn_M_C = 37.8 MWDERIVEDUNIT_micrometer___2;  // 2-D
  // Intradermal injection site compartment
  compartment V_ID = 0.0001 MWBUILTINUNIT_liter;

  // Species:
  // Number of naive Treg cells in the central compartment
  substanceOnly species nCD4_V_C in V_C = 3706.897;  // substance in MWUSERUNIT_cell
  substanceOnly species Treg_V_C in V_C = 0;  // substance in MWUSERUNIT_cell
  // Number of naive CD8 cells in the central compartment
  substanceOnly species nCD8_V_C in V_C = 2274.775;  // substance in MWUSERUNIT_cell
  // Number of CD8 cells in the central compartment
  substanceOnly species CD8_V_C in V_C = 0;  // substance in MWUSERUNIT_cell
  // Concentration of aPD1 in central compartment
  species aPD1_V_C in V_C = 0;  // substance in MWDERIVEDUNIT_nanomolarity_liter
  // Concentration of aPDL1 in central compartment
  species aPDL1_V_C in V_C = 0;  // substance in MWDERIVEDUNIT_nanomolarity_liter
  // Concentration of aCTLA4 in central compartment
  species aCTLA4_V_C in V_C = 0;  // substance in MWDERIVEDUNIT_nanomolarity_liter
  // Number of Th cells in the central compartment
  substanceOnly species Th_V_C in V_C = 0;  // substance in MWUSERUNIT_cell
  // Number of Tfh cells in the central compartment
  substanceOnly species Tfh_V_C in V_C = 0;  // substance in MWUSERUNIT_cell
  // Number of naive B cells in the central compartment
  substanceOnly species nB_V_C in V_C = 100000000;  // substance in MWUSERUNIT_cell
  // Number of B cells in the central compartment
  substanceOnly species B_V_C in V_C = 0;  // substance in MWUSERUNIT_cell
  // Cyclophosphamide for Treg depletion (low-dose immunomodulatory)
  substanceOnly species Cy in V_C = 0;  // substance in MWBUILTINPREFIX_milli_MWBUILTINUNIT_gram
  // Serum CA19-9 tumor-burden biomarker (nominal units; calibrated to U/mL).
  species CA199 in V_C = 0;  // substance in MWDERIVEDUNIT_picogram__milliliter_liter
  // Number of naive Treg cells in the peripheral compartment
  substanceOnly species nCD4_V_P in V_P = 185344.8;  // substance in MWUSERUNIT_cell
  substanceOnly species Treg_V_P in V_P = 0;  // substance in MWUSERUNIT_cell
  // Number of naive CD8 cells in the peripheral compartment
  substanceOnly species nCD8_V_P in V_P = 113738.7;  // substance in MWUSERUNIT_cell
  // Number of CD8 cells in the peripheral compartment
  substanceOnly species CD8_V_P in V_P = 0;  // substance in MWUSERUNIT_cell
  // Concentration of aPD1 in peripheral compartment
  species aPD1_V_P in V_P = 0;  // substance in MWDERIVEDUNIT_nanomolarity_liter
  // Concentration of aPDL1 in peripheral compartment
  species aPDL1_V_P in V_P = 0;  // substance in MWDERIVEDUNIT_nanomolarity_liter
  // Concentration of aCTLA4 in peripheral compartment
  species aCTLA4_V_P in V_P = 0;  // substance in MWDERIVEDUNIT_nanomolarity_liter
  // Number of Th cells in the peripheral compartment
  substanceOnly species Th_V_P in V_P = 0;  // substance in MWUSERUNIT_cell
  // Number of Tfh cells in the peripheral compartment
  substanceOnly species Tfh_V_P in V_P = 0;  // substance in MWUSERUNIT_cell
  // Number of B cells in the peripheral compartment
  substanceOnly species B_V_P in V_P = 0;  // substance in MWUSERUNIT_cell
  // Dead cancer cells in the tumour compartment
  substanceOnly species C_x in V_T = 0;  // substance in MWUSERUNIT_cell
  // Accumulated chemotherapy-induced cell damage in the tumour, a SLOW state standing in for therapy-induced senescence (a dedicated senescent cancer compartment is the intended successor). Dimensionless once divided by `cell`. It exists because CA19-9 secretion suppression was driven by E_chemo, which is spiky - near 1 for hours after each bolus and ~0 between doses - so its time-average barely moves across the prior and k_sec_suppress measured dead (rho 0.014). Damage integrates that exposure, giving the suppression a duty cycle long enough to survive averaging. Biological warrant: therapy-induced senescence is well documented for gemcitabine and taxanes, and CA19-9 is sialyl-Lewis-a, a differentiation antigen, so damaged/dedifferentiated cells shedding less is the expected direction.
  substanceOnly species C_dmg in V_T = 0;  // substance in MWUSERUNIT_cell
  // Exhausted CD8 effector T cells
  substanceOnly species CD8_exh in V_T = 0;  // substance in MWUSERUNIT_cell
  // Exhausted CD4 effector T cells
  substanceOnly species Th_exh in V_T = 0;  // substance in MWUSERUNIT_cell
  // Number of cancer cells in tumor
  substanceOnly species C1 in V_T = 1;  // substance in MWUSERUNIT_cell
  // Tumor carrying capacity (vasculature-dependent)
  substanceOnly species K in V_T = 10300;  // substance in MWUSERUNIT_cell
  // VEGF concentration in tumor
  species VEGF in V_T = 0;  // substance in MWDERIVEDUNIT_picogram__milliliter_milliliter
  // Number of cancer cells in tumor
  substanceOnly species C2 in V_T = 0;  // substance in MWUSERUNIT_cell
  // Number of Treg cells in the tumor compartment
  substanceOnly species Treg_V_T in V_T = 0;  // substance in MWUSERUNIT_cell
  // Concentration of CCL5 (RANTES) in the tumor compartment
  species CCL5 in V_T = 0;  // substance in MWDERIVEDUNIT_nanomolarity_milliliter
  // Number of CD8 cells in the tumor compartment
  substanceOnly species CD8_V_T in V_T = 0;  // substance in MWUSERUNIT_cell
  // Immature cDC1 (CD11c+CD141+BATF3+CD83-, cross-presenting) in tumor
  substanceOnly species cDC1_V_T in V_T = 0;  // substance in MWUSERUNIT_cell
  // Immature cDC2 (CD11c+CD1c+IRF4+CD83-, MHC-II presenting) in tumor
  substanceOnly species cDC2_V_T in V_T = 0;  // substance in MWUSERUNIT_cell
  // Mature cDC1 (CD83+CD80+CD86+CD141+BATF3+, cross-presenting) in tumor
  substanceOnly species mcDC1_V_T in V_T = 0;  // substance in MWUSERUNIT_cell
  // Mature cDC2 (CD83+CD80+CD86+CD1c+IRF4+, MHC-II presenting) in tumor
  substanceOnly species mcDC2_V_T in V_T = 0;  // substance in MWUSERUNIT_cell
  // Concentration of free antigen (P0) in the LN compartment
  species P0_V_T in V_T = 1e-18;  // substance in MWDERIVEDUNIT_molarity_milliliter
  // Concentration of free antigen (P1) in the LN compartment
  species P1_V_T in V_T = 1e-18;  // substance in MWDERIVEDUNIT_molarity_milliliter
  // Concentration of aPD1 in tumour compartment
  species aPD1_V_T in V_T = 0;  // substance in MWDERIVEDUNIT_nanomolarity_milliliter
  // Concentration of aPDL1 in tumour compartment
  species aPDL1_V_T in V_T = 0;  // substance in MWDERIVEDUNIT_nanomolarity_milliliter
  // Concentration of aCTLA4 in tumour compartment
  species aCTLA4_V_T in V_T = 0;  // substance in MWDERIVEDUNIT_nanomolarity_milliliter
  // Number of Th cells in the tumor compartment
  substanceOnly species Th_V_T in V_T = 0;  // substance in MWUSERUNIT_cell
  // IFNg in the tumor compartment
  species IFNg in V_T = 0;  // substance in MWDERIVEDUNIT_nanomolarity_milliliter
  // TGFb in the tumor compartment
  species TGFb in V_T = 0;  // substance in MWDERIVEDUNIT_nanomolarity_milliliter
  // Number of Tfh cells in the tumor compartment
  substanceOnly species Tfh_V_T in V_T = 0;  // substance in MWUSERUNIT_cell
  // Number of B cells in the tumor compartment
  substanceOnly species B_V_T in V_T = 0;  // substance in MWUSERUNIT_cell
  // Number of plasma cells in the tumor compartment
  substanceOnly species Plasma in V_T = 0;  // substance in MWUSERUNIT_cell
  // Number of MDSCs in the tumour compartment
  substanceOnly species MDSC in V_T = 0;  // substance in MWUSERUNIT_cell
  // Concentration of NO in the tumor compartment
  species NO in V_T = 0;  // substance in MWDERIVEDUNIT_nanomolarity_milliliter
  // Concentration of Arg I in the tumor compartment
  species ArgI in V_T = 0;  // substance in MWDERIVEDUNIT_nanomolarity_milliliter
  // Concentration of CCL2 in the tumor compartment
  species CCL2 in V_T = 0;  // substance in MWDERIVEDUNIT_nanomolarity_milliliter
  // Number of M1 macrophage in the tumor compartment
  substanceOnly species Mac_M1 in V_T = 0;  // substance in MWUSERUNIT_cell
  // Number of M2 macrophage in the tumor compartment
  substanceOnly species Mac_M2 in V_T = 0;  // substance in MWUSERUNIT_cell
  // Concentration of IL-12 in tumor
  species IL12 in V_T = 0;  // substance in MWDERIVEDUNIT_nanomolarity_milliliter
  // Concentration of IL-10 in tumor
  species IL10 in V_T = 0;  // substance in MWDERIVEDUNIT_nanomolarity_milliliter
  // Quiescent pancreatic stellate cells in tumor compartment. In normal pancreas, PSCs store vitamin A and maintain stromal homeostasis.
  substanceOnly species qPSC in V_T = 0;  // substance in MWUSERUNIT_cell
  // Inflammatory cancer-associated fibroblasts. Secrete IL-6 and CCL5, driving MDSC recruitment and M2 polarization. Driven by tumor-derived IL-1alpha; TGFb antagonizes via IL-1R1 repression.
  substanceOnly species iCAF in V_T = 0;  // substance in MWUSERUNIT_cell
  // Myofibroblastic cancer-associated fibroblasts. Secrete ECM, CXCL12, TGFb, VEGF. Build desmoplastic barrier. Favored by TGFb signaling (Biffi 2019).
  substanceOnly species myCAF in V_T = 0;  // substance in MWUSERUNIT_cell
  // Antigen-presenting cancer-associated fibroblasts. Express MHC-II, present tumor antigen tolerogenically -> Treg induction. Rarest subtype ~2-5% of CAFs (Elyada 2019).
  substanceOnly species apCAF in V_T = 0;  // substance in MWUSERUNIT_cell
  // Fibrillar collagen (types I/III) in tumor (total mass in mg). Primary structural ECM component driving desmoplasia. Determines pore size (immune exclusion) and stiffness (mechanotransduction).
  substanceOnly species collagen in V_T = 0;  // substance in MWBUILTINPREFIX_milli_MWBUILTINUNIT_gram
  // CXCL12/SDF-1 chemokine secreted by iCAFs. Major T cell exclusion mechanism in PDAC via CXCR4 signaling (Elyada 2019, Ogawa 2021).
  species CXCL12 in V_T = 0;  // substance in MWDERIVEDUNIT_nanomolarity_milliliter
  // Interleukin-6 inflammatory cytokine secreted by iCAFs. Promotes MDSC recruitment, M2 polarization, tumor progression.
  species IL6 in V_T = 0;  // substance in MWDERIVEDUNIT_nanomolarity_milliliter
  // Interleukin-1alpha in tumor compartment. Tumor-derived; drives iCAF formation via NF-kB/LIF/JAK-STAT3. TGFb antagonizes signaling by downregulating IL-1R1.
  species IL1 in V_T = 0;  // substance in MWDERIVEDUNIT_nanomolarity_milliliter
  // Number of naive Treg cells in the lymph node
  substanceOnly species nCD4_V_LN in V_LN = 155.6897;  // substance in MWUSERUNIT_cell
  // Number of activated Treg cells in the lymph node
  substanceOnly species aTreg in V_LN = 0;  // substance in MWUSERUNIT_cell
  // Number of Treg cells in the lymph node compartment
  substanceOnly species Treg_V_LN in V_LN = 0;  // substance in MWUSERUNIT_cell
  // Number of naive CD8 cells in the lymph node
  substanceOnly species nCD8_V_LN in V_LN = 113.7387;  // substance in MWUSERUNIT_cell
  // Number of activated CD8 cells in the lymph node
  substanceOnly species aCD8 in V_LN = 0;  // substance in MWUSERUNIT_cell
  // Number of CD8 cells in the lymph node compartment
  substanceOnly species CD8_V_LN in V_LN = 0;  // substance in MWUSERUNIT_cell
  // Immature cDC1 (CD11c+CD141+BATF3+CD83-) in lymph node
  substanceOnly species cDC1_V_LN in V_LN = 0;  // substance in MWUSERUNIT_cell
  // Immature cDC2 (CD11c+CD1c+IRF4+CD83-) in lymph node
  substanceOnly species cDC2_V_LN in V_LN = 0;  // substance in MWUSERUNIT_cell
  // Mature cDC1 (CD83+CD80+CD86+CD141+BATF3+CCR7+) in lymph node
  substanceOnly species mcDC1_V_LN in V_LN = 0;  // substance in MWUSERUNIT_cell
  // Mature cDC2 (CD83+CD80+CD86+CD1c+IRF4+CCR7+) in lymph node
  substanceOnly species mcDC2_V_LN in V_LN = 0;  // substance in MWUSERUNIT_cell
  // Concentration of aPD1 in lymph node compartment
  species aPD1_V_LN in V_LN = 0;  // substance in MWDERIVEDUNIT_nanomolarity_millimeter___3
  // Concentration of aPDL1 in lymph node compartment
  species aPDL1_V_LN in V_LN = 0;  // substance in MWDERIVEDUNIT_nanomolarity_millimeter___3
  // Concentration of aCTLA4 in lymph node compartment
  species aCTLA4_V_LN in V_LN = 0;  // substance in MWDERIVEDUNIT_nanomolarity_millimeter___3
  // Number of activated Th cells in the lymph node
  substanceOnly species aTh in V_LN = 0;  // substance in MWUSERUNIT_cell
  // Number of Th cells in the lymph node compartment
  substanceOnly species Th_V_LN in V_LN = 0;  // substance in MWUSERUNIT_cell
  // Concentration of IL2 in the lymph node compartment
  species IL2 in V_LN = 0.00019;  // substance in MWDERIVEDUNIT_nanomolarity_millimeter___3
  // Number of activated Tfh cells in the lymph node
  substanceOnly species aTfh in V_LN = 0;  // substance in MWUSERUNIT_cell
  // Number of Tfh cells in the lymph node compartment
  substanceOnly species Tfh_V_LN in V_LN = 0;  // substance in MWUSERUNIT_cell
  // Number of naive B cells in the lymph node
  substanceOnly species nB_V_LN in V_LN = 10000000;  // substance in MWUSERUNIT_cell
  // Number of activated B cells in the lymph node
  substanceOnly species aB in V_LN = 0;  // substance in MWUSERUNIT_cell
  // Number of B cells in the lymph node compartment
  substanceOnly species B_V_LN in V_LN = 0;  // substance in MWUSERUNIT_cell
  // Concentration of antigen P0 in the APC endosomes
  species P0_V_e in V_e = 1e-18;  // substance in MWDERIVEDUNIT_molarity_litre
  // Concentration of epitope P0 in the APC endosomes
  species p0 in V_e = 1e-18;  // substance in MWDERIVEDUNIT_molarity_litre
  // Concentration of antigen P1 in the APC endosomes
  species P1_V_e in V_e = 1e-18;  // substance in MWDERIVEDUNIT_molarity_litre
  // Concentration of epitope P1 in the APC endosomes
  species p1 in V_e = 1e-18;  // substance in MWDERIVEDUNIT_molarity_litre
  // Amount of MHC per area on the endosomal surface
  species M1_A_e in A_e = 2185.792;  // substance in MWDERIVEDUNIT_molecule__micrometer___2_micrometer___2
  // Antigen-MHC complex
  species M1p0_A_e in A_e = 1e-6;  // substance in MWDERIVEDUNIT_molecule__micrometer___2_micrometer___2
  // Antigen-MHC complex
  species M1p1_A_e in A_e = 1e-6;  // substance in MWDERIVEDUNIT_molecule__micrometer___2_micrometer___2
  // Amount of MHC per area on the cell surface
  species M1_A_s in A_s = 1e-6;  // substance in MWDERIVEDUNIT_molecule__micrometer___2_micrometer___2
  // Antigen-MHC complex
  species M1p0_A_s in A_s = 1e-6;  // substance in MWDERIVEDUNIT_molecule__micrometer___2_micrometer___2
  // Antigen-MHC complex
  species M1p1_A_s in A_s = 1e-6;  // substance in MWDERIVEDUNIT_molecule__micrometer___2_micrometer___2
  // concentration of PD1-PDL1 complex
  species PD1_PDL1_syn_CD8_C1 in syn_CD8_C1 = 0;  // substance in MWDERIVEDUNIT_molecule__micrometer___2_micrometer___2
  // concentration of PD1-PDL2 complex
  species PD1_PDL2_syn_CD8_C1 in syn_CD8_C1 = 0;  // substance in MWDERIVEDUNIT_molecule__micrometer___2_micrometer___2
  // concentration of PD1 in synapse
  species PD1_syn_CD8_C1 in syn_CD8_C1 = CD8_PD1_total/A_Tcell;  // substance in MWDERIVEDUNIT_molecule__micrometer___2_micrometer___2
  // concentration of PDL1 in synapse
  species PDL1_syn_CD8_C1 in syn_CD8_C1 = C1_PDL1_base/A_cell;  // substance in MWDERIVEDUNIT_molecule__micrometer___2_micrometer___2
  // concentration of PDL2 in synapse
  species PDL2_syn_CD8_C1 in syn_CD8_C1 = C1_PDL1_base*r_PDL2C1/A_cell;  // substance in MWDERIVEDUNIT_molecule__micrometer___2_micrometer___2
  // concentration of PD1-aPD1 complex
  species PD1_aPD1_syn_CD8_C1 in syn_CD8_C1 = 0;  // substance in MWDERIVEDUNIT_molecule__micrometer___2_micrometer___2
  // concentration of PD1-aPD1-PD1 complex
  species PD1_aPD1_PD1_syn_CD8_C1 in syn_CD8_C1 = 0;  // substance in MWDERIVEDUNIT_molecule__micrometer___2_micrometer___2
  // concentration of PDL1-aPDL1 complex
  species PDL1_aPDL1_syn_CD8_C1 in syn_CD8_C1 = 0;  // substance in MWDERIVEDUNIT_molecule__micrometer___2_micrometer___2
  // concentration of PDL1-aPDL1-PDL1 complex
  species PDL1_aPDL1_PDL1_syn_CD8_C1 in syn_CD8_C1 = 0;  // substance in MWDERIVEDUNIT_molecule__micrometer___2_micrometer___2
  // concentration of PDL1 in synapse of T cell
  species TPDL1_syn_CD8_C1 in syn_CD8_C1 = CD8_PDL1_total/A_Tcell;  // substance in MWDERIVEDUNIT_molecule__micrometer___2_micrometer___2
  // concentration of TPDL1-aPDL1 complex
  species TPDL1_aPDL1_syn_CD8_C1 in syn_CD8_C1 = 0;  // substance in MWDERIVEDUNIT_molecule__micrometer___2_micrometer___2
  // concentration of TPDL1-aPDL1-TPDL1 complex
  species TPDL1_aPDL1_TPDL1_syn_CD8_C1 in syn_CD8_C1 = 0;  // substance in MWDERIVEDUNIT_molecule__micrometer___2_micrometer___2
  // concentration of CD28-CD80 complex
  species CD28_CD80_syn_CD8_C1 in syn_CD8_C1 = 0;  // substance in MWDERIVEDUNIT_molecule__micrometer___2_micrometer___2
  // concentration of CD28-CD80-CD28 complex
  species CD28_CD80_CD28_syn_CD8_C1 in syn_CD8_C1 = 0;  // substance in MWDERIVEDUNIT_molecule__micrometer___2_micrometer___2
  // concentration of CD28-CD86 complex
  species CD28_CD86_syn_CD8_C1 in syn_CD8_C1 = 0;  // substance in MWDERIVEDUNIT_molecule__micrometer___2_micrometer___2
  // concentration of CD80-CTLA4 complex
  species CD80_CTLA4_syn_CD8_C1 in syn_CD8_C1 = 0;  // substance in MWDERIVEDUNIT_molecule__micrometer___2_micrometer___2
  // concentration of CD80-CTLA4-CD80 complex
  species CD80_CTLA4_CD80_syn_CD8_C1 in syn_CD8_C1 = 0;  // substance in MWDERIVEDUNIT_molecule__micrometer___2_micrometer___2
  // concentration of CTLA4-CD80-CTLA4 complex
  species CTLA4_CD80_CTLA4_syn_CD8_C1 in syn_CD8_C1 = 0;  // substance in MWDERIVEDUNIT_molecule__micrometer___2_micrometer___2
  // concentration of CD80-CTLA4-CD80-CTLA4 complex
  species CD80_CTLA4_CD80_CTLA4_syn_CD8_C1 in syn_CD8_C1 = 0;  // substance in MWDERIVEDUNIT_molecule__micrometer___2_micrometer___2
  // concentration of CD86-CTLA4 complex
  species CD86_CTLA4_syn_CD8_C1 in syn_CD8_C1 = 0;  // substance in MWDERIVEDUNIT_molecule__micrometer___2_micrometer___2
  // concentration of CD86-CTLA4-CD86 complex
  species CD86_CTLA4_CD86_syn_CD8_C1 in syn_CD8_C1 = 0;  // substance in MWDERIVEDUNIT_molecule__micrometer___2_micrometer___2
  // concentration of PDL1-CD80 complex
  species PDL1_CD80_syn_CD8_C1 in syn_CD8_C1 = 0;  // substance in MWDERIVEDUNIT_molecule__micrometer___2_micrometer___2
  // concentration of PDL1-CD80-CD28 complex
  species PDL1_CD80_CD28_syn_CD8_C1 in syn_CD8_C1 = 0;  // substance in MWDERIVEDUNIT_molecule__micrometer___2_micrometer___2
  // concentration of PDL1-CD80-CTLA4 complex
  species PDL1_CD80_CTLA4_syn_CD8_C1 in syn_CD8_C1 = 0;  // substance in MWDERIVEDUNIT_molecule__micrometer___2_micrometer___2
  // concentration of CD28 in synapse
  species CD28_syn_CD8_C1 in syn_CD8_C1 = CD8_CD28_total/A_Tcell;  // substance in MWDERIVEDUNIT_molecule__micrometer___2_micrometer___2
  // concentration of CTLA4 in synapse
  species CTLA4_syn_CD8_C1 in syn_CD8_C1 = CD8_CTLA4_syn/A_Tcell;  // substance in MWDERIVEDUNIT_molecule__micrometer___2_micrometer___2
  // concentration of CD80 dimer in synapse
  species CD80_syn_CD8_C1 in syn_CD8_C1 = C1_CD80_total/A_cell;  // substance in MWDERIVEDUNIT_molecule__micrometer___2_micrometer___2
  // concentration of CD80 monomer in synapse
  species CD80m_syn_CD8_C1 in syn_CD8_C1 = 0;  // substance in MWDERIVEDUNIT_molecule__micrometer___2_micrometer___2
  // concentration of CD86 in synapse
  species CD86_syn_CD8_C1 in syn_CD8_C1 = C1_CD86_total/A_cell;  // substance in MWDERIVEDUNIT_molecule__micrometer___2_micrometer___2
  // concentration of CTLA4-aCTLA4 complex
  species CTLA4_aCTLA4_syn_CD8_C1 in syn_CD8_C1 = 0;  // substance in MWDERIVEDUNIT_molecule__micrometer___2_micrometer___2
  // concentration of CTLA4-aCTLA4-CTLA4 complex
  species CTLA4_aCTLA4_CTLA4_syn_CD8_C1 in syn_CD8_C1 = 0;  // substance in MWDERIVEDUNIT_molecule__micrometer___2_micrometer___2
  // concentration of PD1-PDL1 complex
  species PD1_PDL1_syn_CD8_APC in syn_CD8_APC = 0;  // substance in MWDERIVEDUNIT_molecule__micrometer___2_micrometer___2
  // concentration of PD1-PDL2 complex
  species PD1_PDL2_syn_CD8_APC in syn_CD8_APC = 0;  // substance in MWDERIVEDUNIT_molecule__micrometer___2_micrometer___2
  // concentration of PD1 in synapse
  species PD1_syn_CD8_APC in syn_CD8_APC = CD8_PD1_total/A_Tcell;  // substance in MWDERIVEDUNIT_molecule__micrometer___2_micrometer___2
  // concentration of PDL1 in synapse
  species PDL1_syn_CD8_APC in syn_CD8_APC = APC_PDL1_base/A_APC;  // substance in MWDERIVEDUNIT_molecule__micrometer___2_micrometer___2
  // concentration of PDL2 in synapse
  species PDL2_syn_CD8_APC in syn_CD8_APC = APC_PDL1_base*r_PDL2APC/A_APC;  // substance in MWDERIVEDUNIT_molecule__micrometer___2_micrometer___2
  // concentration of PD1-aPD1 complex
  species PD1_aPD1_syn_CD8_APC in syn_CD8_APC = 0;  // substance in MWDERIVEDUNIT_molecule__micrometer___2_micrometer___2
  // concentration of PD1-aPD1-PD1 complex
  species PD1_aPD1_PD1_syn_CD8_APC in syn_CD8_APC = 0;  // substance in MWDERIVEDUNIT_molecule__micrometer___2_micrometer___2
  // concentration of PDL1-aPDL1 complex
  species PDL1_aPDL1_syn_CD8_APC in syn_CD8_APC = 0;  // substance in MWDERIVEDUNIT_molecule__micrometer___2_micrometer___2
  // concentration of PDL1-aPDL1-PDL1 complex
  species PDL1_aPDL1_PDL1_syn_CD8_APC in syn_CD8_APC = 0;  // substance in MWDERIVEDUNIT_molecule__micrometer___2_micrometer___2
  // concentration of PDL1 in synapse of T cell
  species TPDL1_syn_CD8_APC in syn_CD8_APC = CD8_PDL1_total/A_Tcell;  // substance in MWDERIVEDUNIT_molecule__micrometer___2_micrometer___2
  // concentration of TPDL1-aPDL1 complex
  species TPDL1_aPDL1_syn_CD8_APC in syn_CD8_APC = 0;  // substance in MWDERIVEDUNIT_molecule__micrometer___2_micrometer___2
  // concentration of TPDL1-aPDL1-TPDL1 complex
  species TPDL1_aPDL1_TPDL1_syn_CD8_APC in syn_CD8_APC = 0;  // substance in MWDERIVEDUNIT_molecule__micrometer___2_micrometer___2
  // concentration of CD28-CD80 complex
  species CD28_CD80_syn_CD8_APC in syn_CD8_APC = 0;  // substance in MWDERIVEDUNIT_molecule__micrometer___2_micrometer___2
  // concentration of CD28-CD80-CD28 complex
  species CD28_CD80_CD28_syn_CD8_APC in syn_CD8_APC = 0;  // substance in MWDERIVEDUNIT_molecule__micrometer___2_micrometer___2
  // concentration of CD28-CD86 complex
  species CD28_CD86_syn_CD8_APC in syn_CD8_APC = 0;  // substance in MWDERIVEDUNIT_molecule__micrometer___2_micrometer___2
  // concentration of CD80-CTLA4 complex
  species CD80_CTLA4_syn_CD8_APC in syn_CD8_APC = 0;  // substance in MWDERIVEDUNIT_molecule__micrometer___2_micrometer___2
  // concentration of CD80-CTLA4-CD80 complex
  species CD80_CTLA4_CD80_syn_CD8_APC in syn_CD8_APC = 0;  // substance in MWDERIVEDUNIT_molecule__micrometer___2_micrometer___2
  // concentration of CTLA4-CD80-CTLA4 complex
  species CTLA4_CD80_CTLA4_syn_CD8_APC in syn_CD8_APC = 0;  // substance in MWDERIVEDUNIT_molecule__micrometer___2_micrometer___2
  // concentration of CD80-CTLA4-CD80-CTLA4 complex
  species CD80_CTLA4_CD80_CTLA4_syn_CD8_APC in syn_CD8_APC = 0;  // substance in MWDERIVEDUNIT_molecule__micrometer___2_micrometer___2
  // concentration of CD86-CTLA4 complex
  species CD86_CTLA4_syn_CD8_APC in syn_CD8_APC = 0;  // substance in MWDERIVEDUNIT_molecule__micrometer___2_micrometer___2
  // concentration of CD86-CTLA4-CD86 complex
  species CD86_CTLA4_CD86_syn_CD8_APC in syn_CD8_APC = 0;  // substance in MWDERIVEDUNIT_molecule__micrometer___2_micrometer___2
  // concentration of PDL1-CD80 complex
  species PDL1_CD80_syn_CD8_APC in syn_CD8_APC = 0;  // substance in MWDERIVEDUNIT_molecule__micrometer___2_micrometer___2
  // concentration of PDL1-CD80-CD28 complex
  species PDL1_CD80_CD28_syn_CD8_APC in syn_CD8_APC = 0;  // substance in MWDERIVEDUNIT_molecule__micrometer___2_micrometer___2
  // concentration of PDL1-CD80-CTLA4 complex
  species PDL1_CD80_CTLA4_syn_CD8_APC in syn_CD8_APC = 0;  // substance in MWDERIVEDUNIT_molecule__micrometer___2_micrometer___2
  // concentration of CD28 in synapse
  species CD28_syn_CD8_APC in syn_CD8_APC = CD8_CD28_total/A_Tcell;  // substance in MWDERIVEDUNIT_molecule__micrometer___2_micrometer___2
  // concentration of CTLA4 in synapse
  species CTLA4_syn_CD8_APC in syn_CD8_APC = CD8_CTLA4_syn/A_Tcell;  // substance in MWDERIVEDUNIT_molecule__micrometer___2_micrometer___2
  // concentration of CD80 dimer in synapse
  species CD80_syn_CD8_APC in syn_CD8_APC = APC_CD80_total/A_APC;  // substance in MWDERIVEDUNIT_molecule__micrometer___2_micrometer___2
  // concentration of CD80 monomer in synapse
  species CD80m_syn_CD8_APC in syn_CD8_APC = 0;  // substance in MWDERIVEDUNIT_molecule__micrometer___2_micrometer___2
  // concentration of CD86 in synapse
  species CD86_syn_CD8_APC in syn_CD8_APC = APC_CD86_total/A_APC;  // substance in MWDERIVEDUNIT_molecule__micrometer___2_micrometer___2
  // concentration of CTLA4-aCTLA4 complex
  species CTLA4_aCTLA4_syn_CD8_APC in syn_CD8_APC = 0;  // substance in MWDERIVEDUNIT_molecule__micrometer___2_micrometer___2
  // concentration of CTLA4-aCTLA4-CTLA4 complex
  species CTLA4_aCTLA4_CTLA4_syn_CD8_APC in syn_CD8_APC = 0;  // substance in MWDERIVEDUNIT_molecule__micrometer___2_micrometer___2
  // Nab-paclitaxel in V1
  species NabP_V_1 in V_1 = 0;  // substance in MWDERIVEDUNIT_nanogram__milliliter_liter
  // Nab-paclitaxel in V2
  species NabP_V_2 in V_2 = 0;  // substance in MWDERIVEDUNIT_nanogram__milliliter_liter
  // Nab-paclitaxel in V3
  species NabP_V_3 in V_3 = 0;  // substance in MWDERIVEDUNIT_nanogram__milliliter_liter
  // gem concentration in central compartment
  species gem_C_gem in C_gem = 0;  // substance in MWDERIVEDUNIT_milligram__liter_liter
  // gem concentration in peripheral compartment 1
  species gem_P1_gem in P1_gem = 0;  // substance in MWDERIVEDUNIT_milligram__liter_liter
  // fu5 concentration in central compartment
  species fu5 in C_fu5 = 0;  // substance in MWDERIVEDUNIT_milligram__liter_liter
  // oxa concentration in central compartment
  species oxa_C_oxa in C_oxa = 0;  // substance in MWDERIVEDUNIT_milligram__liter_liter
  // oxa concentration in peripheral compartment 1
  species oxa_P1_oxa in P1_oxa = 0;  // substance in MWDERIVEDUNIT_milligram__liter_liter
  // oxa concentration in peripheral compartment 2
  species oxa_P2_oxa in P2_oxa = 0;  // substance in MWDERIVEDUNIT_milligram__liter_liter
  // iri concentration in central compartment
  species iri_C_iri in C_iri = 0;  // substance in MWDERIVEDUNIT_milligram__liter_liter
  // iri concentration in peripheral compartment 1
  species iri_P1_iri in P1_iri = 0;  // substance in MWDERIVEDUNIT_milligram__liter_liter
  // sn38 (active metabolite of iri) concentration
  species sn38 in C_sn38 = 0;  // substance in MWDERIVEDUNIT_milligram__liter_liter
  species CD47 in syn_M_C = C_CD47;  // substance in MWDERIVEDUNIT_molecule__micrometer___2_micrometer___2
  species SIRPa in syn_M_C = M_SIRPa;  // substance in MWDERIVEDUNIT_molecule__micrometer___2_micrometer___2
  // concentration CD47-SIRPa complex in synapse
  species CD47_SIRPa in syn_M_C = 0;  // substance in MWDERIVEDUNIT_molecule__micrometer___2_micrometer___2
  // concentration of bound and unbound PDL1 molecules
  species PDL1_total in syn_M_C;  // substance in MWDERIVEDUNIT_molecule__micrometer___2_micrometer___2
  // concentration of bound and unbound PDL2 molecules
  species PDL2_total in syn_M_C;  // substance in MWDERIVEDUNIT_molecule__micrometer___2_micrometer___2
  // concentration of PD1-PDL1 complex
  species PD1_PDL1_syn_M_C in syn_M_C = 0;  // substance in MWDERIVEDUNIT_molecule__micrometer___2_micrometer___2
  // concentration of PD1-PDL2 complex
  species PD1_PDL2_syn_M_C in syn_M_C = 0;  // substance in MWDERIVEDUNIT_molecule__micrometer___2_micrometer___2
  // concentration of PD1 in synapse
  species PD1_syn_M_C in syn_M_C = M_PD1_total/A_Mcell;  // substance in MWDERIVEDUNIT_molecule__micrometer___2_micrometer___2
  // concentration of PDL1 in synapse
  species PDL1_syn_M_C in syn_M_C = C1_PDL1_base/A_cell;  // substance in MWDERIVEDUNIT_molecule__micrometer___2_micrometer___2
  // concentration of PDL2 in synapse
  species PDL2_syn_M_C in syn_M_C = C1_PDL1_base*r_PDL2C1/A_cell;  // substance in MWDERIVEDUNIT_molecule__micrometer___2_micrometer___2
  // concentration of PD1-aPD1 complex
  species PD1_aPD1_syn_M_C in syn_M_C = 0;  // substance in MWDERIVEDUNIT_molecule__micrometer___2_micrometer___2
  // concentration of PD1-aPD1-PD1 complex
  species PD1_aPD1_PD1_syn_M_C in syn_M_C = 0;  // substance in MWDERIVEDUNIT_molecule__micrometer___2_micrometer___2
  // concentration of PDL1-aPDL1 complex
  species PDL1_aPDL1_syn_M_C in syn_M_C = 0;  // substance in MWDERIVEDUNIT_molecule__micrometer___2_micrometer___2
  // concentration of PDL1-aPDL1-PDL1 complex
  species PDL1_aPDL1_PDL1_syn_M_C in syn_M_C = 0;  // substance in MWDERIVEDUNIT_molecule__micrometer___2_micrometer___2
  // concentration of PDL1-CD80 complex
  species PDL1_CD80_syn_M_C in syn_M_C = 0;  // substance in MWDERIVEDUNIT_molecule__micrometer___2_micrometer___2
  // concentration of CD80 in synapse
  species CD80_syn_M_C in syn_M_C = C1_CD80_total/A_cell;  // substance in MWDERIVEDUNIT_molecule__micrometer___2_micrometer___2
  // concentration of CD80 monomer in synapse
  species CD80m_syn_M_C in syn_M_C = 0;  // substance in MWDERIVEDUNIT_molecule__micrometer___2_micrometer___2
  // GVAX vaccine cells at intradermal injection site
  substanceOnly species GVAX_cells in V_ID = 0;  // substance in MWUSERUNIT_cell
  // Naive APCs recruited to injection site
  substanceOnly species APC in V_ID = 0;  // substance in MWUSERUNIT_cell
  // Mature APCs with antigen at injection site
  substanceOnly species mAPC in V_ID = 0;  // substance in MWUSERUNIT_cell
  // GM-CSF amount at injection site
  substanceOnly species GMCSF in V_ID = 0;  // substance in MWBUILTINPREFIX_nano_MWBUILTINUNIT_mole
  // GVAX-derived antigen at injection site
  substanceOnly species P1_GVAX in V_ID = 0;  // substance in MWBUILTINPREFIX_nano_MWBUILTINUNIT_mole

  // Parameters:
  // Rate of dead cell clearance from tumour compartment
  k_cell_clear = 0.1 MWDERIVEDUNIT_1__day;
  // unit parameter for calculation
  cell = 1 MWUSERUNIT_cell;
  // unit parameter for calculation
  day = 1 MWBUILTINUNIT_day;
  // Average diameter of cancer cell
  D_cell = 17 MWBUILTINPREFIX_micro_MWBUILTINUNIT_meter;
  // Average volume of cancer cell
  vol_cell = 2572.441 MWDERIVEDUNIT_micrometer___3__cell;
  // Average volume of T cells
  vol_Tcell = 175.0157 MWDERIVEDUNIT_micrometer___3__cell;
  // Intracellular fraction of the tumor
  Ve_T = 0.37 dimensionless;
  // Minimum tumor compartment volume (cancer-free baseline)
  V_Tmin = 1e-6 MWBUILTINPREFIX_milli_MWBUILTINUNIT_liter;
  // Total number of cancer cells
  C_total has MWUSERUNIT_cell;
  // Total number of activated T cells in tumor
  T_total has MWUSERUNIT_cell;
  // Total number of activated T cells in TDLNs
  T_total_LN has MWUSERUNIT_cell;
  // Rate of cancer cell death
  R_Tcell has MWDERIVEDUNIT_cell__day;
  // Total number of Tregs in tumor compartment (V_T.Treg)
  Tregs has MWUSERUNIT_cell; Tregs is "Tregs_";
  // Hill function of cDC2 for Treg activation (shared nCD4 pool, self-antigen)
  H_APC_Treg has dimensionless;
  // Hill function of cDC1 for CD8 T cell activation
  H_mAPC has dimensionless;
  // Hill function of cDC2 for Th activation (shared nCD4 pool, tumor antigen)
  H_APC_Th has dimensionless;
  // Hill function of PDL1 on chemotherapy-sensitive tumor cells for T cell exhaustion
  H_PD1_C1 has dimensionless;
  // Hill function of PDL1 on APC for T cell exhaustion
  H_PD1_APC has dimensionless;
  // Hill function of CD28 on tumor cells
  H_CD28_C1 has dimensionless;
  // Hill function of CD28 on APCs for T cell activation
  H_CD28_APC has dimensionless;
  // Cancer growth rate
  k_C1_growth = 0.01 MWDERIVEDUNIT_1__day;
  // Cancer death rate
  k_C1_death = 0.003 MWDERIVEDUNIT_1__day;
  // Current tumor carrying capacity
  C_max has MWUSERUNIT_cell;
  // Therapy-induced death rate
  k_C1_therapy has MWDERIVEDUNIT_1__day;
  // Pre-treatment tumor diameter
  initial_tumour_diameter = 3.2 MWBUILTINPREFIX_centi_MWBUILTINUNIT_meter;
  // Initial tumor carrying capacity
  K_initial = 10300 MWUSERUNIT_cell;
  // Tumor vasculature growth rate
  k_vas_growth = 0.15 MWDERIVEDUNIT_1__day;
  // Tumor vasculature inhibition rate
  k_vas_decay = 0.004 MWDERIVEDUNIT_1__day;
  // Angiogenic factor secretion rate
  k_vas_Csec = 0.1 MWDERIVEDUNIT_picogram__cell__day;
  // Angiogenic factor degradation rate
  k_vas_deg = 16.6 MWDERIVEDUNIT_1__day;
  // Half-maximal angiogenic factor concentration for tumor capacity growth
  VEGF_50 = 2410 MWDERIVEDUNIT_picogram__milliliter;
  // Cancer growth rate
  k_C2_growth has MWDERIVEDUNIT_1__day;
  // Cancer death rate
  k_C2_death has MWDERIVEDUNIT_1__day;
  // Therapy-induced death rate
  k_C2_therapy has MWDERIVEDUNIT_1__day;
  // T Cell Diversity
  div_Treg = 1160000 dimensionless;
  // Number of self-antigen-specific T cell clones
  n_CD4_clones = 100 dimensionless;
  // Rate of naive T cell transport into the LN
  q_nCD4_LN_in = 0.1 MWDERIVEDUNIT_1__day;
  // Rate of activated T cell transport out of the LN
  q_Treg_LN_out = 24 MWDERIVEDUNIT_1__day;
  // Rate of naive T cell transport out of the LN
  q_nCD4_LN_out = 2.88 MWDERIVEDUNIT_1__day;
  // Treg activation rate
  k_Treg_act = 5 MWDERIVEDUNIT_1__day;
  // Treg proliferation rate
  k_Treg_pro = 0.05 MWDERIVEDUNIT_1__day;
  // Treg death rate
  k_Treg_death = 0.1 MWDERIVEDUNIT_1__day;
  // Tumor-local Treg proliferation rate (Ki67+ 30-60% in PDAC TME)
  k_Treg_pro_tumor = 0.2 MWDERIVEDUNIT_1__day;
  // Max Treg density in tumor (carrying capacity for local proliferation)
  rho_Treg_max = 10000000 MWDERIVEDUNIT_cell__milliliter;
  // Half-maximal V_T.CD8 for Th-cap inflammation Hill
  CD8_50_Tcap = 100000 MWUSERUNIT_cell;
  // rate of Treg transport into the peripheral compartment
  q_Treg_P_in = 2.436 MWDERIVEDUNIT_1__minute;
  // rate of Treg transport out of the peripheral compartment
  q_Treg_P_out = 24 MWDERIVEDUNIT_1__day;
  // rate of Treg transport into the tumor compartment
  q_Treg_T_in = 5.8e-5 MWDERIVEDUNIT_1__centimeter___3_minute;
  // rate of naive Treg transport into the peripheral compartment
  q_nCD4_P_in = 0.1764 MWDERIVEDUNIT_1__minute;
  // rate of naive Treg transport out of the peripheral compartment
  q_nCD4_P_out = 5.1 MWDERIVEDUNIT_1__day;
  // Thymic output of naive Treg cells
  Q_nCD4_thym = 35000000 MWDERIVEDUNIT_cell__day;
  // rate of naive Treg proliferation
  k_nCD4_pro = 320000000 MWDERIVEDUNIT_cell__day;
  // half-maximal peripheral proliferation of naive Treg
  K_nTreg_pro = 1000000000 MWUSERUNIT_cell;
  // rate of naive Treg death
  k_nTreg_death = 0.002 MWDERIVEDUNIT_1__day;
  // Fraction of naturally-occurring Tregs
  f_nTreg = 0.25 dimensionless;
  // Maximal rate of Treg-mediated CD8 exhaustion under saturating IL-10 and Treg:CD8 ratio
  k_Treg_CD8_exh = 0.1 MWDERIVEDUNIT_1__day;
  // Hill function of tumor antigenP0
  H_P0 has dimensionless;
  // Rate of CCL5 secretion by cancer cells (FOXP3-dependent)
  k_CCL5_sec = 1e-12 MWDERIVEDUNIT_nanomole__cell__day;
  // Rate of CCL5 degradation
  k_CCL5_deg = 1.5 MWDERIVEDUNIT_1__day;
  // Half-maximal CCL5 concentration for CCR5-mediated Treg recruitment
  CCL5_50_Treg = 1 MWBUILTINPREFIX_nano_MWBUILTINUNIT_molarity;
  // CCR5-dependent Treg recruitment rate to tumor
  k_CCR5_Treg_rec = 0.0001 MWDERIVEDUNIT_1__centimeter___3_minute;
  // Hill function for CCL5/CCR5-mediated Treg recruitment
  H_CCL5_Treg has dimensionless;
  // T Cell Diversity
  div_CD8 = 1110000 dimensionless;
  // Number of tumor-specific T cell clones
  n_CD8_clones = 120 dimensionless;
  // Rate of naive T cell transport into the LN
  q_nCD8_LN_in = 0.076 MWDERIVEDUNIT_1__day;
  // Rate of activated T cell transport out of the LN
  q_CD8_LN_out = 24 MWDERIVEDUNIT_1__day;
  // Rate of naive T cell transport out of the LN
  q_nCD8_LN_out = 1.8 MWDERIVEDUNIT_1__day;
  // CD8 activation rate
  k_CD8_act = 23 MWDERIVEDUNIT_1__day;
  // CD8 proliferation rate
  k_CD8_pro = 1 MWDERIVEDUNIT_1__day;
  // Tumor-local CD8 proliferation rate (antigen-gated, PD-1-suppressed)
  k_CD8_T_pro = 0.05 MWDERIVEDUNIT_1__day;
  // Max CD8 density in tumor (carrying capacity for local proliferation)
  rho_CD8_max = 10000000 MWDERIVEDUNIT_cell__milliliter;
  // Rate of naive T cell activation per mature APC
  k_T_activation_per_APC = 1e-6 MWDERIVEDUNIT_1__day_cell;
  // Clonal expansion burst size
  n_T_expansion_burst = 800 dimensionless;
  // CD8 death rate
  k_CD8_death = 0.1 MWDERIVEDUNIT_1__day;
  // rate of CD8+ T cell transport into the peripheral compartment
  q_CD8_P_in = 2.436 MWDERIVEDUNIT_1__minute;
  // rate of CD8+ T cell transport out of the peripheral compartment
  q_CD8_P_out = 24 MWDERIVEDUNIT_1__day;
  // rate of CD8+ T cell transport into the tumor compartment
  q_CD8_T_in = 5.8e-5 MWDERIVEDUNIT_1__centimeter___3_minute;
  // rate of naive CD8+ T cell transport into the peripheral compartment
  q_nCD8_P_in = 0.1764 MWDERIVEDUNIT_1__minute;
  // rate of naive CD8+ T cell transport out of the peripheral compartment
  q_nCD8_P_out = 5.1 MWDERIVEDUNIT_1__day;
  // Thymic output of naive CD8+ T cells
  Q_nCD8_thym = 70000000 MWDERIVEDUNIT_cell__day;
  // rate of naive CD8+ T cell proliferation
  k_nCD8_pro = 320000000 MWDERIVEDUNIT_cell__day;
  // half-maximal peripheral proliferation of naive CD8+ T cells
  K_nCD8_pro = 1000000000 MWUSERUNIT_cell;
  // rate of naive CD8+ T cell death
  k_nCD8_death = 0.002 MWDERIVEDUNIT_1__day;
  // Rate of T cell exhaustion by cancer cells
  k_C_CD8_exh = 0.1 MWDERIVEDUNIT_1__day;
  // Rate of cancer cell death by T cells
  k_C_CD8 = 2.2 MWDERIVEDUNIT_1__day;
  // Rate of stiffness-mediated T cell exhaustion
  k_stiff_CD8_exh = 0.02 MWDERIVEDUNIT_1__day;
  // Baseline exhaustion rate from chronic TCR stimulation
  k_CD8_basal_exh = 0.05 MWDERIVEDUNIT_1__day;
  // Cancer cell number for half-maximal exhaustion induction
  K_C_exh = 100000000 MWUSERUNIT_cell;
  // Death rate of exhausted CD8 T cells
  k_CD8_exh_death = 0.15 MWDERIVEDUNIT_1__day;
  // Hill function for CXCL12-mediated T cell exclusion
  H_CXCL12_Texcl has dimensionless;
  // Hill function of tumor antigen P1
  H_P1 has dimensionless;
  // Dependence of Teff killing rate on Teff/C ratio
  K_T_C = 1.2 dimensionless;
  // Treg:Teff ratio for 50% inhibition of T cell killing
  R50_Treg = 0.31 dimensionless;
  // Treg inhibition factor (derived: 1/R50_Treg)
  K_T_Treg has dimensionless;
  // Volume searched by one T cell per day
  v_T_search_volume = 1e-6 MWDERIVEDUNIT_millimeter___3__day;
  // Kill probability per T cell-tumor contact
  p_T_kill_per_contact = 0.45 dimensionless;
  // Effective T cell killing rate including all inhibition factors
  k_C_Tcell_eff has MWDERIVEDUNIT_1__day;
  // Rate of cDC1 maturation (BATF3 program)
  k_APC_mat_cDC1 = 2 MWDERIVEDUNIT_1__day;
  // Rate of cDC2 maturation
  k_APC_mat_cDC2 = 1.5 MWDERIVEDUNIT_1__day;
  // Rate of APC migration
  k_APC_mig = 4 MWDERIVEDUNIT_1__day;
  // Rate of APC death
  k_APC_death = 0.15 MWDERIVEDUNIT_1__day;
  // Rate of mAPC death
  k_mAPC_death = 0.3 MWDERIVEDUNIT_1__day;
  // cDC1 recruitment-target density in tumor (recruit-rate / k_APC_death)
  cDC1_recruit_target_T = 50000 MWDERIVEDUNIT_cell__milliliter;
  // cDC2 recruitment-target density in tumor (recruit-rate / k_APC_death)
  cDC2_recruit_target_T = 200000 MWDERIVEDUNIT_cell__milliliter;
  // cDC1 homeostatic density in LN
  APC0_cDC1_LN = 240000 MWDERIVEDUNIT_cell__milliliter;
  // cDC2 homeostatic density in LN
  APC0_cDC2_LN = 960000 MWDERIVEDUNIT_cell__milliliter;
  // Maximum number of T Cells an APC can interact with
  n_sites_APC = 10 dimensionless;
  // Half-maximal tumor death rate for DAMP-mediated APC maturation
  DAMP_50 = 10000 MWDERIVEDUNIT_cell__day;
  // Hill function for DAMP-mediated APC maturation (uses R_Tcell = total cancer death rate)
  H_DAMP has dimensionless;
  // Half-maximal TGFb for inhibition of APC maturation
  TGFb_50_APC = 0.07 MWBUILTINPREFIX_nano_MWBUILTINUNIT_molarity;
  // Hill function for TGFb inhibition of APC maturation
  H_TGFb_APC has dimensionless;
  // Total immature DCs in tumor (cDC1+cDC2; CD11c+CD83-)
  APC_total_T has MWUSERUNIT_cell;
  // Total mature DCs in tumor (mcDC1+mcDC2; CD83+ by IHC)
  mAPC_total_T has MWUSERUNIT_cell;
  // Total mature DCs in LN (mcDC1+mcDC2; CD83+CCR7+)
  mAPC_total_LN has MWUSERUNIT_cell;
  // Rate of MHC internalization
  kin = 14.4 MWDERIVEDUNIT_1__day;
  // Rate of MHC externalization
  kout = 28.8 MWDERIVEDUNIT_1__day;
  // Rate of antigen uptake by APCs
  k_P0_up = 14.4 MWDERIVEDUNIT_1__day__cell;
  // Rate of extracellular antigen degradation
  k_xP0_deg = 2 MWDERIVEDUNIT_1__day;
  // Rate of endosomal antigen degradation
  k_P0_deg = 17.28 MWDERIVEDUNIT_1__day;
  // Rate of endosomal epitope degradation
  k_p0_deg = 144 MWDERIVEDUNIT_1__day;
  // Rate of antigen-MHC binding
  k_P0_on = 144000 MWDERIVEDUNIT_1__day__molarity;
  // Antigen-MHC dissociation constant
  k_P0_d1 = 1e-7 MWBUILTINUNIT_molarity;
  // Epitope concentration for half-maximal T cell activation
  p0_50 = 2.645503e-5 MWDERIVEDUNIT_molecule__micrometer___2;
  // Concentration of P0 in C1
  P0_C1 = 5.4e-13 MWDERIVEDUNIT_mole__cell;
  // Surface area of the synapse
  A_syn = 37.8 MWDERIVEDUNIT_micrometer___2;
  // Surface area of the T cell
  A_Tcell = 151.3104 MWDERIVEDUNIT_micrometer___2;
  // Surface area of the Cancer cell
  A_cell = 907.9203 MWDERIVEDUNIT_micrometer___2;
  // Surface area of the APC
  A_APC = 900 MWDERIVEDUNIT_micrometer___2;
  // Rate of TCR binding to MHC-peptide complex
  k_M1p0_TCR_on = 1 MWDERIVEDUNIT_1__second_molecule__micrometer___2;
  // Rate of TCR unbinding from MHC-peptide complex
  k_M1p0_TCR_off = 1 MWDERIVEDUNIT_1__second;
  // Rate of MHC-peptide-TCR complex modification
  k_M1p0_TCR_p = 1 MWDERIVEDUNIT_1__second;
  // Rate of MHC-peptide-TCR complex with maximal modification that leads to non-signaling
  phi_M1p0_TCR = 0.09 MWDERIVEDUNIT_1__second;
  // Number of modifcation steps for MHC-peptide-TCR complex
  N_M1p0_TCR = 10 dimensionless;
  // Total number of TCR molecules per naive T cell
  TCR_p0_tot = 103.8131 MWDERIVEDUNIT_molecule__micrometer___2;
  // Total number of MHC-p0-TCR complexes of all different activation levels (see Rules)
  pTCR_p0_MHC_tot has MWDERIVEDUNIT_molecule__micrometer___2;
  // Rate of antigen uptake by APCs
  k_P1_up = 14.4 MWDERIVEDUNIT_1__day__cell;
  // Rate of extracellular antigen degradation
  k_xP1_deg = 2 MWDERIVEDUNIT_1__day;
  // Rate of endosomal antigen degradation
  k_P1_deg = 17.28 MWDERIVEDUNIT_1__day;
  // Rate of endosomal epitope degradation
  k_p1_deg = 144 MWDERIVEDUNIT_1__day;
  // Rate of antigen-MHC binding
  k_P1_on = 144000 MWDERIVEDUNIT_1__day__molarity;
  // Antigen-MHC dissociation constant
  k_P1_d1 = 1e-8 MWBUILTINUNIT_molarity;
  // Epitope concentration for half-maximal T cell activation
  p1_50 = 2.645503e-5 MWDERIVEDUNIT_molecule__micrometer___2;
  // Concentration of P1 in C1
  P1_C1 = 5.4e-13 MWDERIVEDUNIT_mole__cell;
  // Rate of TCR binding to MHC-peptide complex
  k_M1p1_TCR_on = 1 MWDERIVEDUNIT_1__second_molecule__micrometer___2;
  // Rate of TCR unbinding from MHC-peptide complex
  k_M1p1_TCR_off = 1 MWDERIVEDUNIT_1__second;
  // Rate of MHC-peptide-TCR complex modification
  k_M1p1_TCR_p = 1 MWDERIVEDUNIT_1__second;
  // Rate of MHC-peptide-TCR complex with maximal modification that leads to non-signaling
  phi_M1p1_TCR = 0.09 MWDERIVEDUNIT_1__second;
  // Number of modifcation steps for MHC-peptide-TCR complex
  N_M1p1_TCR = 10 dimensionless;
  // Total number of TCR molecules per naive T cell
  TCR_p1_tot = 103.8131 MWDERIVEDUNIT_molecule__micrometer___2;
  // Total number of MHC-p1-TCR complexes of all different activation levels (see Rules)
  pTCR_p1_MHC_tot has MWDERIVEDUNIT_molecule__micrometer___2;
  // Capillary filtration rate of aPD1 between central and peripheral compartment
  q_P_aPD1 = 8.8e-6 MWDERIVEDUNIT_liter__second;
  // Capillary filtration rate of aPD1 between central and tumor compartment
  q_T_aPD1 = 8.52e-5 MWDERIVEDUNIT_milliliter__second;
  // Capillary filtration rate of aPD1 between central and TDLN compartment
  q_LN_aPD1 = 3.25e-6 MWDERIVEDUNIT_milliliter__second;
  // Rate of lymphatic drainage of aPD1 from TDLN to central compartment
  q_LD_aPD1 = 0.0015 MWDERIVEDUNIT_1__minute;
  // Clearance rate of aPD1 from central compartment
  k_cl_aPD1 = 0.37 MWDERIVEDUNIT_liter__day;
  // Volume fraction of interstitial space available to aPD1 in central compartment
  gamma_C_aPD1 = 0.61 dimensionless;
  // Volume fraction of interstitial space available to aPD1 in peripheral compartment
  gamma_P_aPD1 = 0.0452 dimensionless;
  // Volume fraction of interstitial space available to aPD1 in tumor compartment
  gamma_T_aPD1 = 0.522 dimensionless;
  // Volume fraction of interstitial space available to aPD1 in TDLN compartment
  gamma_LN_aPD1 = 0.2 dimensionless;
  // Capillary filtration rate of aPDL1 between central and peripheral compartment
  q_P_aPDL1 = 5.56e-6 MWDERIVEDUNIT_liter__second;
  // Capillary filtration rate of aPDL1 between central and tumor compartment
  q_T_aPDL1 = 8.52e-5 MWDERIVEDUNIT_milliliter__second;
  // Capillary filtration rate of aPDL1 between central and TDLN compartment
  q_LN_aPDL1 = 3.25e-6 MWDERIVEDUNIT_milliliter__second;
  // Rate of lymphatic drainage of aPDL1 from TDLN to central compartment
  q_LD_aPDL1 = 0.0015 MWDERIVEDUNIT_1__minute;
  // Clearance rate of aPDL1 from central compartment
  k_cl_aPDL1 = 0.33 MWDERIVEDUNIT_liter__day;
  // Volume fraction of interstitial space available to aPDL1 in central compartment
  gamma_C_aPDL1 = 0.7 dimensionless;
  // Volume fraction of interstitial space available to aPDL1 in peripheral compartment
  gamma_P_aPDL1 = 0.057 dimensionless;
  // Volume fraction of interstitial space available to aPDL1 in tumor compartment
  gamma_T_aPDL1 = 0.522 dimensionless;
  // Volume fraction of interstitial space available to aPDL1 in TDLN compartment
  gamma_LN_aPDL1 = 0.2 dimensionless;
  // Non-linear clearance rate of aPDL1 from central compartment
  k_cln_aPDL1 = 5.6 MWDERIVEDUNIT_nanomole__day;
  // Half-maximal concentration of aPDL1 in central compartment for nonlinear clearance
  Kc_aPDL1 = 1.69 MWDERIVEDUNIT_nanomole__liter;
  // Capillary filtration rate of aCTLA4 between central and peripheral compartment
  q_P_aCTLA4 = 5.331e-6 MWDERIVEDUNIT_liter__second;
  // Capillary filtration rate of aCTLA4 between central and tumor compartment
  q_T_aCTLA4 = 8.52e-5 MWDERIVEDUNIT_milliliter__second;
  // Capillary filtration rate of aCTLA4 between central and TDLN compartment
  q_LN_aCTLA4 = 3.25e-6 MWDERIVEDUNIT_milliliter__second;
  // Rate of lymphatic drainage of aCTLA4 from TDLN to central compartment
  q_LD_aCTLA4 = 0.0015 MWDERIVEDUNIT_1__minute;
  // Clearance rate of aCTLA4 from central compartment
  k_cl_aCTLA4 = 0.3276 MWDERIVEDUNIT_liter__day;
  // Volume fraction of interstitial space available to aCTLA4 in central compartment
  gamma_C_aCTLA4 = 0.794 dimensionless;
  // Volume fraction of interstitial space available to aCTLA4 in peripheral compartment
  gamma_P_aCTLA4 = 0.062 dimensionless;
  // Volume fraction of interstitial space available to aCTLA4 in tumor compartment
  gamma_T_aCTLA4 = 0.522 dimensionless;
  // Volume fraction of interstitial space available to aCTLA4 in TDLN compartment
  gamma_LN_aCTLA4 = 0.2 dimensionless;
  // kon of PD1-PDL1 binding
  kon_PD1_PDL1 = 0.06 MWDERIVEDUNIT_1__micromolarity_nanometer_second;
  // Expression rate of PDL1 on tumor cells
  k_out_PDL1 = 50000 MWDERIVEDUNIT_molecule__day;
  // Degradation rate of PDL1 on tumor cells
  k_in_PDL1 = 1 MWDERIVEDUNIT_1__day;
  // Number of folds increase of PDL1 expression by IFNg
  r_PDL1_IFNg = 6 dimensionless;
  // kon of PD1-PDL2 binding
  kon_PD1_PDL2 = 0.08 MWDERIVEDUNIT_1__micromolarity_nanometer_second;
  // kon of PD1-aPD1 binding
  kon_PD1_aPD1 = 670000 MWDERIVEDUNIT_1__molarity_second;
  // kon of PDL1-aPDL1 binding
  kon_PDL1_aPDL1 = 430000 MWDERIVEDUNIT_1__molarity_second;
  // kon of CD28-CD80 binding
  kon_CD28_CD80 = 0.1333333 MWDERIVEDUNIT_1__micromolarity_nanometer_second;
  // kon of CD28-CD86 binding
  kon_CD28_CD86 = 0.4666667 MWDERIVEDUNIT_1__micromolarity_nanometer_second;
  // kon of CTLA4-CD80 binding
  kon_CTLA4_CD80 = 0.3333333 MWDERIVEDUNIT_1__micromolarity_nanometer_second;
  // kon of CTLA4-CD86 binding
  kon_CTLA4_CD86 = 0.6666667 MWDERIVEDUNIT_1__micromolarity_nanometer_second;
  // kon of CD80-PDL1 binding
  kon_CD80_PDL1 = 0.1066667 MWDERIVEDUNIT_1__micromolarity_nanometer_second;
  // kon of CTLA4-aCTLA4 binding
  kon_CTLA4_aCTLA4 = 383000 MWDERIVEDUNIT_1__molarity_second;
  // kon of CD80 self-association
  kon_CD80_CD80 = 0.0001966667 MWDERIVEDUNIT_1__micromolarity_nanometer_second;
  // koff of PD1-PDL1 binding
  koff_PD1_PDL1 = 1.476 MWDERIVEDUNIT_1__second;
  // koff of PD1-PDL2 binding
  koff_PD1_PDL2 = 0.552 MWDERIVEDUNIT_1__second;
  // koff of PD1-aPD1 binding
  koff_PD1_aPD1 = 0.00268 MWDERIVEDUNIT_1__second;
  // koff of PDL1-aPDL1 binding
  koff_PDL1_aPDL1 = 0.000172 MWDERIVEDUNIT_1__second;
  // koff of CD28-CD80 binding
  koff_CD28_CD80 = 1.6 MWDERIVEDUNIT_1__second;
  // koff of CD28-CD86 binding
  koff_CD28_CD86 = 28 MWDERIVEDUNIT_1__second;
  // koff of CTLA4-CD80 binding
  koff_CTLA4_CD80 = 0.42 MWDERIVEDUNIT_1__second;
  // koff of CTLA4-CD86 binding
  koff_CTLA4_CD86 = 5.2 MWDERIVEDUNIT_1__second;
  // koff of CD80-PDL1 binding
  koff_CD80_PDL1 = 6.016 MWDERIVEDUNIT_1__second;
  // koff of CTLA4-aCTLA4 binding
  koff_CTLA4_aCTLA4 = 0.0069706 MWDERIVEDUNIT_1__second;
  // koff of CD80 self-association
  koff_CD80_CD80 = 0.01003 MWDERIVEDUNIT_1__second;
  // Antibody cross-arm binding efficiency that also includes the conversion of kon from 3D to 2D
  Chi_PD1_aPD1 = 33.33333 MWDERIVEDUNIT_1__nanometer;
  // Antibody cross-arm binding efficiency that also includes the conversion of kon from 3D to 2D
  Chi_PDL1_aPDL1 = 33.33333 MWDERIVEDUNIT_1__nanometer;
  // Antibody cross-arm binding efficiency that also includes the conversion of kon from 3D to 2D
  Chi_CTLA4_aCTLA4 = 33.33333 MWDERIVEDUNIT_1__nanometer;
  // PD1/PDL1 concentration for half-maximal T cell inactivation
  PD1_50 = 6 MWDERIVEDUNIT_molecule__micrometer___2;
  // Hill coefficient for PD1/PDL1 half-maximal T cell inactivation
  n_PD1 = 2 dimensionless;
  // CD28-CD80/CD28-CD86 concentration for half-maximal T cell co-estimulation
  CD28_CD8X_50 = 200 MWDERIVEDUNIT_molecule__micrometer___2;
  // Hill coefficient for CD28-CD80/CD28-CD86 half-maximal T cell co-estimulation
  n_CD28_CD8X = 2 dimensionless;
  // concentration of PD1 on CD8 cells
  CD8_PD1_total = 27900 MWBUILTINUNIT_molecule;
  // concentration of CD28 on CD8 cells
  CD8_CD28_total = 184000 MWBUILTINUNIT_molecule;
  // concentration of CTLA4 on CD8 cells
  CD8_CTLA4_syn = 8000 MWBUILTINUNIT_molecule;
  // concentration of PDL1 on CD8 cells
  CD8_PDL1_total = 83700 MWBUILTINUNIT_molecule;
  // baseline number of PDL1 molecules per C1 cell (Zhang 2022, PMID: 35037417; Yu 2017, PMID: 29378617) — PDAC cohort-averaged baseline; per-PDL1+-cell density estimated
  C1_PDL1_base = 120000 MWBUILTINUNIT_molecule;
  // PDL2/PDL1 molecule ratio on C1cell (Cheng 2014, PMID: 23417675)
  r_PDL2C1 = 0.07 dimensionless;
  // number of CD80 molecules per C1 cell (Jansson 2005, PMID: 16034096)
  C1_CD80_total = 80000 MWBUILTINUNIT_molecule;
  // number of CD86 molecules per C1 cell (Jansson 2005, PMID: 16034096)
  C1_CD86_total = 860000 MWBUILTINUNIT_molecule;
  // concentration of bound and unbound PDL1 molecules
  syn_CD8_C1_PDL1_total has MWDERIVEDUNIT_molecule__micrometer___2;
  // concentration of bound and unbound PDL2 molecules
  syn_CD8_C1_PDL2_total has MWDERIVEDUNIT_molecule__micrometer___2;
  // baseline number of PDL1 molecules per APC cell Estimated per-mDC density; mature DCs in TDLN uniformly express PD-L1 (no PDAC-specific quantitative anchor available)
  APC_PDL1_base = 80000 MWBUILTINUNIT_molecule;
  // PDL2/PDL1 molecule ratio on APCcell (Cheng 2014, PMID: 23417675)
  r_PDL2APC = 0.07 dimensionless;
  // number of CD80 molecules per APC cell (Jansson 2005, PMID: 16034096)
  APC_CD80_total = 80000 MWBUILTINUNIT_molecule;
  // number of CD86 molecules per APC cell (Jansson 2005, PMID: 16034096)
  APC_CD86_total = 860000 MWBUILTINUNIT_molecule;
  // concentration of bound and unbound PDL1 molecules
  syn_CD8_APC_PDL1_total has MWDERIVEDUNIT_molecule__micrometer___2;
  // concentration of bound and unbound PDL2 molecules
  syn_CD8_APC_PDL2_total has MWDERIVEDUNIT_molecule__micrometer___2;
  // Rate of T helper cell activation
  k_Th_act = 10 MWDERIVEDUNIT_1__day;
  // Th differentiation rate to Treg
  k_Th_to_Treg = 0.022 MWDERIVEDUNIT_1__day;
  // CD4 proliferation rate
  k_CD4_pro = 1 MWDERIVEDUNIT_1__day;
  // CD4 death rate
  k_CD4_death = 0.01 MWDERIVEDUNIT_1__day;
  // Half-Maximal cancer cell number for T cell recruitment
  K_C2_recruit = 20200000 MWDERIVEDUNIT_cell___2;
  // Baseline Th exhaustion rate from chronic TCR stimulation (mirrors k_CD8_basal_exh)
  k_Th_basal_exh = 0.05 MWDERIVEDUNIT_1__day;
  // Maximal Th exhaustion rate driven by TGFβ (chronic immunosuppression)
  k_TGFb_Th_exh = 0.3 MWDERIVEDUNIT_1__day;
  // Tumor-local Th proliferation rate (Ki67+ 20-30% in PDAC TME)
  k_Th_pro_tumor = 0.15 MWDERIVEDUNIT_1__day;
  // Max Th density in tumor (carrying capacity for local proliferation)
  rho_Th_max = 5000000 MWDERIVEDUNIT_cell__milliliter;
  // Max fold-increase of Th cap under CD8 inflammation
  alpha_Th_cap = 5 dimensionless;
  // rate of IL2 degradation
  k_IL2_deg = 0.09079845 MWDERIVEDUNIT_1__minute;
  // rate of IL2 secretion per activated T cell
  k_IL2_sec = 1e-11 MWDERIVEDUNIT_nanomole__cell__hour;
  // rate of IL2 consumption per T cell (all clones)
  k_IL2_cons = 5e-11 MWDERIVEDUNIT_nanomole__cell__hour;
  // T cell activation half-maximal IL2 concentration
  IL2_50 = 0.32 MWBUILTINPREFIX_nano_MWBUILTINUNIT_molarity;
  // Treg activation half-maximal IL2 concentration
  IL2_50_Treg = 0.01 MWBUILTINPREFIX_nano_MWBUILTINUNIT_molarity;
  // IL-2 consumption weight for CD8 cells
  w_IL2_CD8 = 1 dimensionless;
  // IL-2 consumption weight for Treg cells
  w_IL2_Treg = 1 dimensionless;
  // number of activated T cell generations by TCR signaling only
  N_div_base = 2 dimensionless;
  // number of activated T cell generations by co-stimulatory signaling only
  N_div_costim = 3 dimensionless;
  // maximum number of activated T cell generations due to IL2 (CD8)
  N_IL2_CD8 = 11 dimensionless;
  // maximum number of activated T cell generations due to IL2 (CD4)
  N_IL2_CD4 = 8.5 dimensionless;
  // rate of IFNg secretion per CD8 T cell in tumor
  k_IFNg_Tsec = 2e-13 MWDERIVEDUNIT_nanomole__cell__day;
  // rate of IFNg secretion per Th cell in tumor
  k_IFNg_Thsec = 40.14761 MWDERIVEDUNIT_1__day;
  // IFNg degradation rate
  k_IFNg_deg = 7.68 MWDERIVEDUNIT_1__day;
  // Half-Maximal IFNg level for PD-L1 induction
  IFNg_50_ind = 2.96 MWBUILTINPREFIX_pico_MWBUILTINUNIT_molarity;
  // TGFb secretion rate per Treg cell (all clones)
  k_TGFb_Tsec = 1.2e-10 MWDERIVEDUNIT_nanomole__cell__day;
  // TGFb degradation rate
  k_TGFb_deg = 14.3 MWDERIVEDUNIT_1__day;
  // Baseline TGFb level in PDAC tumor
  TGFb_baseline = 0.016 MWBUILTINPREFIX_nano_MWBUILTINUNIT_molarity;
  // Half-Maximal TGFb level for Th-to-Treg differentiation / M1-to-M2 polarization
  TGFb_50 = 0.07 MWBUILTINPREFIX_nano_MWBUILTINUNIT_molarity;
  // Half-Maximal TGFb level for CD8 T cell inhibition
  TGFb_50_Teff = 0.14 MWBUILTINPREFIX_nano_MWBUILTINUNIT_molarity;
  // Half-Maximal TGFb level for CD4 helper T cell exhaustion
  TGFb_50_Th_exh = 0.14 MWBUILTINPREFIX_nano_MWBUILTINUNIT_molarity;
  // Bioactive fraction of secreted TGFb
  f_active_TGFb = 0.1 dimensionless;
  // Number of Activated CD8+ T Cell Generations (see Rules)
  N_aT has dimensionless;
  // Number of Activated Treg Generations
  N_aT0 has dimensionless;
  // Number of Activated T Helper Cell Generations (see Rules)
  N_aTh has dimensionless;
  // Hill function of TGFb for Th-to-Treg differentiation / chemoresistance development / M1-to-M2 polarization
  H_TGFb has dimensionless;
  // Hill function of TGFb for Teff inhibition and chemoresistance development
  H_TGFb_Teff has dimensionless;
  // Hill function of TGFb for CD4 helper T cell exhaustion (PD-1+, dysfunction)
  H_TGFb_Th_exh has dimensionless;
  // Rate of naive CD4 activation into Tfh
  k_Tfh_act = 10 MWDERIVEDUNIT_1__day;
  // Marrow output of naive B cells to blood
  k_nB_in = 1000000 MWDERIVEDUNIT_cell__day;
  // Naive B activation rate (antigen + Tfh help)
  k_B_act = 5 MWDERIVEDUNIT_1__day;
  // Number of antigen-specific B cell clones (clonal expansion)
  n_B_clones = 120 dimensionless;
  // Activated B proliferation rate
  k_B_pro = 1 MWDERIVEDUNIT_1__day;
  // Mature B cell death rate
  k_B_death = 0.1 MWDERIVEDUNIT_1__day;
  // Tumor-local B -> plasma differentiation rate
  k_B_to_plasma = 0.5 MWDERIVEDUNIT_1__day;
  // Plasma cell death rate
  k_plasma_death = 0.1 MWDERIVEDUNIT_1__day;
  // Half-maximal LN Tfh number for B-cell help
  Tfh_50_B = 100000 MWUSERUNIT_cell;
  // rate of CCL2 secretion
  k_CCL2_sec = 2e-10 MWDERIVEDUNIT_nanomole__cell__day;
  // rate of CCL2 degradation
  k_CCL2_deg = 0.06 MWDERIVEDUNIT_1__hour;
  // Half-maximal CCL2 level of MDSC recruitment
  CCL2_50 = 0.23 MWBUILTINPREFIX_nano_MWBUILTINUNIT_molarity;
  // Rate of MDSC recruitment into the tumor
  k_MDSC_rec = 35000 MWDERIVEDUNIT_cell__milliliter_day;
  // Rate of MDSC death
  k_MDSC_death = 0.015 MWDERIVEDUNIT_1__day;
  // rate of NO degradation
  k_NO_deg = 135 MWDERIVEDUNIT_1__day;
  // rate of ArgI degradation
  k_ArgI_deg = 0.173 MWDERIVEDUNIT_1__day;
  // rate of NO secretion from MDSCs
  k_NO_sec = 4.8e-7 MWDERIVEDUNIT_nanomole__cell__day;
  // rate of ArgI secretion
  k_ArgI_sec = 1.1e-10 MWDERIVEDUNIT_nanomole__cell__day;
  // EC50 for ArgI-mediated T cell suppression
  ArgI_50_Teff = 50 MWBUILTINPREFIX_nano_MWBUILTINUNIT_molarity;
  // EC50 for NO-mediated T cell suppression
  NO_50_Teff = 1500 MWBUILTINPREFIX_nano_MWBUILTINUNIT_molarity;
  // Half-maximal ArgI level of Treg expansion
  ArgI_50_Treg = 0.36 MWBUILTINPREFIX_nano_MWBUILTINUNIT_molarity;
  // Hill function for NO-mediated inhibition on Teff
  H_NO has dimensionless;
  // Hill function for ariginase I-mediated inhibition on Teff
  H_ArgI_Teff has dimensionless;
  // Hill function for ariginase I-mediated Th-to-Treg transdifferentiation
  H_ArgI_Treg has dimensionless;
  // Combined MDSC suppression via NO (T cell dysfunction) and ArgI (arginine depletion)
  H_MDSC has dimensionless;
  // Hill function for IL-6 enhancement of MDSC recruitment
  H_IL6_MDSC has dimensionless;
  // Maximum elimination rate of nab-paclitaxel from V1
  Vmcl = 8070 MWDERIVEDUNIT_microgram__hour;
  // Nab-paclitaxel conc in V1 at 50% Vmcl
  Kcl = 40.2 MWDERIVEDUNIT_microgram__liter;
  // Intercompartmental clearance V1<->V3
  Q2 = 41.6 MWDERIVEDUNIT_liter__hour;
  // Maximum intercompartmental distribution rate V1<->V2
  Vmt = 325000 MWDERIVEDUNIT_microgram__hour;
  // Nab-paclitaxel conc in V1 at 50% Vmt
  Kt = 4260 MWDERIVEDUNIT_microgram__liter;
  // Body surface area
  BSA = 1.9 MWDERIVEDUNIT_meter___2;
  // Tumour:plasma concentration ratio of nab-paclitaxel
  r_nabp = 1.5 dimensionless;
  // Cancer cell killing rate by nab-paclitaxel
  k_C_nabp = 0.06 MWDERIVEDUNIT_1__hour;
  // Half-maximal nab-paclitaxel conc for cancer kill
  IC50_nabp = 92 MWBUILTINPREFIX_nano_MWBUILTINUNIT_molarity;
  // Molecular weight of nab-paclitaxel
  MW_nabp = 853.9 MWDERIVEDUNIT_gram__mole;
  // Half-maximal cancer cell number for cytotoxic drug diffusion
  Kc_nabp = 80000000 MWUSERUNIT_cell;
  // Nab-paclitaxel concentration in tumor (r_nabp x plasma / MW)
  Ct_nabp has MWBUILTINPREFIX_nano_MWBUILTINUNIT_molarity;
  // Fold-increase of cytotoxic IC50 in the resistant clone C2 (cross-drug)
  r_resist = 100 dimensionless;
  // Gemcitabine central volume (Jiang 2008)
  V_gem_1 = 15 MWBUILTINUNIT_liter;
  // Gemcitabine peripheral volume (Jiang 2008)
  V_gem_2 = 15 MWBUILTINUNIT_liter;
  // Gemcitabine intercompartmental clearance (Jiang 2008)
  Q_gem_2 = 42 MWDERIVEDUNIT_liter__hour;
  // Gemcitabine clearance (Jiang 2008)
  CL_gem = 162 MWDERIVEDUNIT_liter__hour;
  // Gemcitabine tumor:plasma penetration (nominal, calibrated)
  r_gem = 1 dimensionless;
  // Gemcitabine half-max kill conc (nominal, calibrated)
  IC50_gem = 10 MWDERIVEDUNIT_milligram__liter;
  // Gemcitabine max cancer-kill rate (nominal, calibrated)
  k_kill_gem = 1 MWDERIVEDUNIT_1__day;
  // Half-max cancer number for cytotoxic diffusion (nabP analog)
  Kc_gem = 80000000 MWUSERUNIT_cell;
  // gem concentration in tumor (r_gem x plasma)
  Ct_gem has MWDERIVEDUNIT_milligram__liter;
  // 5-FU distribution volume (Terret 2000)
  V_fu5_1 = 30 MWBUILTINUNIT_liter;
  // 5-FU DPD Vmax (Terret 2000)
  Vmax_fu5 = 1390 MWDERIVEDUNIT_milligram__hour;
  // 5-FU DPD Km (Terret 2000)
  Km_fu5 = 5.57 MWDERIVEDUNIT_milligram__liter;
  // 5-FU tumor:plasma penetration (nominal, calibrated)
  r_fu5 = 1 dimensionless;
  // 5-FU half-max kill conc (nominal, calibrated)
  IC50_fu5 = 2 MWDERIVEDUNIT_milligram__liter;
  // 5-FU max cancer-kill rate (nominal, calibrated)
  k_kill_fu5 = 1 MWDERIVEDUNIT_1__day;
  // Half-max cancer number for cytotoxic diffusion (nabP analog)
  Kc_fu5 = 80000000 MWUSERUNIT_cell;
  // fu5 concentration in tumor (r_fu5 x plasma)
  Ct_fu5 has MWDERIVEDUNIT_milligram__liter;
  // Oxaliplatin central volume (Nikanjam 2015)
  V_oxa_1 = 30 MWBUILTINUNIT_liter;
  // Oxaliplatin peripheral volume 2 (Nikanjam 2015)
  V_oxa_2 = 435 MWBUILTINUNIT_liter;
  // Oxaliplatin Q2 (Nikanjam 2015)
  Q_oxa_2 = 71 MWDERIVEDUNIT_liter__hour;
  // Oxaliplatin deep volume 3 (Nikanjam 2015)
  V_oxa_3 = 1183 MWBUILTINUNIT_liter;
  // Oxaliplatin Q3 (Nikanjam 2015)
  Q_oxa_3 = 5.3 MWDERIVEDUNIT_liter__hour;
  // Oxaliplatin total clearance (Nikanjam 2015)
  CL_oxa = 16 MWDERIVEDUNIT_liter__hour;
  // Oxaliplatin tumor:plasma penetration (nominal, calibrated)
  r_oxa = 1 dimensionless;
  // Oxaliplatin half-max kill conc (nominal, calibrated)
  IC50_oxa = 1 MWDERIVEDUNIT_milligram__liter;
  // Oxaliplatin max cancer-kill rate (nominal, calibrated)
  k_kill_oxa = 1 MWDERIVEDUNIT_1__day;
  // Half-max cancer number for cytotoxic diffusion (nabP analog)
  Kc_oxa = 80000000 MWUSERUNIT_cell;
  // oxa concentration in tumor (r_oxa x plasma)
  Ct_oxa has MWDERIVEDUNIT_milligram__liter;
  // Irinotecan central volume (Xie 2002)
  V_iri_1 = 40 MWBUILTINUNIT_liter;
  // Irinotecan peripheral volume (Xie 2002)
  V_iri_2 = 220 MWBUILTINUNIT_liter;
  // Irinotecan intercompartmental clearance (Xie 2002)
  Q_iri_2 = 40 MWDERIVEDUNIT_liter__hour;
  // Irinotecan clearance (Xie 2002)
  CL_iri = 31.6 MWDERIVEDUNIT_liter__hour;
  // SN-38 volume (Xie 2002, Fm=0.04)
  V_sn38_1 = 2880 MWBUILTINUNIT_liter;
  // SN-38 clearance (Xie 2002, Fm=0.04)
  CL_sn38 = 28.5 MWDERIVEDUNIT_liter__hour;
  // Fraction irinotecan converted to SN-38 (Xie 2002)
  Fm_iri = 0.04 dimensionless;
  // MW(SN-38 392.4)/MW(irinotecan 586.7) for mass->mass conversion
  MWr_sn38 = 0.6688 dimensionless;
  // SN-38 tumor:plasma penetration (nominal, calibrated)
  r_iri = 1 dimensionless;
  // SN-38 half-max kill conc (nominal, calibrated)
  IC50_iri = 0.02 MWDERIVEDUNIT_milligram__liter;
  // SN-38 max cancer-kill rate (nominal, calibrated)
  k_kill_iri = 1 MWDERIVEDUNIT_1__day;
  // Half-max cancer number for cytotoxic diffusion (nabP analog)
  Kc_iri = 80000000 MWUSERUNIT_cell;
  // sn38 concentration in tumor (r_iri x plasma)
  Ct_iri has MWDERIVEDUNIT_milligram__liter;
  // Recruitment rate of macrophage into tumor compartment
  k_Mac_rec = 450000 MWDERIVEDUNIT_cell__milliliter_day;
  // Death rate of macrophages into tumor compartment
  k_Mac_death = 0.05 MWDERIVEDUNIT_1__day;
  // Secretion rate of TGFb by macrophage in tumor compartment
  k_TGFb_Msec = 2e-11 MWDERIVEDUNIT_nanomole__cell__day;
  // Secretion rate of angiogenic factor by macrophage in tumor compartment
  k_vas_Msec = 0.05 MWDERIVEDUNIT_picogram__cell__day;
  // Secretion rate of IL-12 by mAPC in tumor compartment
  k_IL12_sec = 8.5e-12 MWDERIVEDUNIT_nanomole__cell__day;
  // Secretion rate of IL-12 by macrophage in tumor compartment
  k_IL12_Msec = 5e-13 MWDERIVEDUNIT_nanomole__cell__day;
  // Degradation rate of IL-12 in tumor compartment
  k_IL12_deg = 0.0231 MWDERIVEDUNIT_1__hour;
  // Secretion rate of IL-10 by macrophage in tumor compartment
  k_IL10_sec = 3e-12 MWDERIVEDUNIT_nanomole__cell__day;
  // Degradation rate of IL-10 in tumor compartment
  k_IL10_deg = 4 MWDERIVEDUNIT_1__day;
  // Rate of M1 to M2 macrophage polarization
  k_M2_pol = 0.1 MWDERIVEDUNIT_1__day;
  // Rate of M2 to M1 macrophage polarization
  k_M1_pol = 0.045 MWDERIVEDUNIT_1__day;
  // Half-maximal IL10 level for M1 to M2 polarization / maintaining Treg function / mAPC inhibition (*STAT6 related)
  IL10_50 = 8 MWBUILTINPREFIX_pico_MWBUILTINUNIT_molarity;
  // Half-maximal IL-12 level for M2 to M1 macrophage polarization
  IL12_50 = 15 MWBUILTINPREFIX_pico_MWBUILTINUNIT_molarity;
  // Linear slope of IFNg-driven M2 to M1 polarization in the sub-saturating regime (replaces IFNg_50 Hill)
  k_IFNg_response = 0.2 MWDERIVEDUNIT_1__picomolarity;
  // Rate of M1 macrophage-mediated killing of cancer cell
  k_M1_phago = 0.33 MWDERIVEDUNIT_1__day;
  // Volume of a single macrophage cell
  vol_Mcell = 4849.048 MWDERIVEDUNIT_micrometer___3__cell;
  // kon of CD47-SIRPa binding
  kon_CD47_SIRPa = 0.0625 MWDERIVEDUNIT_1__micromolarity_minute_nanometer;
  // koff of CD47-SIRPa binding
  koff_CD47_SIRPa = 0.3 MWDERIVEDUNIT_1__minute;
  // SIRPa occupancy for half-maximal CD47/SIRPa inhibition on phagocytosis of cancer cells by macrophages
  SIRPa_50 = 37 MWDERIVEDUNIT_molecule__micrometer___2;
  // Hill coefficient for CD47/SIRPa inhibition on phagocytosis of cancer cells by macrophages
  n_SIRPa = 2 dimensionless;
  // Hill function for overall checkpoint inhibition on phagocytosis of cancer cell by macrophage
  H_Mac_C has dimensionless;
  // Hill function for PD1-mediated inhibition on phagocytosis of cancer cell by macrophage
  H_PD1_M has dimensionless;
  // Hill function for SIRPa-mediated inhibition on phagocytosis of cancer cell by macrophage
  H_SIRPa has dimensionless;
  // CD47 expression on cancer cells
  C_CD47 = 400 MWDERIVEDUNIT_molecule__micrometer___2;
  // PD-1 expression on macrophages
  M_PD1_total = 12500 MWBUILTINUNIT_molecule;
  // SIRPa expression on macrophages
  M_SIRPa = 100 MWDERIVEDUNIT_molecule__micrometer___2;
  // Surface area of the macrophage
  A_Mcell = 1385.442 MWDERIVEDUNIT_micrometer___2;
  // Half-maximal IL-10 level for phagocytosis by macrophage
  IL10_50_phago = 270 MWBUILTINPREFIX_pico_MWBUILTINUNIT_molarity;
  // Association coefficient for macrophage and cancer cell
  K_M1_phago = 2 dimensionless;
  // Total number of macrophages
  M_total has MWUSERUNIT_cell;
  // Hill function for IL10-mediated M2-like macrophage polarization / Treg functionality / inhibition on Ag presentaion
  H_IL10 has dimensionless;
  // Hill function for IL10-mediated inhibition on phagocytosis
  H_IL10_phago has dimensionless;
  // Hill function for IL12
  H_IL12 has dimensionless;
  // Hill function for IL-6 promotion of M2 macrophage polarization
  H_IL6_M2 has dimensionless;
  // Rate of encountering resident PSCs as tumor expands into pancreas
  k_CAF_encounter = 1000000 MWDERIVEDUNIT_cell__milliliter_day;
  // Constitutive PSC density in pancreatic tissue
  k_CAF_const = 2000000 MWDERIVEDUNIT_cell__milliliter;
  // qPSC->myCAF activation rate (TGFb-driven)
  k_PSC_to_myCAF = 0.2 MWDERIVEDUNIT_1__day;
  // qPSC->iCAF activation rate (IL-1-driven)
  k_PSC_to_iCAF = 0.2 MWDERIVEDUNIT_1__day;
  // qPSC->apCAF activation rate (constitutive low)
  k_PSC_to_apCAF = 0.05 MWDERIVEDUNIT_1__day;
  // iCAF->myCAF interconversion (TGFb-driven)
  k_iCAF_to_myCAF = 0.1 MWDERIVEDUNIT_1__day;
  // myCAF->iCAF interconversion (IL-1-driven)
  k_myCAF_to_iCAF = 0.05 MWDERIVEDUNIT_1__day;
  // myCAF proliferation rate
  k_myCAF_prolif = 0.15 MWDERIVEDUNIT_1__day;
  // iCAF proliferation rate
  k_iCAF_prolif = 0.1 MWDERIVEDUNIT_1__day;
  // apCAF proliferation rate (lower than iCAF/myCAF)
  k_apCAF_prolif = 0.05 MWDERIVEDUNIT_1__day;
  // Max CAF:cancer ratio — total carrying-capacity budget partitioned across iCAF/myCAF/apCAF
  f_stroma_max = 2.43 dimensionless;
  // apCAF share of the total CAF carrying capacity. Default 0.1 from Elyada 2019 Fig 5D (apCAFs ~10% of PDAC CAFs). Free parameter in the stick-breaking simplex parameterization (paired with f_iCAF_of_non_apCAF).
  f_apCAF_of_total = 0.1 dimensionless;
  // iCAF share of the non-apCAF CAF mass (stick-breaking second step). Default 0.222 from Elyada 2019 Fig 5D — myCAF 0.7 + iCAF 0.2 of total → iCAF/(iCAF+myCAF) = 0.2/0.9 = 0.222. Free parameter in the stick-breaking simplex parameterization (paired with f_apCAF_of_total).
  f_iCAF_of_non_apCAF = 0.222 dimensionless;
  // Collagen secretion rate by myCAFs
  k_col_myCAF_sec = 5e-8 MWDERIVEDUNIT_milligram__cell_day;
  // Basal fraction of collagen secretion (TGFb-independent)
  f_col_basal = 0.15 dimensionless;
  // TGFb EC50 for CAF activation and interconversion
  TGFb_50_CAF_act = 0.07 MWBUILTINPREFIX_nano_MWBUILTINUNIT_molarity;
  // TGFb EC50 for collagen secretion
  TGFb_50_col_sec = 0.07 MWBUILTINPREFIX_nano_MWBUILTINUNIT_molarity;
  // Constitutive collagen degradation rate
  k_col_deg = 0.007 MWDERIVEDUNIT_1__day;
  // M2 macrophage MMP-mediated collagen degradation
  k_MMP_M2 = 1e-8 MWDERIVEDUNIT_milliliter__cell_day;
  // Collagen volume fraction at 50% MMP-susceptibility (LOX-crosslinking shield)
  phi_cross_50 = 0.03 dimensionless;
  // Fraction of collagen susceptible to M2 MMP degradation (non-crosslinked)
  f_nascent has dimensionless;
  // Collagen packing density (material constant)
  rho_collagen = 0.103 MWDERIVEDUNIT_gram__milliliter;
  // Collagen volume fraction (0-1). Bare-volume normalized; primary input for all ECM Hill functions.
  phi_collagen has dimensionless;
  // Death rate of quiescent PSCs
  k_qpsc_death = 0.005 MWDERIVEDUNIT_1__day;
  // Death rate of iCAFs
  k_iCAF_death = 0.05 MWDERIVEDUNIT_1__day;
  // Death rate of myCAFs
  k_myCAF_death = 0.015 MWDERIVEDUNIT_1__day;
  // Death rate of apCAFs
  k_apCAF_death = 0.03 MWDERIVEDUNIT_1__day;
  // Reference pore size in normal pancreas (Wolf 2013)
  d_pore_ref = 3.5 MWBUILTINPREFIX_micro_MWBUILTINUNIT_meter;
  // Collagen volume fraction in normal pancreas (reference)
  phi_col_ref = 0.046 dimensionless;
  // Critical pore diameter for T cell migration arrest (Wolf 2013)
  d_crit_T = 2.3 MWBUILTINPREFIX_micro_MWBUILTINUNIT_meter;
  // Critical pore diameter for APC migration arrest (podosome/MMP migration)
  d_crit_APC = 2.1 MWBUILTINPREFIX_micro_MWBUILTINUNIT_meter;
  // Hill coefficient for pore-size exclusion sharpness
  n_pore = 4 dimensionless;
  // Pore size between collagen fibers (decreases with density)
  d_pore has MWBUILTINPREFIX_micro_MWBUILTINUNIT_meter;
  // Pore-size-based T cell exclusion. 1=fully excluded, 0=free migration.
  H_pore_T has dimensionless;
  // Pore-size-based APC exclusion. DCs more deformable than T cells.
  H_pore_APC has dimensionless;
  // Reference stiffness at phi_col_ref (~1 kPa, dimensionless)
  E_ref = 1 dimensionless;
  // Power law exponent for stiffness-collagen relationship
  n_stiff = 1.8 dimensionless;
  // Half-max stiffness for T cell exhaustion
  E_50_Texh = 4 dimensionless;
  // Hill coefficient for stiffness-mediated T cell exhaustion
  n_Texh = 1 dimensionless;
  // Half-max stiffness for fibroblast mechanotransduction
  E_50_fib = 5 dimensionless;
  // Hill coefficient for stiffness-mediated fibroblast activation
  n_fib = 1 dimensionless;
  // Tissue stiffness (kPa-scaled, dimensionless). Power law of collagen density.
  stiffness has dimensionless;
  // Stiffness-mediated T cell exhaustion (chronic mechanosensing, PD-L1)
  H_stiff_Texh has dimensionless;
  // Stiffness-mediated fibroblast activation (YAP/TAZ mechanotransduction)
  H_stiff_fib has dimensionless;
  // phi_collagen for 50% carrying capacity reduction. >1 = ECM barrier never reaches half-max, consistent with stroma-depletion worsening PDAC (Rhim 2014, Ozdemir 2014).
  phi_col_50_Kmax = 2 dimensionless;
  // Max CAF population sustained by stiff ECM alone (mechanotransduction niche via YAP/TAZ). Allows fibrotic scar persistence post-therapy.
  K_stiff_niche = 100000 MWUSERUNIT_cell;
  // Absolute ceiling on the cancer carrying capacity C_max. Without it C_max is strictly proportional to burden - the CAF capacity is f_stroma_max*C_total, so aPSC_total/C_total locks at ~1.85 and C_max/C_total at ~1.83 - which makes log(C_max/C_total) a constant and the Gompertz law exponential with no plateau. Stable disease then requires kill to exactly cancel exponential growth, a knife-edge: 11.9% of prior draws vs 39.1% of PASS-01 patients (results/2026-07-28_curve_taxonomy). Applied as a smooth saturation C_max = raw/(1 + raw/C_max_cap) rather than a min() so the RHS stays differentiable for the analytic Jacobian. Default 1e13 cell is far above any reachable burden, so the model is unchanged until this is sampled.
  C_max_cap = 1e13 MWUSERUNIT_cell;
  // Stromal contribution to cancer carrying capacity. Joint submodel posterior median 1.05 (sigma 0.70) from Xu 2010 + Hwang 2008 (orthotopic dose-response). Hwang 1:5 vs 1:1 tumor mass scaling supports a small per-CAF contribution to cancer C_max.
  k_stroma_support = 1.05 dimensionless;
  // Volume of quiescent PSC
  vol_qPSCcell = 1500 MWDERIVEDUNIT_micrometer___3__cell;
  // Volume of iCAF
  vol_iCAFcell = 2000 MWDERIVEDUNIT_micrometer___3__cell;
  // Volume of myCAF
  vol_myCAFcell = 3500 MWDERIVEDUNIT_micrometer___3__cell;
  // Volume of apCAF
  vol_apCAFcell = 2500 MWDERIVEDUNIT_micrometer___3__cell;
  // CXCL12 secretion rate by iCAFs
  k_CXCL12_sec_iCAF = 1e-10 MWDERIVEDUNIT_nanomolarity_liter__cell_day;
  // CXCL12 degradation rate
  k_CXCL12_deg = 2 MWDERIVEDUNIT_1__day;
  // EC50 for CXCL12-mediated T cell exclusion
  CXCL12_50_Texcl = 2 MWBUILTINPREFIX_nano_MWBUILTINUNIT_molarity;
  // IL-6 secretion rate by iCAFs
  k_IL6_sec_iCAF = 2e-11 MWDERIVEDUNIT_nanomolarity_liter__cell_day;
  // IL-6 degradation rate
  k_IL6_deg = 16 MWDERIVEDUNIT_1__day;
  // EC50 for IL-6 enhancement of MDSC recruitment
  IL6_50_MDSC = 0.015 MWBUILTINPREFIX_nano_MWBUILTINUNIT_molarity;
  // EC50 for IL-6 promotion of M2 polarization
  IL6_50_M2 = 0.015 MWBUILTINPREFIX_nano_MWBUILTINUNIT_molarity;
  // EC50 for IL-6 autocrine feedback promoting iCAF phenotype
  IL6_50_iCAF = 0.015 MWBUILTINPREFIX_nano_MWBUILTINUNIT_molarity;
  // Fold-enhancement of iCAF formation by IL-6 feedback
  f_IL6_iCAF = 3 dimensionless;
  // Hill function for IL-6 autocrine feedback on iCAF phenotype
  H_IL6_iCAF has dimensionless;
  // IL-1alpha secretion rate by cancer cells
  k_IL1_sec = 1e-12 MWDERIVEDUNIT_nanomole__cell_day;
  // IL-1alpha degradation rate
  k_IL1_deg = 6.93 MWDERIVEDUNIT_1__day;
  // Basal EC50 for IL-1-driven iCAF formation
  IL1_50 = 0.01 MWBUILTINPREFIX_nano_MWBUILTINUNIT_molarity;
  // Hill coefficient for IL-1-driven iCAF formation
  n_IL1 = 1 dimensionless;
  // TGFb EC50 for IL-1R1 downregulation
  TGFb_50_IL1R1 = 0.07 MWBUILTINPREFIX_nano_MWBUILTINUNIT_molarity;
  // Max fold-shift of IL-1 EC50 by TGFb-driven IL-1R1 repression
  Emax_IL1R1 = 5 dimensionless;
  // Dimensionless IL-1 ratio: IL1 / effective EC50
  IL1_ratio has dimensionless;
  // Effective IL-1 Hill function. TGFb antagonizes by increasing effective EC50 via IL-1R1 repression (saturating).
  H_IL1_eff has dimensionless;
  // Angiogenic factor secretion rate by myCAFs
  k_vas_myCAF_sec = 0.002 MWDERIVEDUNIT_picogram__cell_day;
  // Antigen uptake rate by apCAFs
  k_P1_up_apCAF = 1.44 MWDERIVEDUNIT_1__cell_day;
  // Max Th->Treg conversion rate via apCAF
  k_apCAF_Treg = 0.03 MWDERIVEDUNIT_1__day;
  // Half-max apCAF count for Treg induction saturation
  K_apCAF_Treg = 100000000 MWUSERUNIT_cell;
  // EC50 for antigen-dependent Treg induction by apCAFs
  P1_50_apCAF = 1e-9 MWBUILTINUNIT_molarity;
  // Total activated PSC count (iCAF+myCAF+apCAF). Backward compatibility for test statistics.
  aPSC_total has MWUSERUNIT_cell;
  // TGF-β secretion rate by myCAFs
  k_TGFb_sec_myCAF = 2e-10 MWDERIVEDUNIT_nanomolarity_liter__cell_day;
  // CXCL12 secretion rate by tumor cells
  k_CXCL12_sec_cancer = 5e-11 MWDERIVEDUNIT_nanomolarity_liter__cell_day;
  // CCL5 secretion rate by iCAFs
  k_CCL5_sec_iCAF = 3e-11 MWDERIVEDUNIT_nanomole__cell__day;
  // Hill function for antigen-dependent apCAF Treg induction
  H_P1_apCAF has dimensionless;
  // GVAX cell clearance rate from tumor
  k_GVAX_clearance = 0.1 MWDERIVEDUNIT_1__day;
  // Volume of intradermal injection site (~0.1 mL)
  V_ID_volume = 0.0001 MWBUILTINUNIT_liter;
  // GM-CSF production rate per GVAX cell per day
  k_GMCSF_prod = 1e-8 MWDERIVEDUNIT_nanomolarity__cell__day;
  // GM-CSF degradation/clearance rate (half-life ~3 hours)
  k_GMCSF_deg = 5 MWDERIVEDUNIT_1__day;
  // APC recruitment rate to intradermal injection site
  k_APC_recruit_ID = 100000 MWDERIVEDUNIT_cell__day;
  // EC50 for GM-CSF-mediated APC recruitment and maturation
  EC50_GMCSF = 0.00294005 MWBUILTINPREFIX_nano_MWBUILTINUNIT_molarity;
  // APC maturation rate at injection site
  k_APC_mature_ID = 2.72806 MWDERIVEDUNIT_1__day;
  // APC migration rate from injection site to lymph nodes
  k_APC_mig_ID_LN = 0.7 MWDERIVEDUNIT_1__day;
  // APC death rate at injection site
  k_APC_death_ID = 0.1 MWDERIVEDUNIT_1__day;
  // Antigen consumed per APC maturation event at injection site
  sigma_P1_per_mAPC = 1e-9 MWDERIVEDUNIT_nanomole__cell;
  // EC50 for antigen-dependent APC maturation. Lowered from 10 nM to 0.1 nM on 2026-04-21 (Fix 3): with the 10 nM value, V_ID.P1_GVAX (~0.009 nM steady state) produced a Hill factor of ~0.0009 in J_mature_ID, so GVAX-derived antigen was never a meaningful contributor to APC maturation — maturation proceeded almost entirely via the GMCSF + baseline APC terms. 0.1 nM is an estimated value in the nanomolar-affinity range typical of peptide/antigen-receptor interactions; not anchored to a specific primary source. Candidate for submodel-target extraction.
  EC50_P1_mature = 0.1 MWBUILTINPREFIX_nano_MWBUILTINUNIT_molarity;
  K_APC_ID = 1000000 MWUSERUNIT_cell;
  k_APC_recruit0 = 100 MWDERIVEDUNIT_cell__day;
  k_mAPC_death_ID = 0.7 MWDERIVEDUNIT_1__day;
  y_Ag_per_cell = 1e-9 MWDERIVEDUNIT_nanomole__cell;
  k_P1_deg_ID = 10 MWDERIVEDUNIT_1__day;
  K_APC_mig = 100000 MWUSERUNIT_cell;
  // Antigen-transfer rate constant: migratory mcDC2 -> resident cDC1 cross-licensing (Ferris 2022 PMID: 35648641; Mueller 2017 Eur J Immunol)
  k_cDC1_Ag_transfer = 1e-7 MWDERIVEDUNIT_1__cell_day;
  H_GMCSF_ID has dimensionless;
  J_mature_ID has MWDERIVEDUNIT_cell__day;
  // Cyclophosphamide clearance rate
  k_Cy_clear = 2.5 MWDERIVEDUNIT_1__day;
  // Maximum Treg depletion rate by cyclophosphamide
  k_Cy_Treg_deplete = 0.15 MWDERIVEDUNIT_1__day;
  // Cyclophosphamide concentration for 50% Treg depletion
  Cy_50_Treg = 50 MWBUILTINPREFIX_milli_MWBUILTINUNIT_gram;
  // Aggregate chemo drug effect on tumor [0,1] (complement-product of per-drug Emax)
  E_chemo has dimensionless;
  // Drug-selected C1->C2 resistance-acquisition rate per unit E_chemo
  k_resist = 0.0001 MWDERIVEDUNIT_1__day;
  // CA19-9 secretion rate per live cancer cell (patient-level)
  k_ca199_sec = 0.001 MWDERIVEDUNIT_picogram__cell__day;
  // CA19-9 shedding rate from the dying/dead cancer-cell pool (V_T.C_x)
  k_ca199_shed = 0.001 MWDERIVEDUNIT_picogram__cell__day;
  // CA19-9 serum first-order elimination rate
  k_ca199_clear = 0.5 MWDERIVEDUNIT_1__day;
  // Damage accumulation rate per unit E_chemo. FIXED at 1/day and deliberately not sampled: it is exactly degenerate with k_sec_suppress (both scale the suppression), so sampling both would be unidentifiable. k_dmg_rep carries the timescale, k_sec_suppress the strength.
  k_dmg_acc = 1 MWDERIVEDUNIT_1__day;
  // Damage repair/reversal rate; sets how long chemo exposure is remembered (0.05/day is a ~14-day half-life). Steady-state damage is k_dmg_acc*mean(E_chemo)/k_dmg_rep, so a slower repair means deeper sustained CA19-9 suppression for the same drug exposure.
  k_dmg_rep = 0.05 MWDERIVEDUNIT_1__day;
  // CA19-9 secretion-suppression strength under aggregate chemo drug effect
  k_sec_suppress = 5 dimensionless;
  // Per-cell CA19-9 secretion of resistant clone C2 relative to C1
  f_ca199_C2 = 10 dimensionless;
  // All nucleated cells in V_T (cancer + immune + CAFs). Used as the denominator for _pct_ calibration targets matching mIHC "% of all nucleated cells" measurements.
  nucleated_total_T has MWUSERUNIT_cell;

  // Assignment rules:
  V_T := V_Tmin + ((C_x + C_total)*vol_cell + (CD8_exh + Th_exh + T_total)*vol_Tcell + M_total*vol_Mcell + qPSC*vol_qPSCcell + iCAF*vol_iCAFcell + myCAF*vol_myCAFcell + apCAF*vol_apCAFcell)/Ve_T + collagen/rho_collagen;
  C_total := 0*cell + C1 + C2;
  T_total := 0*cell + Treg_V_T + CD8_V_T + Th_V_T + Tfh_V_T;
  T_total_LN := 0*cell + Treg_V_LN + CD8_V_LN + Th_V_LN + Tfh_V_LN;
  R_Tcell := 0*cell/day + (k_C1_death + k_C1_therapy)*C1 + k_C_Tcell_eff*C1 + k_M1_phago*C1*Mac_M1/(Mac_M1 + K_M1_phago*C_total + cell)*(1 - H_Mac_C)*(1 - H_IL10_phago);
  k_C1_therapy := 0/day;
  // PDAC carrying capacity: vasculature + stromal support - ECM barrier
  C_max := (K + k_stroma_support*aPSC_total)*(1 - phi_collagen/(phi_collagen + phi_col_50_Kmax))/(1 + (K + k_stroma_support*aPSC_total)*(1 - phi_collagen/(phi_collagen + phi_col_50_Kmax))/C_max_cap);
  k_C2_therapy := 0/day;
  Tregs := Treg_V_T;
  H_CCL5_Treg := CCL5/(CCL5 + CCL5_50_Treg);
  K_T_Treg := 1/R50_Treg;
  k_C_Tcell_eff := p_T_kill_per_contact*v_T_search_volume*CD8_V_T/V_T/cell*(1 - H_pore_T)*CD8_V_T/(CD8_V_T + K_T_Treg*Tregs + cell)*(1 - H_PD1_C1)*(1 - H_TGFb_Teff);
  H_DAMP := R_Tcell/(R_Tcell + DAMP_50);
  H_TGFb_APC := TGFb/(TGFb + TGFb_50_APC);
  APC_total_T := cDC1_V_T + cDC2_V_T;
  mAPC_total_T := mcDC1_V_T + mcDC2_V_T;
  mAPC_total_LN := mcDC1_V_LN + mcDC2_V_LN;
  H_APC_Treg := n_sites_APC*mcDC2_V_LN/(n_sites_APC*mcDC2_V_LN + nCD4_V_LN*n_CD4_clones + cell);
  H_mAPC := n_sites_APC*mcDC1_V_LN/(n_sites_APC*mcDC1_V_LN + nCD8_V_LN*n_CD8_clones + cell);
  H_APC_Th := n_sites_APC*mcDC2_V_LN/(n_sites_APC*mcDC2_V_LN + nCD4_V_LN*n_CD4_clones + cell);
  pTCR_p0_MHC_tot := k_M1p0_TCR_off/(k_M1p0_TCR_off + phi_M1p0_TCR)*(k_M1p0_TCR_p/(k_M1p0_TCR_off + k_M1p0_TCR_p))^N_M1p0_TCR*0.5*(M1p0_A_s/n_CD4_clones + TCR_p0_tot + k_M1p0_TCR_off/k_M1p0_TCR_on - TCR_p0_tot*sqrt(max(((M1p0_A_s/n_CD4_clones + TCR_p0_tot + k_M1p0_TCR_off/k_M1p0_TCR_on)/TCR_p0_tot)^2 - 4*M1p0_A_s/n_CD4_clones/TCR_p0_tot, 0)));
  H_P0 := pTCR_p0_MHC_tot/(pTCR_p0_MHC_tot + p0_50);
  pTCR_p1_MHC_tot := k_M1p1_TCR_off/(k_M1p1_TCR_off + phi_M1p1_TCR)*(k_M1p1_TCR_p/(k_M1p1_TCR_off + k_M1p1_TCR_p))^N_M1p1_TCR*0.5*(M1p1_A_s/n_CD8_clones + TCR_p1_tot + k_M1p1_TCR_off/k_M1p1_TCR_on - TCR_p1_tot*sqrt(max(((M1p1_A_s/n_CD8_clones + TCR_p1_tot + k_M1p1_TCR_off/k_M1p1_TCR_on)/TCR_p1_tot)^2 - 4*M1p1_A_s/n_CD8_clones/TCR_p1_tot, 0)));
  H_P1 := pTCR_p1_MHC_tot/(pTCR_p1_MHC_tot + p1_50);
  syn_CD8_C1_PDL1_total := PDL1_syn_CD8_C1 + PD1_PDL1_syn_CD8_C1 + PDL1_aPDL1_syn_CD8_C1 + 2*PDL1_aPDL1_PDL1_syn_CD8_C1 + PDL1_CD80_syn_CD8_C1 + PDL1_CD80_CD28_syn_CD8_C1 + PDL1_CD80_CTLA4_syn_CD8_C1;
  syn_CD8_C1_PDL2_total := PD1_PDL2_syn_CD8_C1 + PDL2_syn_CD8_C1;
  H_PD1_C1 := ((PD1_PDL1_syn_CD8_C1 + PD1_PDL2_syn_CD8_C1)/PD1_50)^n_PD1/(((PD1_PDL1_syn_CD8_C1 + PD1_PDL2_syn_CD8_C1)/PD1_50)^n_PD1 + 1);
  H_CD28_C1 := ((CD28_CD80_syn_CD8_C1 + CD28_CD86_syn_CD8_C1 + 2*CD28_CD80_CD28_syn_CD8_C1 + PDL1_CD80_CD28_syn_CD8_C1)/CD28_CD8X_50)^n_CD28_CD8X/(((CD28_CD80_syn_CD8_C1 + CD28_CD86_syn_CD8_C1 + 2*CD28_CD80_CD28_syn_CD8_C1 + PDL1_CD80_CD28_syn_CD8_C1)/CD28_CD8X_50)^n_CD28_CD8X + 1);
  syn_CD8_APC_PDL1_total := PDL1_syn_CD8_APC + PD1_PDL1_syn_CD8_APC + PDL1_aPDL1_syn_CD8_APC + 2*PDL1_aPDL1_PDL1_syn_CD8_APC + PDL1_CD80_syn_CD8_APC + PDL1_CD80_CD28_syn_CD8_APC + PDL1_CD80_CTLA4_syn_CD8_APC;
  syn_CD8_APC_PDL2_total := PD1_PDL2_syn_CD8_APC + PDL2_syn_CD8_APC;
  H_PD1_APC := ((PD1_PDL1_syn_CD8_APC + PD1_PDL2_syn_CD8_APC)/PD1_50)^n_PD1/(((PD1_PDL1_syn_CD8_APC + PD1_PDL2_syn_CD8_APC)/PD1_50)^n_PD1 + 1);
  H_CD28_APC := ((CD28_CD80_syn_CD8_APC + CD28_CD86_syn_CD8_APC + 2*CD28_CD80_CD28_syn_CD8_APC + PDL1_CD80_CD28_syn_CD8_APC)/CD28_CD8X_50)^n_CD28_CD8X/(((CD28_CD80_syn_CD8_APC + CD28_CD86_syn_CD8_APC + 2*CD28_CD80_CD28_syn_CD8_APC + PDL1_CD80_CD28_syn_CD8_APC)/CD28_CD8X_50)^n_CD28_CD8X + 1);
  N_aT := N_div_base + N_div_costim*H_CD28_APC + N_IL2_CD8*IL2/(IL2_50 + IL2);
  N_aT0 := N_div_base + N_div_costim*H_CD28_APC + N_IL2_CD4*IL2/(IL2_50 + IL2);
  N_aTh := N_div_base + N_div_costim*H_CD28_APC + N_IL2_CD4*IL2/(IL2_50 + IL2);
  H_TGFb := TGFb/(TGFb + TGFb_50);
  H_TGFb_Teff := TGFb/(TGFb + TGFb_50_Teff);
  H_TGFb_Th_exh := TGFb/(TGFb + TGFb_50_Th_exh);
  H_NO := NO/(NO_50_Teff + NO);
  H_ArgI_Teff := ArgI/(ArgI_50_Teff + ArgI);
  H_ArgI_Treg := ArgI/(ArgI_50_Treg + ArgI);
  H_MDSC := 1 - (1 - H_NO)*(1 - H_ArgI_Teff);
  Ct_nabp := r_nabp*NabP_V_1/MW_nabp;
  Ct_gem := r_gem*gem_C_gem;
  Ct_fu5 := r_fu5*fu5;
  Ct_oxa := r_oxa*oxa_C_oxa;
  Ct_iri := r_iri*sn38;
  PDL1_total := PDL1_syn_M_C + PD1_PDL1_syn_M_C + PDL1_aPDL1_syn_M_C + 2*PDL1_aPDL1_PDL1_syn_M_C + PDL1_CD80_syn_M_C;
  PDL2_total := PD1_PDL2_syn_M_C + PDL2_syn_M_C;
  H_SIRPa := (CD47_SIRPa/SIRPa_50)^n_SIRPa/((CD47_SIRPa/SIRPa_50)^n_SIRPa + 1);
  H_PD1_M := ((PD1_PDL1_syn_M_C + PD1_PDL2_syn_M_C)/PD1_50)^n_PD1/(((PD1_PDL1_syn_M_C + PD1_PDL2_syn_M_C)/PD1_50)^n_PD1 + 1);
  H_Mac_C := 1 - (1 - H_SIRPa)*(1 - H_PD1_M);
  M_total := Mac_M1 + Mac_M2;
  H_IL10 := IL10/(IL10_50 + IL10);
  H_IL10_phago := IL10/(IL10_50_phago + IL10);
  H_IL12 := IL12/(IL12_50 + IL12);
  f_nascent := phi_cross_50/(phi_cross_50 + phi_collagen);
  phi_collagen := collagen/rho_collagen/(collagen/rho_collagen + ((C_x + C_total)*vol_cell + (CD8_exh + Th_exh + T_total)*vol_Tcell + M_total*vol_Mcell + qPSC*vol_qPSCcell + iCAF*vol_iCAFcell + myCAF*vol_myCAFcell + apCAF*vol_apCAFcell)/Ve_T + V_Tmin);
  d_pore := d_pore_ref*(phi_col_ref/(phi_collagen + 1e-6))^0.5;
  H_pore_T := 1/(1 + (d_pore/d_crit_T)^n_pore);
  H_pore_APC := 1/(1 + (d_pore/d_crit_APC)^n_pore);
  stiffness := E_ref*(phi_collagen/phi_col_ref)^n_stiff;
  H_stiff_Texh := stiffness^n_Texh/(E_50_Texh^n_Texh + stiffness^n_Texh);
  H_stiff_fib := stiffness^n_fib/(E_50_fib^n_fib + stiffness^n_fib);
  IL1_ratio := IL1/(IL1_50*(1 + Emax_IL1R1*TGFb/(TGFb_50_IL1R1 + TGFb)));
  H_IL1_eff := IL1_ratio^n_IL1/(1 + IL1_ratio^n_IL1);
  H_P1_apCAF := P1_V_T/(P1_V_T + P1_50_apCAF);
  H_CXCL12_Texcl := CXCL12/(CXCL12_50_Texcl + CXCL12);
  H_IL6_MDSC := IL6/(IL6_50_MDSC + IL6);
  H_IL6_M2 := IL6/(IL6_50_M2 + IL6);
  H_IL6_iCAF := IL6/(IL6_50_iCAF + IL6);
  aPSC_total := iCAF + myCAF + apCAF;
  H_GMCSF_ID := GMCSF/V_ID/(EC50_GMCSF + GMCSF/V_ID);
  J_mature_ID := k_APC_mature_ID*H_GMCSF_ID*APC*(P1_GVAX/V_ID)/(P1_GVAX/V_ID + EC50_P1_mature);
  E_chemo := 1 - (1 - Ct_nabp/(Ct_nabp + IC50_nabp))*(1 - Ct_gem/(Ct_gem + IC50_gem))*(1 - Ct_oxa/(Ct_oxa + IC50_oxa))*(1 - Ct_iri/(Ct_iri + IC50_iri))*(1 - Ct_fu5/(Ct_fu5 + IC50_fu5));
  k_C2_growth := k_C1_growth;
  k_C2_death := k_C1_death;
  nucleated_total_T := C1 + C2 + C_x + CD8_V_T + CD8_exh + Th_V_T + Th_exh + Treg_V_T + Tfh_V_T + B_V_T + Plasma + Mac_M1 + Mac_M2 + MDSC + cDC1_V_T + cDC2_V_T + mcDC1_V_T + mcDC2_V_T + qPSC + iCAF + myCAF + apCAF;

  // Reactions:
  // Clearance of dead cancer cells from tumor
  Reaction_1: C_x => ; k_cell_clear*C_x;
  // Clearance of exhausted CD8 T cells from tumor
  Reaction_2: CD8_exh => ; k_cell_clear*CD8_exh;
  // Clearance of exhausted CD4 T cells from tumor
  Reaction_3: Th_exh => ; k_cell_clear*Th_exh;
  // Tumor cell growth
  Reaction_4: => C1; k_C1_growth*C1*ln(max(C_max/(C_total + cell), 1));
  // Tumor cell death
  Reaction_5: C1 => C_x; k_C1_death*C1;
  // VEGF secretion by cancer cells
  Reaction_6: => VEGF; k_vas_Csec*C_total;
  // VEGF degradation
  Reaction_7: VEGF => ; k_vas_deg*VEGF*V_T;
  // Vascular growth
  Reaction_8: => K; k_vas_growth*C_total*VEGF/(VEGF + VEGF_50);
  // Vascular inhibition
  Reaction_9: K => ; k_vas_decay*K*(max(C_total, 0)/cell*2.57e-6)^(2/3);
  // Tumor cell growth
  Reaction_10: => C2; k_C2_growth*C2*ln(max(C_max/(C_total + cell), 1));
  // Tumor cell death
  Reaction_11: C2 => C_x; k_C2_death*C2;
  // Thymic output of naive T cell to blood
  Reaction_12: => nCD4_V_C; Q_nCD4_thym/div_Treg;
  // Naive T cell proliferation in the peripheral compartment
  Reaction_13: => nCD4_V_P; k_nCD4_pro/div_Treg*nCD4_V_P/(K_nTreg_pro/div_Treg + nCD4_V_P);
  // Naive T cell proliferation in the TDLN compartment
  Reaction_14: => nCD4_V_LN; k_nCD4_pro/div_Treg*nCD4_V_LN/(K_nTreg_pro/div_Treg + nCD4_V_LN);
  // Naive T cell death in the peripheral compartment
  Reaction_15: nCD4_V_P => ; k_nTreg_death*nCD4_V_P;
  // Naive T cell death in the central compartment
  Reaction_16: nCD4_V_C => ; k_nTreg_death*nCD4_V_C;
  // Naive T cell death in the TDLN compartment
  Reaction_17: nCD4_V_LN => ; k_nTreg_death*nCD4_V_LN;
  // Naive T cell entry into the peripheral compartment
  Reaction_18: nCD4_V_C => nCD4_V_P; q_nCD4_P_in*nCD4_V_C;
  // Naive T cell exit from the peripheral compartment
  Reaction_19: nCD4_V_P => nCD4_V_C; q_nCD4_P_out*nCD4_V_P;
  // Naive T cell entry into the lymph node
  Reaction_20: nCD4_V_C => nCD4_V_LN; q_nCD4_LN_in*nCD4_V_C;
  // Naive T cell exit from the lymph node
  Reaction_21: nCD4_V_LN => nCD4_V_C; q_nCD4_LN_out*nCD4_V_LN;
  // Naive T cell activation (antigen-dependent)
  Reaction_22: nCD4_V_LN => ; (1 - f_nTreg)*k_Treg_act*H_APC_Treg*H_P0*nCD4_V_LN;
  // Naive T cell activation (antigen-dependent)
  Reaction_23: => aTreg; (1 - f_nTreg)*k_Treg_act*H_APC_Treg*H_P0*nCD4_V_LN*n_CD4_clones;
  // Constitutive Treg activation (antigen-independent)
  Reaction_24: nCD4_V_LN => ; f_nTreg*k_Treg_act*H_APC_Treg*nCD4_V_LN;
  // Constitutive Treg activation (antigen-independent)
  Reaction_25: => aTreg; f_nTreg*k_Treg_act*H_APC_Treg*nCD4_V_LN*n_CD4_clones;
  // aTreg cell proliferation
  Reaction_26: aTreg => ; k_Treg_pro*aTreg;
  // aTreg cell proliferation
  Reaction_27: => Treg_V_LN; k_Treg_pro*aTreg;
  // T cell death in the central compartment
  Reaction_28: Treg_V_C => ; k_Treg_death*Treg_V_C;
  // T cell death in the peripheral compartment
  Reaction_29: Treg_V_P => ; k_Treg_death*Treg_V_P;
  // T cell death in the lymph node compartment
  Reaction_30: Treg_V_LN => ; k_Treg_death*Treg_V_LN;
  // T cell death in the tumor compartment
  Reaction_31: Treg_V_T => ; k_Treg_death*Treg_V_T;
  // Induced Treg clearance upon antigen clearance (nTregs persist)
  Reaction_32: Treg_V_T => ; (1 - f_nTreg)*k_cell_clear*Treg_V_T*(K_C2_recruit/(C_total^2 + K_C2_recruit));
  // Tumor-local Treg proliferation, logistic on baseline carrying capacity rho_Treg_max*V_T. The apCAF-driven additive cap (rho_Treg_apCAF_extra*H_apCAF) was retired 2026-05-01 after a counterfactual SBI showed the data prefers it off (Treg fits improve, cd4_helper drops out of LIKELY_MISSPECIFIED, D²_post/D²_prior improves). Direct Th→Treg conversion via apCAF (k_apCAF_Treg, in fibroblast_module_enhanced) remains as the residual apCAF→Treg coupling.
  Reaction_33: => Treg_V_T; k_Treg_pro_tumor*Treg_V_T*(1 - Treg_V_T/(rho_Treg_max*V_T + cell));
  // T cell transport into the peripheral compartment
  Reaction_34: Treg_V_C => Treg_V_P; q_Treg_P_in*Treg_V_C;
  // T cell transport out of the peripheral compartment
  Reaction_35: Treg_V_P => Treg_V_C; q_Treg_P_out*Treg_V_P;
  // T cell transport into the tumor compartment
  Reaction_36: Treg_V_C => Treg_V_T; q_Treg_T_in*V_T*Treg_V_C*(C_total^2/(C_total^2 + K_C2_recruit));
  // T cell transport out of the lymph node compartment
  Reaction_37: Treg_V_LN => Treg_V_C; q_Treg_LN_out*Treg_V_LN;
  // CCL5 secretion by PDAC cancer cells (FOXP3-driven)
  Reaction_38: => CCL5; k_CCL5_sec*C_total;
  // CCL5 degradation in tumor compartment
  Reaction_39: CCL5 => ; k_CCL5_deg*CCL5*V_T;
  // CCR5-dependent Treg recruitment to tumor (CCL5-mediated, selective for Tregs)
  Reaction_40: Treg_V_C => Treg_V_T; k_CCR5_Treg_rec*V_T*Treg_V_C*H_CCL5_Treg;
  // Thymic output of naive T cell to blood
  Reaction_41: => nCD8_V_C; Q_nCD8_thym/div_CD8;
  // Naive T cell proliferation in the peripheral compartment
  Reaction_42: => nCD8_V_P; k_nCD8_pro/div_CD8*nCD8_V_P/(K_nCD8_pro/div_CD8 + nCD8_V_P);
  // Naive T cell proliferation in the TDLN compartment
  Reaction_43: => nCD8_V_LN; k_nCD8_pro/div_CD8*nCD8_V_LN/(K_nCD8_pro/div_CD8 + nCD8_V_LN);
  // Naive T cell death in the peripheral compartment
  Reaction_44: nCD8_V_P => ; k_nCD8_death*nCD8_V_P;
  // Naive T cell death in the central compartment
  Reaction_45: nCD8_V_C => ; k_nCD8_death*nCD8_V_C;
  // Naive T cell death in the TDLN compartment
  Reaction_46: nCD8_V_LN => ; k_nCD8_death*nCD8_V_LN;
  // Naive T cell entry into the peripheral compartment
  Reaction_47: nCD8_V_C => nCD8_V_P; q_nCD8_P_in*nCD8_V_C;
  // Naive T cell exit from the peripheral compartment
  Reaction_48: nCD8_V_P => nCD8_V_C; q_nCD8_P_out*nCD8_V_P;
  // Naive T cell entry into the lymph node
  Reaction_49: nCD8_V_C => nCD8_V_LN; q_nCD8_LN_in*nCD8_V_C;
  // Naive T cell exit from the lymph node
  Reaction_50: nCD8_V_LN => nCD8_V_C; q_nCD8_LN_out*nCD8_V_LN;
  // Naive CD8 T cell activation by mature cDC1 (cross-presentation)
  Reaction_51: nCD8_V_LN => ; k_T_activation_per_APC*mcDC1_V_LN*H_P1*nCD8_V_LN;
  // Clonal expansion of activated T cells (mechanistic formulation)
  Reaction_52: => aCD8; k_T_activation_per_APC*mcDC1_V_LN*H_P1*nCD8_V_LN*n_T_expansion_burst*n_CD8_clones;
  // aCD8 cell proliferation
  Reaction_53: aCD8 => ; k_CD8_pro/N_aT*aCD8;
  // aCD8 cell proliferation
  Reaction_54: => CD8_V_LN; k_CD8_pro/N_aT*2^N_aT*aCD8;
  // T cell death in the central compartment
  Reaction_55: CD8_V_C => ; k_CD8_death*CD8_V_C;
  // T cell death in the peripheral compartment
  Reaction_56: CD8_V_P => ; k_CD8_death*CD8_V_P;
  // T cell death in the lymph node compartment
  Reaction_57: CD8_V_LN => ; k_CD8_death*CD8_V_LN;
  // T cell death in the tumor compartment
  Reaction_58: CD8_V_T => ; k_CD8_death*CD8_V_T;
  // Tumor-local CD8 proliferation (antigen-gated, carrying-cap)
  Reaction_59: => CD8_V_T; k_CD8_T_pro*CD8_V_T*H_P1*(1 - CD8_V_T/(rho_CD8_max*V_T + cell));
  // Baseline T cell exhaustion from chronic antigen exposure (PDL1-indep; gated by 1-H_PD1_C1 to avoid double-counting with route 4 below)
  Reaction_60: CD8_V_T => CD8_exh; k_CD8_basal_exh*CD8_V_T*C_total/(C_total + K_C_exh + cell)*(1 - H_PD1_C1);
  // T cell clearance upon antigen clearance
  Reaction_61: CD8_V_T => CD8_exh; k_cell_clear*CD8_V_T*(K_C2_recruit/(C_total^2 + K_C2_recruit));
  // T cell exhaustion from Tregs
  Reaction_62: CD8_V_T => CD8_exh; k_Treg_CD8_exh*CD8_V_T*Tregs/(CD8_V_T + Tregs + cell)*H_IL10;
  // T cell exhaustion from cancer (PD-1 mediated)
  Reaction_63: CD8_V_T => CD8_exh; k_C_CD8_exh*CD8_V_T*C_total/(C_total + CD8_V_T + cell)*H_PD1_C1;
  // T cell exhaustion from ECM
  Reaction_64: CD8_V_T => CD8_exh; k_stiff_CD8_exh*CD8_V_T*H_stiff_Texh;
  // Death of exhausted CD8 T cells
  Reaction_65: CD8_exh => ; k_CD8_exh_death*CD8_exh;
  // T cell transport into the peripheral compartment
  Reaction_66: CD8_V_C => CD8_V_P; q_CD8_P_in*CD8_V_C;
  // T cell transport out of the peripheral compartment
  Reaction_67: CD8_V_P => CD8_V_C; q_CD8_P_out*CD8_V_P;
  // T cell transport into the tumor compartment (reduced by CXCL12-mediated exclusion)
  Reaction_68: CD8_V_C => CD8_V_T; q_CD8_T_in*V_T*CD8_V_C*(C_total^2/(C_total^2 + K_C2_recruit))*(1 - H_CXCL12_Texcl);
  // T cell transport out of the lymph node compartment
  Reaction_69: CD8_V_LN => CD8_V_C; q_CD8_LN_out*CD8_V_LN;
  // Cancer cell killing by T cells
  Reaction_70: C1 => C_x; k_C_Tcell_eff*C1*(1 - H_MDSC);
  // cDC1 recruitment into tumor (ECM-impeded)
  Reaction_71: => cDC1_V_T; k_APC_death*cDC1_recruit_target_T*V_T*(1 - H_pore_APC);
  // cDC1 death/turnover in tumor
  Reaction_72: cDC1_V_T => ; k_APC_death*cDC1_V_T;
  // cDC1 recruitment/death in LN
  Reaction_73: => cDC1_V_LN; k_APC_death*(APC0_cDC1_LN*V_LN - cDC1_V_LN);
  // cDC1 maturation in tumor (DAMP+IL12 driven, IL10+TGFb inhibited)
  Reaction_74: cDC1_V_T => mcDC1_V_T; k_APC_mat_cDC1*cDC1_V_T*(1 - (1 - H_DAMP)*(1 - H_IL12))*(1 - H_IL10)*(1 - H_TGFb_APC);
  // mcDC1 migration to lymph node (ECM-impeded)
  Reaction_75: mcDC1_V_T => mcDC1_V_LN; k_APC_mig*mcDC1_V_T*(1 - H_pore_APC);
  // mcDC1 death in lymph node
  Reaction_76: mcDC1_V_LN => ; k_mAPC_death*mcDC1_V_LN;
  // cDC2 recruitment into tumor (ECM-impeded)
  Reaction_77: => cDC2_V_T; k_APC_death*cDC2_recruit_target_T*V_T*(1 - H_pore_APC);
  // cDC2 death/turnover in tumor
  Reaction_78: cDC2_V_T => ; k_APC_death*cDC2_V_T;
  // cDC2 recruitment/death in LN
  Reaction_79: => cDC2_V_LN; k_APC_death*(APC0_cDC2_LN*V_LN - cDC2_V_LN);
  // cDC2 maturation in tumor (DAMP+IL12 driven, IL10+TGFb inhibited)
  Reaction_80: cDC2_V_T => mcDC2_V_T; k_APC_mat_cDC2*cDC2_V_T*(1 - (1 - H_DAMP)*(1 - H_IL12))*(1 - H_IL10)*(1 - H_TGFb_APC);
  // mcDC2 migration to lymph node (ECM-impeded)
  Reaction_81: mcDC2_V_T => mcDC2_V_LN; k_APC_mig*mcDC2_V_T*(1 - H_pore_APC);
  // mcDC2 death in lymph node
  Reaction_82: mcDC2_V_LN => ; k_mAPC_death*mcDC2_V_LN;
  // MHC translocation
  Reaction_83: M1_A_e => M1_A_s; kout*M1_A_e*A_e - kin*M1_A_s*A_s;
  // Antigen deposition from dying cancer cells
  Reaction_84: => P0_V_T; n_CD4_clones*(P0_C1*(k_C1_death + k_C1_therapy)*C1 + P0_C1*k_C_Tcell_eff*C1);
  // Free antigen degradation
  Reaction_85: P0_V_T => ; k_xP0_deg*P0_V_T*V_T;
  // Antigen uptake by all DC subtypes (cDC1+cDC2)
  Reaction_86: P0_V_T => ; k_P0_up*APC_total_T*P0_V_T*V_T;
  // Antigen uptake by mature antigen presenting cells
  Reaction_87: => P0_V_e; k_P0_up*cell*P0_V_T*V_e;
  // Antigen degradation in APC endosomes
  Reaction_88: P0_V_e => p0; k_P0_deg*P0_V_e*V_e;
  // Epitope degradation in APC endosomes
  Reaction_89: p0 => ; k_p0_deg*p0*V_e;
  // Antigen-MHC binding in endosome
  Reaction_90: p0 + M1_A_e => M1p0_A_e; k_P0_on*p0*M1_A_e*A_e;
  // Antigen-MHC unbinding in endosome
  Reaction_91: M1p0_A_e => p0 + M1_A_e; k_P0_d1*k_P0_on*M1p0_A_e*A_e;
  // Antigen-MHC unbinding on APC surface
  Reaction_92: M1p0_A_s => M1_A_s; k_P0_d1*k_P0_on*M1p0_A_s*A_s;
  // Antigen-MHC translocation
  Reaction_93: M1p0_A_e => M1p0_A_s; kout*M1p0_A_e*A_e;
  // Antigen deposition from dying cancer cells
  Reaction_94: => P1_V_T; n_CD8_clones*(P1_C1*(k_C1_death + k_C1_therapy)*C1 + P1_C1*k_C_Tcell_eff*C1);
  // Free antigen degradation
  Reaction_95: P1_V_T => ; k_xP1_deg*P1_V_T*V_T;
  // Antigen uptake by all DC subtypes (cDC1+cDC2)
  Reaction_96: P1_V_T => ; k_P1_up*APC_total_T*P1_V_T*V_T;
  // Antigen uptake by mature antigen presenting cells
  Reaction_97: => P1_V_e; k_P1_up*cell*P1_V_T*V_e;
  // Antigen degradation in APC endosomes
  Reaction_98: P1_V_e => p1; k_P1_deg*P1_V_e*V_e;
  // Epitope degradation in APC endosomes
  Reaction_99: p1 => ; k_p1_deg*p1*V_e;
  // Antigen-MHC binding in endosome
  Reaction_100: p1 + M1_A_e => M1p1_A_e; k_P1_on*p1*M1_A_e*A_e;
  // Antigen-MHC unbinding in endosome
  Reaction_101: M1p1_A_e => p1 + M1_A_e; k_P1_d1*k_P1_on*M1p1_A_e*A_e;
  // Antigen-MHC unbinding on APC surface
  Reaction_102: M1p1_A_s => M1_A_s; k_P1_d1*k_P1_on*M1p1_A_s*A_s;
  // Antigen-MHC translocation
  Reaction_103: M1p1_A_e => M1p1_A_s; kout*M1p1_A_e*A_e;
  // aPD1 diffusive transport to peripheral compartment
  Reaction_104: aPD1_V_C -> aPD1_V_P; q_P_aPD1*(aPD1_V_C/gamma_C_aPD1 - aPD1_V_P/gamma_P_aPD1);
  // aPD1 diffusive transport to tumor compartment
  Reaction_105: aPD1_V_C -> aPD1_V_T; q_T_aPD1*(aPD1_V_C/gamma_C_aPD1 - aPD1_V_T/gamma_T_aPD1);
  // aPD1 diffusive transport to lymph node compartment
  Reaction_106: aPD1_V_C -> aPD1_V_LN; q_LN_aPD1*(aPD1_V_C/gamma_C_aPD1 - aPD1_V_LN/gamma_LN_aPD1);
  // aPD1 convective transport from tumor to lymph node
  Reaction_107: aPD1_V_T => aPD1_V_LN; q_LD_aPD1*V_T*aPD1_V_T/gamma_T_aPD1;
  // aPD1 convective transport from lymph node to central
  Reaction_108: aPD1_V_LN => aPD1_V_C; q_LD_aPD1*V_T*aPD1_V_LN/gamma_LN_aPD1;
  // Drug clearance from central compartment
  Reaction_109: aPD1_V_C => ; k_cl_aPD1*aPD1_V_C;
  // aPDL1 diffusive transport to peripheral compartment
  Reaction_110: aPDL1_V_C -> aPDL1_V_P; q_P_aPDL1*(aPDL1_V_C/gamma_C_aPDL1 - aPDL1_V_P/gamma_P_aPDL1);
  // aPDL1 diffusive transport to tumor compartment
  Reaction_111: aPDL1_V_C -> aPDL1_V_T; q_T_aPDL1*(aPDL1_V_C/gamma_C_aPDL1 - aPDL1_V_T/gamma_T_aPDL1);
  // aPDL1 diffusive transport to lymph node compartment
  Reaction_112: aPDL1_V_C -> aPDL1_V_LN; q_LN_aPDL1*(aPDL1_V_C/gamma_C_aPDL1 - aPDL1_V_LN/gamma_LN_aPDL1);
  // aPDL1 convective transport from tumor to lymph node
  Reaction_113: aPDL1_V_T => aPDL1_V_LN; q_LD_aPDL1*V_T*aPDL1_V_T/gamma_T_aPDL1;
  // aPDL1 convective transport from lymph node to central
  Reaction_114: aPDL1_V_LN => aPDL1_V_C; q_LD_aPDL1*V_T*aPDL1_V_LN/gamma_LN_aPDL1;
  // Drug clearance from central compartment
  Reaction_115: aPDL1_V_C => ; k_cl_aPDL1*aPDL1_V_C;
  // Nonlinear clearance of aPDL1 from central compartment
  Reaction_116: aPDL1_V_C => ; k_cln_aPDL1*aPDL1_V_C/(aPDL1_V_C + Kc_aPDL1);
  // aCTLA4 diffusive transport to peripheral compartment
  Reaction_117: aCTLA4_V_C -> aCTLA4_V_P; q_P_aCTLA4*(aCTLA4_V_C/gamma_C_aCTLA4 - aCTLA4_V_P/gamma_P_aCTLA4);
  // aCTLA4 diffusive transport to tumor compartment
  Reaction_118: aCTLA4_V_C -> aCTLA4_V_T; q_T_aCTLA4*(aCTLA4_V_C/gamma_C_aCTLA4 - aCTLA4_V_T/gamma_T_aCTLA4);
  // aCTLA4 diffusive transport to lymph node compartment
  Reaction_119: aCTLA4_V_C -> aCTLA4_V_LN; q_LN_aCTLA4*(aCTLA4_V_C/gamma_C_aCTLA4 - aCTLA4_V_LN/gamma_LN_aCTLA4);
  // aCTLA4 convective transport from tumor to lymph node
  Reaction_120: aCTLA4_V_T => aCTLA4_V_LN; q_LD_aCTLA4*V_T*aCTLA4_V_T/gamma_T_aCTLA4;
  // aCTLA4 convective transport from lymph node to central
  Reaction_121: aCTLA4_V_LN => aCTLA4_V_C; q_LD_aCTLA4*V_T*aCTLA4_V_LN/gamma_LN_aCTLA4;
  // Drug clearance from central compartment
  Reaction_122: aCTLA4_V_C => ; k_cl_aCTLA4*aCTLA4_V_C;
  // Translocation of PDL1 between cell surface and cytoplasm
  Reaction_123: => PDL1_syn_CD8_C1; k_out_PDL1*IFNg/(IFNg + IFNg_50_ind)*(1 - syn_CD8_C1_PDL1_total/(C1_PDL1_base*r_PDL1_IFNg/A_cell));
  // Translocation of PDL2 between cell surface and cytoplasm
  Reaction_124: => PDL2_syn_CD8_C1; k_out_PDL1*r_PDL2C1*IFNg/(IFNg + IFNg_50_ind)*(1 - syn_CD8_C1_PDL2_total/(C1_PDL1_base*r_PDL1_IFNg/A_cell*r_PDL2C1));
  // Translocation of PDL1 between cell surface and cytoplasm
  Reaction_125: => PDL1_syn_CD8_C1; k_in_PDL1*(C1_PDL1_base/A_cell - syn_CD8_C1_PDL1_total)*syn_CD8_C1;
  // Translocation of PDL2 between cell surface and cytoplasm
  Reaction_126: => PDL2_syn_CD8_C1; k_in_PDL1*(C1_PDL1_base/A_cell*r_PDL2C1 - syn_CD8_C1_PDL2_total)*syn_CD8_C1;
  // binding and unbinding of PD1 PDL1 in synapse
  Reaction_127: PD1_syn_CD8_C1 + PDL1_syn_CD8_C1 -> PD1_PDL1_syn_CD8_C1; (kon_PD1_PDL1*PD1_syn_CD8_C1*PDL1_syn_CD8_C1 - koff_PD1_PDL1*PD1_PDL1_syn_CD8_C1)*syn_CD8_C1;
  // binding and unbinding of PD1 PDL2 in synapse
  Reaction_128: PD1_syn_CD8_C1 + PDL2_syn_CD8_C1 -> PD1_PDL2_syn_CD8_C1; (kon_PD1_PDL2*PD1_syn_CD8_C1*PDL2_syn_CD8_C1 - koff_PD1_PDL2*PD1_PDL2_syn_CD8_C1)*syn_CD8_C1;
  // binding and unbinding of PD1 to aPD1 on CD8 surface in synapse
  Reaction_129: PD1_syn_CD8_C1 -> PD1_aPD1_syn_CD8_C1; (2*kon_PD1_aPD1*(PD1_syn_CD8_C1*aPD1_V_T/gamma_T_aPD1) - koff_PD1_aPD1*PD1_aPD1_syn_CD8_C1)*syn_CD8_C1;
  // binding and unbinding of PD1 to PD1-aPD1 on CD8 surface in synapse
  Reaction_130: PD1_aPD1_syn_CD8_C1 + PD1_syn_CD8_C1 -> PD1_aPD1_PD1_syn_CD8_C1; (Chi_PD1_aPD1*kon_PD1_aPD1*PD1_syn_CD8_C1*PD1_aPD1_syn_CD8_C1 - 2*koff_PD1_aPD1*PD1_aPD1_PD1_syn_CD8_C1)*syn_CD8_C1;
  // binding and unbinding of PDL1 to aPDL1 on C1 surface in synapse
  Reaction_131: PDL1_syn_CD8_C1 -> PDL1_aPDL1_syn_CD8_C1; (2*kon_PDL1_aPDL1*(PDL1_syn_CD8_C1*aPDL1_V_T/gamma_T_aPDL1) - koff_PDL1_aPDL1*PDL1_aPDL1_syn_CD8_C1)*syn_CD8_C1;
  // binding and unbinding of PDL1 to PDL1-aPDL1 on C1 surface in synapse
  Reaction_132: PDL1_aPDL1_syn_CD8_C1 + PDL1_syn_CD8_C1 -> PDL1_aPDL1_PDL1_syn_CD8_C1; (Chi_PDL1_aPDL1*kon_PDL1_aPDL1*PDL1_syn_CD8_C1*PDL1_aPDL1_syn_CD8_C1 - 2*koff_PDL1_aPDL1*PDL1_aPDL1_PDL1_syn_CD8_C1)*syn_CD8_C1;
  // binding and unbinding of CD28 and CD80 in synapse
  Reaction_133: CD28_syn_CD8_C1 + CD80_syn_CD8_C1 -> CD28_CD80_syn_CD8_C1; (2*kon_CD28_CD80*CD28_syn_CD8_C1*CD80_syn_CD8_C1 - koff_CD28_CD80*CD28_CD80_syn_CD8_C1)*syn_CD8_C1;
  // binding and unbinding of CD28-CD80 and CD28 in synapse
  Reaction_134: CD28_CD80_syn_CD8_C1 + CD28_syn_CD8_C1 -> CD28_CD80_CD28_syn_CD8_C1; (kon_CD28_CD80*CD28_syn_CD8_C1*CD28_CD80_syn_CD8_C1 - 2*koff_CD28_CD80*CD28_CD80_CD28_syn_CD8_C1)*syn_CD8_C1;
  // binding and unbinding of CD28 and CD86 in synapse
  Reaction_135: CD28_syn_CD8_C1 + CD86_syn_CD8_C1 -> CD28_CD86_syn_CD8_C1; (kon_CD28_CD86*CD28_syn_CD8_C1*CD86_syn_CD8_C1 - koff_CD28_CD86*CD28_CD86_syn_CD8_C1)*syn_CD8_C1;
  // binding and unbinding of CTLA4 and CD80 in synapse
  Reaction_136: CTLA4_syn_CD8_C1 + CD80_syn_CD8_C1 -> CD80_CTLA4_syn_CD8_C1; (4*kon_CTLA4_CD80*CTLA4_syn_CD8_C1*CD80_syn_CD8_C1 - koff_CTLA4_CD80*CD80_CTLA4_syn_CD8_C1)*syn_CD8_C1;
  // binding and unbinding of CTLA4 and CD80-CTLA4 in synapse
  Reaction_137: CTLA4_syn_CD8_C1 + CD80_CTLA4_syn_CD8_C1 -> CTLA4_CD80_CTLA4_syn_CD8_C1; (2*kon_CTLA4_CD80*CTLA4_syn_CD8_C1*CD80_CTLA4_syn_CD8_C1 - 2*koff_CTLA4_CD80*CTLA4_CD80_CTLA4_syn_CD8_C1)*syn_CD8_C1;
  // binding and unbinding of CD80 and CTLA4-CD80-CTLA4 in synapse
  Reaction_138: CD80_syn_CD8_C1 + CTLA4_CD80_CTLA4_syn_CD8_C1 -> CD80_CTLA4_CD80_CTLA4_syn_CD8_C1; (4*kon_CTLA4_CD80*CD80_syn_CD8_C1*CTLA4_CD80_CTLA4_syn_CD8_C1 - koff_CTLA4_CD80*CD80_CTLA4_CD80_CTLA4_syn_CD8_C1)*syn_CD8_C1;
  // binding and unbinding of CD80-CTLA4 and CD80 in synapse
  Reaction_139: CD80_CTLA4_syn_CD8_C1 + CD80_syn_CD8_C1 -> CD80_CTLA4_CD80_syn_CD8_C1; (2*kon_CTLA4_CD80*CD80_CTLA4_syn_CD8_C1*CD80_syn_CD8_C1 - 2*koff_CTLA4_CD80*CD80_CTLA4_CD80_syn_CD8_C1)*syn_CD8_C1;
  // binding and unbinding of CTLA4 and CD80-CTLA4-CD80 in synapse
  Reaction_140: CTLA4_syn_CD8_C1 + CD80_CTLA4_CD80_syn_CD8_C1 -> CD80_CTLA4_CD80_CTLA4_syn_CD8_C1; (4*kon_CTLA4_CD80*CTLA4_syn_CD8_C1*CD80_CTLA4_CD80_syn_CD8_C1 - koff_CTLA4_CD80*CD80_CTLA4_CD80_CTLA4_syn_CD8_C1)*syn_CD8_C1;
  // binding and unbinding of CTLA4 and CD86 in synapse
  Reaction_141: CTLA4_syn_CD8_C1 + CD86_syn_CD8_C1 -> CD86_CTLA4_syn_CD8_C1; (2*kon_CTLA4_CD86*CTLA4_syn_CD8_C1*CD86_syn_CD8_C1 - koff_CTLA4_CD86*CD86_CTLA4_syn_CD8_C1)*syn_CD8_C1;
  // binding and unbinding of CD86-CTLA4 and CD86 in synapse
  Reaction_142: CD86_CTLA4_syn_CD8_C1 + CD86_syn_CD8_C1 -> CD86_CTLA4_CD86_syn_CD8_C1; (kon_CTLA4_CD86*CD86_CTLA4_syn_CD8_C1*CD86_syn_CD8_C1 - 2*koff_CTLA4_CD86*CD86_CTLA4_CD86_syn_CD8_C1)*syn_CD8_C1;
  // binding and unbinding of CTLA4 to aCTLA4 on CD8 surface in synapse
  Reaction_143: CTLA4_syn_CD8_C1 -> CTLA4_aCTLA4_syn_CD8_C1; (4*kon_CTLA4_aCTLA4*(CTLA4_syn_CD8_C1*aCTLA4_V_T/gamma_T_aCTLA4) - koff_CTLA4_aCTLA4*CTLA4_aCTLA4_syn_CD8_C1)*syn_CD8_C1;
  // binding and unbinding of CTLA4 to aCTLA4 on CD8 surface in synapse
  Reaction_144: CTLA4_aCTLA4_syn_CD8_C1 + CTLA4_syn_CD8_C1 -> CTLA4_aCTLA4_CTLA4_syn_CD8_C1; (2*Chi_CTLA4_aCTLA4*kon_CTLA4_aCTLA4*CTLA4_syn_CD8_C1*CTLA4_aCTLA4_syn_CD8_C1 - 2*koff_CTLA4_aCTLA4*CTLA4_aCTLA4_CTLA4_syn_CD8_C1)*syn_CD8_C1;
  // self-association and dissociation of CD80 monomers in synapse
  Reaction_145: CD80m_syn_CD8_C1 + CD80m_syn_CD8_C1 -> CD80_syn_CD8_C1; (kon_CD80_CD80*CD80m_syn_CD8_C1*CD80m_syn_CD8_C1 - koff_CD80_CD80*CD80_syn_CD8_C1)*syn_CD8_C1;
  // binding and unbinding of CD80 and PDL1 in synapse
  Reaction_146: CD80m_syn_CD8_C1 + PDL1_syn_CD8_C1 -> PDL1_CD80_syn_CD8_C1; (kon_CD80_PDL1*CD80m_syn_CD8_C1*PDL1_syn_CD8_C1 - koff_CD80_PDL1*PDL1_CD80_syn_CD8_C1)*syn_CD8_C1;
  // binding and unbinding of PDL1-CD80 and CD28 in synapse
  Reaction_147: PDL1_CD80_syn_CD8_C1 + CD28_syn_CD8_C1 -> PDL1_CD80_CD28_syn_CD8_C1; (kon_CD28_CD80*PDL1_CD80_syn_CD8_C1*CD28_syn_CD8_C1 - koff_CD28_CD80*PDL1_CD80_CD28_syn_CD8_C1)*syn_CD8_C1;
  // binding and unbinding of PDL1-CD80 and CTLA4 in synapse
  Reaction_148: PDL1_CD80_syn_CD8_C1 + CTLA4_syn_CD8_C1 -> PDL1_CD80_CTLA4_syn_CD8_C1; (2*kon_CTLA4_CD80*PDL1_CD80_syn_CD8_C1*CTLA4_syn_CD8_C1 - koff_CTLA4_CD80*PDL1_CD80_CTLA4_syn_CD8_C1)*syn_CD8_C1;
  // binding and unbinding of PDL1 to aPDL1 on C1 surface in synapse
  Reaction_149: TPDL1_syn_CD8_C1 -> TPDL1_aPDL1_syn_CD8_C1; (2*kon_PDL1_aPDL1*(TPDL1_syn_CD8_C1*aPDL1_V_T/gamma_T_aPDL1) - koff_PDL1_aPDL1*TPDL1_aPDL1_syn_CD8_C1)*syn_CD8_C1;
  // binding and unbinding of PDL1 to PDL1-aPDL1 on C1 surface in synapse
  Reaction_150: TPDL1_aPDL1_syn_CD8_C1 + TPDL1_syn_CD8_C1 -> TPDL1_aPDL1_TPDL1_syn_CD8_C1; (Chi_PDL1_aPDL1*kon_PDL1_aPDL1*TPDL1_syn_CD8_C1*TPDL1_aPDL1_syn_CD8_C1 - 2*koff_PDL1_aPDL1*TPDL1_aPDL1_TPDL1_syn_CD8_C1)*syn_CD8_C1;
  // Translocation of PDL1 between cell surface and cytoplasm
  Reaction_151: => PDL1_syn_CD8_APC; k_out_PDL1*IFNg/(IFNg + IFNg_50_ind)*(1 - syn_CD8_APC_PDL1_total/(APC_PDL1_base*r_PDL1_IFNg/A_cell));
  // Translocation of PDL2 between cell surface and cytoplasm
  Reaction_152: => PDL2_syn_CD8_APC; k_out_PDL1*r_PDL2APC*IFNg/(IFNg + IFNg_50_ind)*(1 - syn_CD8_APC_PDL2_total/(APC_PDL1_base*r_PDL1_IFNg/A_cell*r_PDL2APC));
  // Translocation of PDL1 between cell surface and cytoplasm
  Reaction_153: => PDL1_syn_CD8_APC; k_in_PDL1*(APC_PDL1_base/A_cell - syn_CD8_APC_PDL1_total)*syn_CD8_APC;
  // Translocation of PDL2 between cell surface and cytoplasm
  Reaction_154: => PDL2_syn_CD8_APC; k_in_PDL1*(APC_PDL1_base/A_cell*r_PDL2APC - syn_CD8_APC_PDL2_total)*syn_CD8_APC;
  // binding and unbinding of PD1 PDL1 in synapse
  Reaction_155: PD1_syn_CD8_APC + PDL1_syn_CD8_APC -> PD1_PDL1_syn_CD8_APC; (kon_PD1_PDL1*PD1_syn_CD8_APC*PDL1_syn_CD8_APC - koff_PD1_PDL1*PD1_PDL1_syn_CD8_APC)*syn_CD8_APC;
  // binding and unbinding of PD1 PDL2 in synapse
  Reaction_156: PD1_syn_CD8_APC + PDL2_syn_CD8_APC -> PD1_PDL2_syn_CD8_APC; (kon_PD1_PDL2*PD1_syn_CD8_APC*PDL2_syn_CD8_APC - koff_PD1_PDL2*PD1_PDL2_syn_CD8_APC)*syn_CD8_APC;
  // binding and unbinding of PD1 to aPD1 on CD8 surface in synapse
  Reaction_157: PD1_syn_CD8_APC -> PD1_aPD1_syn_CD8_APC; (2*kon_PD1_aPD1*(PD1_syn_CD8_APC*aPD1_V_LN/gamma_LN_aPD1) - koff_PD1_aPD1*PD1_aPD1_syn_CD8_APC)*syn_CD8_APC;
  // binding and unbinding of PD1 to PD1-aPD1 on CD8 surface in synapse
  Reaction_158: PD1_aPD1_syn_CD8_APC + PD1_syn_CD8_APC -> PD1_aPD1_PD1_syn_CD8_APC; (Chi_PD1_aPD1*kon_PD1_aPD1*PD1_syn_CD8_APC*PD1_aPD1_syn_CD8_APC - 2*koff_PD1_aPD1*PD1_aPD1_PD1_syn_CD8_APC)*syn_CD8_APC;
  // binding and unbinding of PDL1 to aPDL1 on APC surface in synapse
  Reaction_159: PDL1_syn_CD8_APC -> PDL1_aPDL1_syn_CD8_APC; (2*kon_PDL1_aPDL1*(PDL1_syn_CD8_APC*aPDL1_V_LN/gamma_LN_aPDL1) - koff_PDL1_aPDL1*PDL1_aPDL1_syn_CD8_APC)*syn_CD8_APC;
  // binding and unbinding of PDL1 to PDL1-aPDL1 on APC surface in synapse
  Reaction_160: PDL1_aPDL1_syn_CD8_APC + PDL1_syn_CD8_APC -> PDL1_aPDL1_PDL1_syn_CD8_APC; (Chi_PDL1_aPDL1*kon_PDL1_aPDL1*PDL1_syn_CD8_APC*PDL1_aPDL1_syn_CD8_APC - 2*koff_PDL1_aPDL1*PDL1_aPDL1_PDL1_syn_CD8_APC)*syn_CD8_APC;
  // binding and unbinding of CD28 and CD80 in synapse
  Reaction_161: CD28_syn_CD8_APC + CD80_syn_CD8_APC -> CD28_CD80_syn_CD8_APC; (2*kon_CD28_CD80*CD28_syn_CD8_APC*CD80_syn_CD8_APC - koff_CD28_CD80*CD28_CD80_syn_CD8_APC)*syn_CD8_APC;
  // binding and unbinding of CD28-CD80 and CD28 in synapse
  Reaction_162: CD28_CD80_syn_CD8_APC + CD28_syn_CD8_APC -> CD28_CD80_CD28_syn_CD8_APC; (kon_CD28_CD80*CD28_syn_CD8_APC*CD28_CD80_syn_CD8_APC - 2*koff_CD28_CD80*CD28_CD80_CD28_syn_CD8_APC)*syn_CD8_APC;
  // binding and unbinding of CD28 and CD86 in synapse
  Reaction_163: CD28_syn_CD8_APC + CD86_syn_CD8_APC -> CD28_CD86_syn_CD8_APC; (kon_CD28_CD86*CD28_syn_CD8_APC*CD86_syn_CD8_APC - koff_CD28_CD86*CD28_CD86_syn_CD8_APC)*syn_CD8_APC;
  // binding and unbinding of CTLA4 and CD80 in synapse
  Reaction_164: CTLA4_syn_CD8_APC + CD80_syn_CD8_APC -> CD80_CTLA4_syn_CD8_APC; (4*kon_CTLA4_CD80*CTLA4_syn_CD8_APC*CD80_syn_CD8_APC - koff_CTLA4_CD80*CD80_CTLA4_syn_CD8_APC)*syn_CD8_APC;
  // binding and unbinding of CTLA4 and CD80-CTLA4 in synapse
  Reaction_165: CTLA4_syn_CD8_APC + CD80_CTLA4_syn_CD8_APC -> CTLA4_CD80_CTLA4_syn_CD8_APC; (2*kon_CTLA4_CD80*CTLA4_syn_CD8_APC*CD80_CTLA4_syn_CD8_APC - 2*koff_CTLA4_CD80*CTLA4_CD80_CTLA4_syn_CD8_APC)*syn_CD8_APC;
  // binding and unbinding of CD80 and CTLA4-CD80-CTLA4 in synapse
  Reaction_166: CD80_syn_CD8_APC + CTLA4_CD80_CTLA4_syn_CD8_APC -> CD80_CTLA4_CD80_CTLA4_syn_CD8_APC; (4*kon_CTLA4_CD80*CD80_syn_CD8_APC*CTLA4_CD80_CTLA4_syn_CD8_APC - koff_CTLA4_CD80*CD80_CTLA4_CD80_CTLA4_syn_CD8_APC)*syn_CD8_APC;
  // binding and unbinding of CD80-CTLA4 and CD80 in synapse
  Reaction_167: CD80_CTLA4_syn_CD8_APC + CD80_syn_CD8_APC -> CD80_CTLA4_CD80_syn_CD8_APC; (2*kon_CTLA4_CD80*CD80_CTLA4_syn_CD8_APC*CD80_syn_CD8_APC - 2*koff_CTLA4_CD80*CD80_CTLA4_CD80_syn_CD8_APC)*syn_CD8_APC;
  // binding and unbinding of CTLA4 and CD80-CTLA4-CD80 in synapse
  Reaction_168: CTLA4_syn_CD8_APC + CD80_CTLA4_CD80_syn_CD8_APC -> CD80_CTLA4_CD80_CTLA4_syn_CD8_APC; (4*kon_CTLA4_CD80*CTLA4_syn_CD8_APC*CD80_CTLA4_CD80_syn_CD8_APC - koff_CTLA4_CD80*CD80_CTLA4_CD80_CTLA4_syn_CD8_APC)*syn_CD8_APC;
  // binding and unbinding of CTLA4 and CD86 in synapse
  Reaction_169: CTLA4_syn_CD8_APC + CD86_syn_CD8_APC -> CD86_CTLA4_syn_CD8_APC; (2*kon_CTLA4_CD86*CTLA4_syn_CD8_APC*CD86_syn_CD8_APC - koff_CTLA4_CD86*CD86_CTLA4_syn_CD8_APC)*syn_CD8_APC;
  // binding and unbinding of CD86-CTLA4 and CD86 in synapse
  Reaction_170: CD86_CTLA4_syn_CD8_APC + CD86_syn_CD8_APC -> CD86_CTLA4_CD86_syn_CD8_APC; (kon_CTLA4_CD86*CD86_CTLA4_syn_CD8_APC*CD86_syn_CD8_APC - 2*koff_CTLA4_CD86*CD86_CTLA4_CD86_syn_CD8_APC)*syn_CD8_APC;
  // binding and unbinding of CTLA4 to aCTLA4 on CD8 surface in synapse
  Reaction_171: CTLA4_syn_CD8_APC -> CTLA4_aCTLA4_syn_CD8_APC; (4*kon_CTLA4_aCTLA4*(CTLA4_syn_CD8_APC*aCTLA4_V_LN/gamma_LN_aCTLA4) - koff_CTLA4_aCTLA4*CTLA4_aCTLA4_syn_CD8_APC)*syn_CD8_APC;
  // binding and unbinding of CTLA4 to aCTLA4 on CD8 surface in synapse
  Reaction_172: CTLA4_aCTLA4_syn_CD8_APC + CTLA4_syn_CD8_APC -> CTLA4_aCTLA4_CTLA4_syn_CD8_APC; (2*Chi_CTLA4_aCTLA4*kon_CTLA4_aCTLA4*CTLA4_syn_CD8_APC*CTLA4_aCTLA4_syn_CD8_APC - 2*koff_CTLA4_aCTLA4*CTLA4_aCTLA4_CTLA4_syn_CD8_APC)*syn_CD8_APC;
  // self-association and dissociation of CD80 monomers in synapse
  Reaction_173: CD80m_syn_CD8_APC + CD80m_syn_CD8_APC -> CD80_syn_CD8_APC; (kon_CD80_CD80*CD80m_syn_CD8_APC*CD80m_syn_CD8_APC - koff_CD80_CD80*CD80_syn_CD8_APC)*syn_CD8_APC;
  // binding and unbinding of CD80 and PDL1 in synapse
  Reaction_174: CD80m_syn_CD8_APC + PDL1_syn_CD8_APC -> PDL1_CD80_syn_CD8_APC; (kon_CD80_PDL1*CD80m_syn_CD8_APC*PDL1_syn_CD8_APC - koff_CD80_PDL1*PDL1_CD80_syn_CD8_APC)*syn_CD8_APC;
  // binding and unbinding of PDL1-CD80 and CD28 in synapse
  Reaction_175: PDL1_CD80_syn_CD8_APC + CD28_syn_CD8_APC -> PDL1_CD80_CD28_syn_CD8_APC; (kon_CD28_CD80*PDL1_CD80_syn_CD8_APC*CD28_syn_CD8_APC - koff_CD28_CD80*PDL1_CD80_CD28_syn_CD8_APC)*syn_CD8_APC;
  // binding and unbinding of PDL1-CD80 and CTLA4 in synapse
  Reaction_176: PDL1_CD80_syn_CD8_APC + CTLA4_syn_CD8_APC -> PDL1_CD80_CTLA4_syn_CD8_APC; (2*kon_CTLA4_CD80*PDL1_CD80_syn_CD8_APC*CTLA4_syn_CD8_APC - koff_CTLA4_CD80*PDL1_CD80_CTLA4_syn_CD8_APC)*syn_CD8_APC;
  // binding and unbinding of PDL1 to aPDL1 on APC surface in synapse
  Reaction_177: TPDL1_syn_CD8_APC -> TPDL1_aPDL1_syn_CD8_APC; (2*kon_PDL1_aPDL1*(TPDL1_syn_CD8_APC*aPDL1_V_LN/gamma_LN_aPDL1) - koff_PDL1_aPDL1*TPDL1_aPDL1_syn_CD8_APC)*syn_CD8_APC;
  // binding and unbinding of PDL1 to PDL1-aPDL1 on APC surface in synapse
  Reaction_178: TPDL1_aPDL1_syn_CD8_APC + TPDL1_syn_CD8_APC -> TPDL1_aPDL1_TPDL1_syn_CD8_APC; (Chi_PDL1_aPDL1*kon_PDL1_aPDL1*TPDL1_syn_CD8_APC*TPDL1_aPDL1_syn_CD8_APC - 2*koff_PDL1_aPDL1*TPDL1_aPDL1_TPDL1_syn_CD8_APC)*syn_CD8_APC;
  // Naive CD4 activation to Th (antigen-dependent)
  Reaction_179: nCD4_V_LN => ; k_Th_act*H_APC_Th*H_P1*nCD4_V_LN;
  // Naive CD4 activation to Th (antigen-dependent, clonal expansion)
  Reaction_180: => aTh; k_Th_act*H_APC_Th*H_P1*nCD4_V_LN*n_CD4_clones;
  // aTh cell proliferation
  Reaction_181: aTh => ; k_CD4_pro/N_aTh*aTh;
  // aTh cell proliferation
  Reaction_182: => Th_V_LN; k_CD4_pro/N_aTh*2^N_aTh*aTh;
  // Differentiation between Treg and Th Cells
  Reaction_183: Th_V_T => Treg_V_T; k_Th_to_Treg*Th_V_T*H_TGFb*H_ArgI_Treg;
  // T cell death in the central compartment
  Reaction_184: Th_V_C => ; k_CD4_death*Th_V_C;
  // T cell death in the peripheral compartment
  Reaction_185: Th_V_P => ; k_CD4_death*Th_V_P;
  // T cell death in the lymph node compartment
  Reaction_186: Th_V_LN => ; k_CD4_death*Th_V_LN;
  // Th cell death in the tumor compartment (regular turnover, not exhaustion)
  Reaction_187: Th_V_T => ; k_CD4_death*Th_V_T;
  // Baseline Th exhaustion from chronic antigen exposure
  Reaction_188: Th_V_T => Th_exh; k_Th_basal_exh*Th_V_T*C_total/(C_total + K_C_exh + cell);
  // Th exhaustion driven by TGFβ (cell-specific EC50 via H_TGFb_Th_exh)
  Reaction_189: Th_V_T => Th_exh; k_TGFb_Th_exh*Th_V_T*H_TGFb_Th_exh;
  // Th clearance upon antigen clearance
  Reaction_190: Th_V_T => Th_exh; k_cell_clear*Th_V_T*(K_C2_recruit/(C_total^2 + K_C2_recruit));
  // T cell transport into the peripheral compartment
  Reaction_191: Th_V_C => Th_V_P; q_Treg_P_in*Th_V_C;
  // T cell transport out of the peripheral compartment
  Reaction_192: Th_V_P => Th_V_C; q_Treg_P_out*Th_V_P;
  // T cell transport into the tumor compartment (reduced by CXCL12-mediated exclusion)
  Reaction_193: Th_V_C => Th_V_T; q_Treg_T_in*V_T*Th_V_C*(C_total^2/(C_total^2 + K_C2_recruit))*(1 - H_CXCL12_Texcl);
  // T cell transport out of the lymph node compartment
  Reaction_194: Th_V_LN => Th_V_C; q_Treg_LN_out*Th_V_LN;
  // Tumor-local Th proliferation with CD8-scaled carrying capacity
  Reaction_195: => Th_V_T; k_Th_pro_tumor*Th_V_T*(1 - Th_V_T/(rho_Th_max*V_T*(1 + alpha_Th_cap*CD8_V_T/(CD8_V_T + CD8_50_Tcap)) + cell));
  // IL2 secretion from activated CD8 T cells (clone-specific, TCR-triggered)
  Reaction_196: => IL2; k_IL2_sec*aCD8;
  // IL2 secretion from activated Th cells (clone-specific, TCR-triggered)
  Reaction_197: => IL2; k_IL2_sec*aTh;
  // IFNg secretion from CD8 T cells in tumor (clone-specific effectors)
  Reaction_198: => IFNg; k_IFNg_Tsec*CD8_V_T;
  // IFNg secretion from Th cells in tumor (clone-specific effectors)
  Reaction_199: => IFNg; k_IFNg_Thsec*Th_V_T;
  // IL2 degradation
  Reaction_200: IL2 => ; k_IL2_deg*IL2*V_LN;
  // IL2 consumption by CD8 T cells
  Reaction_201: IL2 => ; w_IL2_CD8*k_IL2_cons*CD8_V_LN*IL2/(IL2_50 + IL2);
  // IL2 consumption by Tregs
  Reaction_202: IL2 => ; w_IL2_Treg*k_IL2_cons*Treg_V_LN*IL2/(IL2_50_Treg + IL2);
  // IFNg degradation in tumor
  Reaction_203: IFNg => ; k_IFNg_deg*IFNg*V_T;
  // Bioactive TGFb baseline production by PDAC cancer cells (scaled by f_active_TGFb).
  Reaction_204: => TGFb; k_TGFb_deg*(f_active_TGFb*TGFb_baseline - TGFb)*V_T;
  // Bioactive TGFb secretion by Tregs in tumor (scaled by f_active_TGFb).
  Reaction_205: => TGFb; f_active_TGFb*k_TGFb_Tsec*Treg_V_T;
  // Naive CD4 activation to Tfh (antigen-dependent)
  Reaction_206: nCD4_V_LN => ; k_Tfh_act*H_APC_Th*H_P1*nCD4_V_LN;
  // Naive CD4 activation to Tfh (antigen-dependent, clonal expansion)
  Reaction_207: => aTfh; k_Tfh_act*H_APC_Th*H_P1*nCD4_V_LN*n_CD4_clones;
  // aTfh cell proliferation
  Reaction_208: aTfh => ; k_CD4_pro/N_aTh*aTfh;
  // aTfh cell proliferation
  Reaction_209: => Tfh_V_LN; k_CD4_pro/N_aTh*2^N_aTh*aTfh;
  // Tfh death in the central compartment
  Reaction_210: Tfh_V_C => ; k_CD4_death*Tfh_V_C;
  // Tfh death in the peripheral compartment
  Reaction_211: Tfh_V_P => ; k_CD4_death*Tfh_V_P;
  // Tfh death in the lymph node compartment
  Reaction_212: Tfh_V_LN => ; k_CD4_death*Tfh_V_LN;
  // Tfh death in the tumor compartment
  Reaction_213: Tfh_V_T => ; k_CD4_death*Tfh_V_T;
  // Tfh clearance upon antigen clearance
  Reaction_214: Tfh_V_T => ; k_cell_clear*Tfh_V_T*(K_C2_recruit/(C_total^2 + K_C2_recruit));
  // Tfh transport into the peripheral compartment
  Reaction_215: Tfh_V_C => Tfh_V_P; q_Treg_P_in*Tfh_V_C;
  // Tfh transport out of the peripheral compartment
  Reaction_216: Tfh_V_P => Tfh_V_C; q_Treg_P_out*Tfh_V_P;
  // Tfh transport into the tumor compartment (reduced by CXCL12-mediated exclusion)
  Reaction_217: Tfh_V_C => Tfh_V_T; q_Treg_T_in*V_T*Tfh_V_C*(C_total^2/(C_total^2 + K_C2_recruit))*(1 - H_CXCL12_Texcl);
  // Tfh transport out of the lymph node compartment
  Reaction_218: Tfh_V_LN => Tfh_V_C; q_Treg_LN_out*Tfh_V_LN;
  // Marrow output of naive B cells to blood
  Reaction_219: => nB_V_C; k_nB_in;
  // Naive B cell death in the central compartment
  Reaction_220: nB_V_C => ; k_nTreg_death*nB_V_C;
  // Naive B cell death in the lymph node
  Reaction_221: nB_V_LN => ; k_nTreg_death*nB_V_LN;
  // Naive B cell entry into the lymph node
  Reaction_222: nB_V_C => nB_V_LN; q_nCD4_LN_in*nB_V_C;
  // Naive B cell exit from the lymph node
  Reaction_223: nB_V_LN => nB_V_C; q_nCD4_LN_out*nB_V_LN;
  // Naive B activation (antigen + Tfh help)
  Reaction_224: nB_V_LN => ; k_B_act*H_P1*(Tfh_V_LN/(Tfh_V_LN + Tfh_50_B))*nB_V_LN;
  // Naive B activation (antigen + Tfh help, clonal expansion)
  Reaction_225: => aB; k_B_act*H_P1*(Tfh_V_LN/(Tfh_V_LN + Tfh_50_B))*nB_V_LN*n_B_clones;
  // Activated B proliferation
  Reaction_226: aB => ; k_B_pro/N_aTh*aB;
  // Activated B proliferation (clonal burst)
  Reaction_227: => B_V_LN; k_B_pro/N_aTh*2^N_aTh*aB;
  // B cell death in the central compartment
  Reaction_228: B_V_C => ; k_B_death*B_V_C;
  // B cell death in the peripheral compartment
  Reaction_229: B_V_P => ; k_B_death*B_V_P;
  // B cell death in the lymph node
  Reaction_230: B_V_LN => ; k_B_death*B_V_LN;
  // B cell death in the tumor compartment
  Reaction_231: B_V_T => ; k_B_death*B_V_T;
  // Tumor-local B -> plasma differentiation
  Reaction_232: B_V_T => Plasma; k_B_to_plasma*B_V_T;
  // Plasma cell death in the tumor compartment
  Reaction_233: Plasma => ; k_plasma_death*Plasma;
  // Plasma clearance upon antigen clearance
  Reaction_234: Plasma => ; k_cell_clear*Plasma*(K_C2_recruit/(C_total^2 + K_C2_recruit));
  // B cell transport into the peripheral compartment
  Reaction_235: B_V_C => B_V_P; q_Treg_P_in*B_V_C;
  // B cell transport out of the peripheral compartment
  Reaction_236: B_V_P => B_V_C; q_Treg_P_out*B_V_P;
  // B cell transport into the tumor compartment
  Reaction_237: B_V_C => B_V_T; q_Treg_T_in*V_T*B_V_C*(C_total^2/(C_total^2 + K_C2_recruit));
  // B cell transport out of the lymph node
  Reaction_238: B_V_LN => B_V_C; q_Treg_LN_out*B_V_LN;
  // CCL2 secretion by MDSCs and cancer cells
  Reaction_239: => CCL2; k_CCL2_sec*C_total;
  // CCL2 degradation
  Reaction_240: CCL2 => ; k_CCL2_deg*CCL2*V_T;
  // Recruitment of MDSC to tumor (enhanced by IL-6)
  Reaction_241: => MDSC; k_MDSC_rec*V_T*(CCL2/(CCL2 + CCL2_50))*(1 + H_IL6_MDSC);
  // MDSC death in the tumor compartment
  Reaction_242: MDSC => ; k_MDSC_death*MDSC;
  // MDSC death upon tumor eradication
  Reaction_243: MDSC => ; k_cell_clear*MDSC*(K_C2_recruit/(C_total^2 + K_C2_recruit));
  // NO degradation
  Reaction_244: NO => ; k_NO_deg*NO*V_T;
  // ArgI degradation
  Reaction_245: ArgI => ; k_ArgI_deg*ArgI*V_T;
  // NO secretion from MDSC
  Reaction_246: => NO; k_NO_sec*MDSC;
  // ArgI secretion from MDSC
  Reaction_247: => ArgI; k_ArgI_sec*MDSC;
  // Intercompartmental distribution of nab-paclitaxel (V1<->V2, saturable)
  Reaction_248: NabP_V_1 -> NabP_V_2; Vmt/(NabP_V_1 + Kt)*NabP_V_1 - Vmt/(NabP_V_2 + Kt)*NabP_V_2;
  // Intercompartmental clearance of nab-paclitaxel (V1<->V3, linear)
  Reaction_249: NabP_V_1 -> NabP_V_3; Q2*NabP_V_1 - Q2*NabP_V_3;
  // Clearance of nab-paclitaxel from V1 (saturable)
  Reaction_250: NabP_V_1 => ; Vmcl/(NabP_V_1 + Kcl)*NabP_V_1;
  // Cancer cell death by nab-paclitaxel (Emax)
  Reaction_251: C1 => C_x; k_C_nabp*C1*(Ct_nabp/(Ct_nabp + IC50_nabp))*min(C_total, Kc_nabp)/C_total;
  // Resistant-clone (C2) death by nab-paclitaxel (Emax, IC50 x r_resist)
  Reaction_252: C2 => C_x; k_C_nabp*C2*(Ct_nabp/(Ct_nabp + IC50_nabp*r_resist))*min(C_total, Kc_nabp)/C_total;
  // Distribution of gem central->P1
  Reaction_253: gem_C_gem => gem_P1_gem; Q_gem_2/V_gem_1*gem_C_gem*C_gem;
  // Redistribution of gem P1->central
  Reaction_254: gem_P1_gem => gem_C_gem; Q_gem_2/V_gem_2*gem_P1_gem*P1_gem;
  // Linear clearance of gem from central
  Reaction_255: gem_C_gem => ; CL_gem/V_gem_1*gem_C_gem*C_gem;
  // Cancer cell kill by gem (gem, Emax)
  Reaction_256: C1 => C_x; k_kill_gem*C1*(Ct_gem/(Ct_gem + IC50_gem))*min(C_total, Kc_gem)/C_total;
  // Resistant-clone (C2) kill by gem (gem, Emax, IC50 x r_resist)
  Reaction_257: C2 => C_x; k_kill_gem*C2*(Ct_gem/(Ct_gem + IC50_gem*r_resist))*min(C_total, Kc_gem)/C_total;
  // Nonlinear (Michaelis-Menten) elimination of fu5 from central
  Reaction_258: fu5 => ; Vmax_fu5/V_fu5_1*(fu5/(Km_fu5 + fu5))*C_fu5;
  // Cancer cell kill by fu5 (fu5, Emax)
  Reaction_259: C1 => C_x; k_kill_fu5*C1*(Ct_fu5/(Ct_fu5 + IC50_fu5))*min(C_total, Kc_fu5)/C_total;
  // Resistant-clone (C2) kill by fu5 (fu5, Emax, IC50 x r_resist)
  Reaction_260: C2 => C_x; k_kill_fu5*C2*(Ct_fu5/(Ct_fu5 + IC50_fu5*r_resist))*min(C_total, Kc_fu5)/C_total;
  // Distribution of oxa central->P1
  Reaction_261: oxa_C_oxa => oxa_P1_oxa; Q_oxa_2/V_oxa_1*oxa_C_oxa*C_oxa;
  // Redistribution of oxa P1->central
  Reaction_262: oxa_P1_oxa => oxa_C_oxa; Q_oxa_2/V_oxa_2*oxa_P1_oxa*P1_oxa;
  // Distribution of oxa central->P2
  Reaction_263: oxa_C_oxa => oxa_P2_oxa; Q_oxa_3/V_oxa_1*oxa_C_oxa*C_oxa;
  // Redistribution of oxa P2->central
  Reaction_264: oxa_P2_oxa => oxa_C_oxa; Q_oxa_3/V_oxa_3*oxa_P2_oxa*P2_oxa;
  // Linear clearance of oxa from central
  Reaction_265: oxa_C_oxa => ; CL_oxa/V_oxa_1*oxa_C_oxa*C_oxa;
  // Cancer cell kill by oxa (oxa, Emax)
  Reaction_266: C1 => C_x; k_kill_oxa*C1*(Ct_oxa/(Ct_oxa + IC50_oxa))*min(C_total, Kc_oxa)/C_total;
  // Resistant-clone (C2) kill by oxa (oxa, Emax, IC50 x r_resist)
  Reaction_267: C2 => C_x; k_kill_oxa*C2*(Ct_oxa/(Ct_oxa + IC50_oxa*r_resist))*min(C_total, Kc_oxa)/C_total;
  // Distribution of iri central->P1
  Reaction_268: iri_C_iri => iri_P1_iri; Q_iri_2/V_iri_1*iri_C_iri*C_iri;
  // Redistribution of iri P1->central
  Reaction_269: iri_P1_iri => iri_C_iri; Q_iri_2/V_iri_2*iri_P1_iri*P1_iri;
  // Linear clearance of iri from central
  Reaction_270: iri_C_iri => ; CL_iri/V_iri_1*iri_C_iri*C_iri;
  // Formation of sn38 from iri (fraction Fm of parent clearance)
  Reaction_271: => sn38; Fm_iri*MWr_sn38*CL_iri*iri_C_iri/V_sn38_1*C_sn38;
  // Linear clearance of metabolite sn38
  Reaction_272: sn38 => ; CL_sn38/V_sn38_1*sn38*C_sn38;
  // Cancer cell kill by iri (sn38, Emax)
  Reaction_273: C1 => C_x; k_kill_iri*C1*(Ct_iri/(Ct_iri + IC50_iri))*min(C_total, Kc_iri)/C_total;
  // Resistant-clone (C2) kill by iri (sn38, Emax, IC50 x r_resist)
  Reaction_274: C2 => C_x; k_kill_iri*C2*(Ct_iri/(Ct_iri + IC50_iri*r_resist))*min(C_total, Kc_iri)/C_total;
  // Secretion of angiogenic factor by macrophage in tumor
  Reaction_275: => VEGF; k_vas_Msec*Mac_M2;
  // Recruitment of pro-inflammatory M1 macrophage to tumor
  Reaction_276: => Mac_M1; k_Mac_rec*V_T*(CCL2/(CCL2 + CCL2_50));
  // Macrophage death upon tumor eradication
  Reaction_277: Mac_M1 => ; k_cell_clear*Mac_M1*(K_C2_recruit/(C_total^2 + K_C2_recruit));
  // Macrophage death upon tumor eradication
  Reaction_278: Mac_M2 => ; k_cell_clear*Mac_M2*(K_C2_recruit/(C_total^2 + K_C2_recruit));
  // Death of macrophage in tumor
  Reaction_279: Mac_M1 => ; k_Mac_death*Mac_M1;
  // Death of macrophage in tumor
  Reaction_280: Mac_M2 => ; k_Mac_death*Mac_M2;
  // Secretion of IL-12 by mature cDC1 in the tumor
  Reaction_281: => IL12; k_IL12_sec*mcDC1_V_T;
  // Secretion of IL-12 by macrophage in tumor
  Reaction_282: => IL12; k_IL12_Msec*Mac_M1;
  // Degradation of IL-12 in tumor
  Reaction_283: IL12 => ; k_IL12_deg*IL12*V_T;
  // Bioactive TGFb secretion by M2 macrophages (scaled by f_active_TGFb).
  Reaction_284: => TGFb; f_active_TGFb*k_TGFb_Msec*Mac_M2;
  // Secretion of IL-10 by macrophage in tumor
  Reaction_285: => IL10; k_IL10_sec*Mac_M2;
  // Degradation of IL-10 in tumor
  Reaction_286: IL10 => ; k_IL10_deg*IL10*V_T;
  // M1 to M2 macrophage polarization (averaged Hill logic over TGFb, IL-10, IL-6 — max rate at k_M2_pol when all three are saturated).
  Reaction_287: Mac_M1 => Mac_M2; k_M2_pol*Mac_M1*(TGFb/(TGFb + TGFb_50) + IL10/(IL10 + IL10_50) + H_IL6_M2)/3;
  // M2 to M1 macrophage polarization in tumor (IL-12 Hill + IFNg linear sub-saturating - OR logic, max rate capped at k_M1_pol)
  Reaction_288: Mac_M2 => Mac_M1; k_M1_pol*Mac_M2*(1 - (1 - IL12/(IL12 + IL12_50))*max(0, 1 - k_IFNg_response*IFNg));
  // Translocation of PDL1 between cell surface and cytoplasm
  Reaction_289: => PDL1_syn_M_C; k_out_PDL1*IFNg/(IFNg + IFNg_50_ind)*(1 - PDL1_total/(C1_PDL1_base*r_PDL1_IFNg/A_cell));
  // Translocation of PDL2 between cell surface and cytoplasm
  Reaction_290: => PDL2_syn_M_C; k_out_PDL1*r_PDL2C1*IFNg/(IFNg + IFNg_50_ind)*(1 - PDL2_total/(C1_PDL1_base*r_PDL1_IFNg/A_cell*r_PDL2C1));
  // Translocation of PDL1 between cell surface and cytoplasm
  Reaction_291: => PDL1_syn_M_C; k_in_PDL1*(C1_PDL1_base/A_cell - PDL1_total)*syn_M_C;
  // Translocation of PDL2 between cell surface and cytoplasm
  Reaction_292: => PDL2_syn_M_C; k_in_PDL1*(C1_PDL1_base/A_cell*r_PDL2C1 - PDL2_total)*syn_M_C;
  // binding and unbinding of CD47-SIRPa in synapse
  Reaction_293: CD47 + SIRPa -> CD47_SIRPa; (kon_CD47_SIRPa*CD47*SIRPa - koff_CD47_SIRPa*CD47_SIRPa)*syn_M_C;
  // binding and unbinding of PD1 PDL1 in synapse
  Reaction_294: PD1_syn_M_C + PDL1_syn_M_C -> PD1_PDL1_syn_M_C; (kon_PD1_PDL1*PD1_syn_M_C*PDL1_syn_M_C - koff_PD1_PDL1*PD1_PDL1_syn_M_C)*syn_M_C;
  // binding and unbinding of PD1 PDL2 in synapse
  Reaction_295: PD1_syn_M_C + PDL2_syn_M_C -> PD1_PDL2_syn_M_C; (kon_PD1_PDL2*PD1_syn_M_C*PDL2_syn_M_C - koff_PD1_PDL2*PD1_PDL2_syn_M_C)*syn_M_C;
  // binding and unbinding of PD1 to aPD1 on macrophage surface in synapse
  Reaction_296: PD1_syn_M_C -> PD1_aPD1_syn_M_C; (2*kon_PD1_aPD1*(PD1_syn_M_C*aPD1_V_T/gamma_T_aPD1) - koff_PD1_aPD1*PD1_aPD1_syn_M_C)*syn_M_C;
  // binding and unbinding of PD1 to PD1-aPD1 on macrophage surface in synapse
  Reaction_297: PD1_aPD1_syn_M_C + PD1_syn_M_C -> PD1_aPD1_PD1_syn_M_C; (Chi_PD1_aPD1*kon_PD1_aPD1*PD1_syn_M_C*PD1_aPD1_syn_M_C - 2*koff_PD1_aPD1*PD1_aPD1_PD1_syn_M_C)*syn_M_C;
  // binding and unbinding of PDL1 to aPDL1 on C1 surface in synapse
  Reaction_298: PDL1_syn_M_C -> PDL1_aPDL1_syn_M_C; (2*kon_PDL1_aPDL1*(PDL1_syn_M_C*aPDL1_V_T/gamma_T_aPDL1) - koff_PDL1_aPDL1*PDL1_aPDL1_syn_M_C)*syn_M_C;
  // binding and unbinding of PDL1 to PDL1-aPDL1 on cancer cell surface in synapse
  Reaction_299: PDL1_aPDL1_syn_M_C + PDL1_syn_M_C -> PDL1_aPDL1_PDL1_syn_M_C; (Chi_PDL1_aPDL1*kon_PDL1_aPDL1*PDL1_syn_M_C*PDL1_aPDL1_syn_M_C - 2*koff_PDL1_aPDL1*PDL1_aPDL1_PDL1_syn_M_C)*syn_M_C;
  // self-association and dissociation of CD80 monomers in synapse
  Reaction_300: CD80m_syn_M_C + CD80m_syn_M_C -> CD80_syn_M_C; (kon_CD80_CD80*CD80m_syn_M_C*CD80m_syn_M_C - koff_CD80_CD80*CD80_syn_M_C)*syn_M_C;
  // binding and unbinding of CD80 and PDL1 in synapse
  Reaction_301: CD80m_syn_M_C + PDL1_syn_M_C -> PDL1_CD80_syn_M_C; (kon_CD80_PDL1*CD80m_syn_M_C*PDL1_syn_M_C - koff_CD80_PDL1*PDL1_CD80_syn_M_C)*syn_M_C;
  // M1 macrophage-mediated killing of cancer cell
  Reaction_302: C1 => C_x; k_M1_phago*C1*Mac_M1/(Mac_M1 + K_M1_phago*C_total + cell)*(1 - H_Mac_C)*(1 - H_IL10_phago);
  // Bioactive TGFb secretion by myCAFs (scaled by f_active_TGFb).
  Reaction_303: => TGFb; f_active_TGFb*k_TGFb_sec_myCAF*myCAF;
  // Encounter resident PSCs as tumor expands into pancreas
  Reaction_304: => qPSC; k_CAF_encounter*V_T*((k_CAF_const - qPSC/V_T)/k_CAF_const);
  // PSC activation to myCAF (TGFb-driven, Biffi 2019)
  Reaction_305: qPSC => myCAF; k_PSC_to_myCAF*qPSC*(TGFb/(TGFb_50_CAF_act + TGFb));
  // PSC activation to iCAF (IL-1-driven + IL-6 feedback)
  Reaction_306: qPSC => iCAF; k_PSC_to_iCAF*qPSC*H_IL1_eff*(1 + f_IL6_iCAF*H_IL6_iCAF);
  // PSC activation to apCAF (constitutive low rate, Elyada 2019)
  Reaction_307: qPSC => apCAF; k_PSC_to_apCAF*qPSC;
  // iCAF->myCAF interconversion (TGFb-driven plasticity)
  Reaction_308: iCAF => myCAF; k_iCAF_to_myCAF*iCAF*(TGFb/(TGFb_50_CAF_act + TGFb));
  // myCAF->iCAF interconversion (IL-1-driven + IL-6 feedback)
  Reaction_309: myCAF => iCAF; k_myCAF_to_iCAF*myCAF*H_IL1_eff*(1 + f_IL6_iCAF*H_IL6_iCAF);
  // myCAF proliferation: logistic on subtype-partitioned cap (stick-breaking simplex)
  Reaction_310: => myCAF; k_myCAF_prolif*myCAF*(1 - myCAF/((1 - f_apCAF_of_total)*(1 - f_iCAF_of_non_apCAF)*(f_stroma_max*C_total + K_stiff_niche*H_stiff_fib) + cell));
  // iCAF proliferation: logistic on subtype-partitioned cap (stick-breaking simplex)
  Reaction_311: => iCAF; k_iCAF_prolif*iCAF*(1 - iCAF/((1 - f_apCAF_of_total)*f_iCAF_of_non_apCAF*(f_stroma_max*C_total + K_stiff_niche*H_stiff_fib) + cell));
  // apCAF proliferation: logistic on subtype-partitioned cap (stick-breaking simplex; Elyada 2019)
  Reaction_312: => apCAF; k_apCAF_prolif*apCAF*(1 - apCAF/(f_apCAF_of_total*(f_stroma_max*C_total + K_stiff_niche*H_stiff_fib) + cell));
  // qPSC clearance upon tumor eradication
  Reaction_313: qPSC => ; k_cell_clear*qPSC*(K_C2_recruit/(C_total^2 + K_C2_recruit));
  // iCAF clearance upon tumor eradication (suppressed by stiff ECM niche)
  Reaction_314: iCAF => ; k_cell_clear*iCAF*(K_C2_recruit/(C_total^2 + K_C2_recruit))*(1 - H_stiff_fib);
  // myCAF clearance upon tumor eradication (suppressed by stiff ECM niche)
  Reaction_315: myCAF => ; k_cell_clear*myCAF*(K_C2_recruit/(C_total^2 + K_C2_recruit))*(1 - H_stiff_fib);
  // apCAF clearance upon tumor eradication (suppressed by stiff ECM niche)
  Reaction_316: apCAF => ; k_cell_clear*apCAF*(K_C2_recruit/(C_total^2 + K_C2_recruit))*(1 - H_stiff_fib);
  // Constitutive death of quiescent PSCs
  Reaction_317: qPSC => ; k_qpsc_death*qPSC;
  // Constitutive death of iCAFs
  Reaction_318: iCAF => ; k_iCAF_death*iCAF;
  // Constitutive death of myCAFs
  Reaction_319: myCAF => ; k_myCAF_death*myCAF;
  // Constitutive death of apCAFs
  Reaction_320: apCAF => ; k_apCAF_death*apCAF;
  // Collagen secretion by myCAFs ((1-phi)^2 cap, f_col_basal + (1-f_col_basal)*H_TGFb_col)
  Reaction_321: => collagen; k_col_myCAF_sec*(1 - phi_collagen)^2*myCAF*(f_col_basal + (1 - f_col_basal)*TGFb/(TGFb_50_col_sec + TGFb));
  // Collagen degradation: constitutive turnover + M2 MMP activity gated by f_nascent (LOX-crosslinking shield)
  Reaction_322: collagen => ; (k_col_deg + k_MMP_M2*Mac_M2/V_T*f_nascent)*collagen;
  // CXCL12 secretion by iCAFs (T cell exclusion, Elyada 2019, Ogawa 2021)
  Reaction_323: => CXCL12; k_CXCL12_sec_iCAF*iCAF;
  // CXCL12 secretion by PDAC tumor cells (Feig et al. 2013)
  Reaction_324: => CXCL12; k_CXCL12_sec_cancer*C_total;
  // CXCL12 degradation in tumor
  Reaction_325: CXCL12 => ; k_CXCL12_deg*CXCL12*V_T;
  // IL-6 secretion by iCAFs (drives MDSC recruitment and M2 polarization)
  Reaction_326: => IL6; k_IL6_sec_iCAF*iCAF;
  // IL-6 degradation in tumor
  Reaction_327: IL6 => ; k_IL6_deg*IL6*V_T;
  // IL-1alpha secretion by cancer cells
  Reaction_328: => IL1; k_IL1_sec*C_total;
  // IL-1alpha degradation in tumor
  Reaction_329: IL1 => ; k_IL1_deg*IL1*V_T;
  // CCL5 secretion by iCAFs (inflammatory chemokine, Treg recruitment)
  Reaction_330: => CCL5; k_CCL5_sec_iCAF*iCAF;
  // Antigen sequestration by apCAFs (competes with professional APC uptake, Elyada 2019)
  Reaction_331: P1_V_T => ; k_P1_up_apCAF*apCAF*P1_V_T*V_T;
  // Tolerogenic Th->Treg conversion by apCAFs (antigen-dependent, Elyada 2019)
  Reaction_332: Th_V_T => Treg_V_T; k_apCAF_Treg*Th_V_T*(apCAF/(apCAF + K_apCAF_Treg))*H_P1_apCAF;
  // Angiogenic factor secretion by myCAFs (complements M2 macrophage secretion)
  Reaction_333: => VEGF; k_vas_myCAF_sec*myCAF;
  // GVAX cell clearance at injection site
  GVAX_clearance_ID: GVAX_cells => ; k_GVAX_clearance*GVAX_cells;
  // GM-CSF production by GVAX cells at injection site
  GMCSF_production_ID: => GMCSF; k_GMCSF_prod*GVAX_cells*V_ID;
  // GM-CSF degradation at injection site
  GMCSF_degradation_ID: GMCSF => ; k_GMCSF_deg*GMCSF;
  GVAX_antigen_release_ID: => P1_GVAX; y_Ag_per_cell*k_GVAX_clearance*GVAX_cells;
  P1_degradation_ID: P1_GVAX => ; k_P1_deg_ID*P1_GVAX;
  APC_recruitment_ID: => APC; (k_APC_recruit0 + k_APC_recruit_ID*H_GMCSF_ID)*K_APC_ID/(K_APC_ID + APC + mAPC);
  // APC maturation with antigen uptake at injection site
  APC_maturation_ID: APC => mAPC; J_mature_ID;
  // Antigen consumption tied to APC maturation events
  P1_consumption_ID: P1_GVAX => ; sigma_P1_per_mAPC*J_mature_ID;
  // APC death at injection site
  APC_death_ID: APC => ; k_APC_death_ID*APC;
  mAPC_death_ID: mAPC => ; k_mAPC_death_ID*mAPC;
  mAPC_migration_ID_LN: mAPC => mcDC2_V_LN; k_APC_mig_ID_LN*mAPC/(1 + mcDC2_V_LN/K_APC_mig);
  // Antigen transfer from GVAX-derived mcDC2 to LN-resident cDC1 (Ferris 2022)
  cDC1_Ag_transfer_LN: cDC1_V_LN => mcDC1_V_LN; k_cDC1_Ag_transfer*cDC1_V_LN*mcDC2_V_LN;
  // Cyclophosphamide clearance (t1/2 ~12-24 hours)
  Cy_degradation: Cy => ; k_Cy_clear*Cy;
  // Selective Treg depletion by low-dose cyclophosphamide
  Cy_Treg_depletion: Treg_V_T => ; k_Cy_Treg_deplete*Treg_V_T*(Cy/(Cy_50_Treg + Cy));
  // Acquisition of chemo-resistance (C1->C2), selected by aggregate drug effect E_chemo
  Reaction_348: C1 => C2; k_resist*C1*E_chemo;
  // CA19-9 secretion by live cancer cells (clone-weighted C1 + f_ca199_C2*C2). Damage suppression applies to the SENSITIVE clone ONLY: sec = k_ca199_sec * (C1/(1 + k_sec_suppress*C_dmg/cell) + f_ca199_C2*C2). The resistant clone escapes it, on the same warrant that gives it an r_resist-fold higher IC50 - a clone tolerant enough to survive chemotherapy is not the clone being driven into therapy-induced senescence, and CA19-9 is a differentiation antigen, so the shedding change tracks the damage rather than the drug. Before 2026-07-29 the 1/(1+k*D) factor multiplied BOTH clone terms, which made the marker un-reboundable: therapy runs continuously, so damage never clears, so the C2 sweep could not show up in CA19-9. Ablation measured that directly - removing suppression GAINED rebounds (38.8% -> 45.8%, +19 draws net) while removing resistance LOST them (38.8% -> 6.2%, -85), i.e. suppression was masking the mechanism that produces rebound rather than competing with it. See results/2026-07-29_resistance/.
  Reaction_349: => CA199; k_ca199_sec*(C1/(1 + k_sec_suppress*(C_dmg/cell)) + f_ca199_C2*C2);
  // CA19-9 release from the dying-cell pool (chemotherapy lysis spike)
  Reaction_350: => CA199; k_ca199_shed*C_x;
  // CA19-9 serum elimination (first order)
  Reaction_351: CA199 => ; k_ca199_clear*CA199*V_C;
  // Chemo damage accumulation, driven by aggregate drug effect
  Reaction_dmg_acc: => C_dmg; k_dmg_acc*E_chemo*cell;
  // Damage repair / reversal (first order)
  Reaction_dmg_rep: C_dmg => ; k_dmg_rep*C_dmg;

  // Events:
  Event_1: at (C_total < 0.5*cell): K = 0.01*cell;
  Event_2: at (C1 < 0.5*cell): C1 = 0.01*cell;
  Event_3: at (C2 < 0.5*cell): C2 = 0.01*cell;

  // Unit definitions:
  unit MWBUILTINUNIT_liter = metre^3 * 1e-3 dimensionless;
  unit MWBUILTINPREFIX_milli_MWBUILTINUNIT_liter = metre^3 * 1e-6 dimensionless; MWBUILTINPREFIX_milli_MWBUILTINUNIT_liter is "milliliter";
  unit MWDERIVEDUNIT_millimeter___3 = metre^3 * 1e-9 dimensionless; MWDERIVEDUNIT_millimeter___3 is "millimeter^3";
  unit MWDERIVEDUNIT_micrometer___2 = metre^2 * 1e-12 dimensionless; MWDERIVEDUNIT_micrometer___2 is "micrometer^2";
  unit MWUSERUNIT_cell = 1.660539e-24 mole;
  unit MWBUILTINPREFIX_nano_MWBUILTINUNIT_molarity = mole * 1e-6 dimensionless / metre^3; MWBUILTINPREFIX_nano_MWBUILTINUNIT_molarity is "nanomolarity";
  unit MWDERIVEDUNIT_nanomolarity_liter = 1e-9 mole; MWDERIVEDUNIT_nanomolarity_liter is "(nanomolarity)*(liter)";
  unit MWBUILTINPREFIX_milli_MWBUILTINUNIT_gram = 1e-3 gram; MWBUILTINPREFIX_milli_MWBUILTINUNIT_gram is "milligram";
  unit MWDERIVEDUNIT_picogram__milliliter = gram * 1e-6 dimensionless / metre^3; MWDERIVEDUNIT_picogram__milliliter is "picogram/milliliter";
  unit MWDERIVEDUNIT_picogram__milliliter_liter = 1e-9 gram; MWDERIVEDUNIT_picogram__milliliter_liter is "(picogram/milliliter)*(liter)";
  unit MWDERIVEDUNIT_picogram__milliliter_milliliter = 1e-12 gram; MWDERIVEDUNIT_picogram__milliliter_milliliter is "(picogram/milliliter)*(milliliter)";
  unit MWDERIVEDUNIT_nanomolarity_milliliter = 1e-12 mole; MWDERIVEDUNIT_nanomolarity_milliliter is "(nanomolarity)*(milliliter)";
  unit MWBUILTINUNIT_molarity = mole * 1000 dimensionless / metre^3;
  unit MWDERIVEDUNIT_molarity_milliliter = 1e-3 mole; MWDERIVEDUNIT_molarity_milliliter is "(molarity)*(milliliter)";
  unit MWDERIVEDUNIT_nanomolarity_millimeter___3 = 1e-15 mole; MWDERIVEDUNIT_nanomolarity_millimeter___3 is "(nanomolarity)*(millimeter^3)";
  unit MWDERIVEDUNIT_molarity_litre = mole; MWDERIVEDUNIT_molarity_litre is "(molarity)*(litre)";
  unit MWDERIVEDUNIT_molecule__micrometer___2 = mole * 1.660539e-12 dimensionless / metre^2; MWDERIVEDUNIT_molecule__micrometer___2 is "molecule/micrometer^2";
  unit MWDERIVEDUNIT_molecule__micrometer___2_micrometer___2 = 1.660539e-24 mole; MWDERIVEDUNIT_molecule__micrometer___2_micrometer___2 is "(molecule/micrometer^2)*(micrometer^2)";
  unit MWDERIVEDUNIT_nanogram__milliliter = gram * 1e-3 dimensionless / metre^3; MWDERIVEDUNIT_nanogram__milliliter is "nanogram/milliliter";
  unit MWDERIVEDUNIT_nanogram__milliliter_liter = 1e-6 gram; MWDERIVEDUNIT_nanogram__milliliter_liter is "(nanogram/milliliter)*(liter)";
  unit MWDERIVEDUNIT_milligram__liter = gram * dimensionless / metre^3; MWDERIVEDUNIT_milligram__liter is "milligram/liter";
  unit MWDERIVEDUNIT_milligram__liter_liter = 1e-3 gram; MWDERIVEDUNIT_milligram__liter_liter is "(milligram/liter)*(liter)";
  unit MWBUILTINPREFIX_nano_MWBUILTINUNIT_mole = 1e-9 mole; MWBUILTINPREFIX_nano_MWBUILTINUNIT_mole is "nanomole";
  unit MWDERIVEDUNIT_1__day = 1.157407e-5 dimensionless / second; MWDERIVEDUNIT_1__day is "1/day";
  unit MWBUILTINUNIT_day = 86400 second;
  unit MWBUILTINPREFIX_micro_MWBUILTINUNIT_meter = 1e-6 metre; MWBUILTINPREFIX_micro_MWBUILTINUNIT_meter is "micrometer";
  unit MWDERIVEDUNIT_micrometer___3__cell = metre^3 * 602214.2 dimensionless / mole; MWDERIVEDUNIT_micrometer___3__cell is "micrometer^3/cell";
  unit MWDERIVEDUNIT_cell__day = mole * 1.92192e-29 dimensionless / second; MWDERIVEDUNIT_cell__day is "cell/day";
  unit MWBUILTINPREFIX_centi_MWBUILTINUNIT_meter = 0.01 metre; MWBUILTINPREFIX_centi_MWBUILTINUNIT_meter is "centimeter";
  unit MWDERIVEDUNIT_picogram__cell__day = gram * 6970072 dimensionless / (mole * second); MWDERIVEDUNIT_picogram__cell__day is "picogram/cell/day";
  unit MWDERIVEDUNIT_cell__milliliter = mole * 1.660539e-18 dimensionless / metre^3; MWDERIVEDUNIT_cell__milliliter is "cell/milliliter";
  unit MWDERIVEDUNIT_1__minute = 0.01666667 dimensionless / second; MWDERIVEDUNIT_1__minute is "1/minute";
  unit MWDERIVEDUNIT_1__centimeter___3_minute = 16666.67 dimensionless / (metre^3 * second); MWDERIVEDUNIT_1__centimeter___3_minute is "1/(centimeter^3*minute)";
  unit MWDERIVEDUNIT_nanomole__cell__day = 6.970072e9 dimensionless / second; MWDERIVEDUNIT_nanomole__cell__day is "nanomole/cell/day";
  unit MWDERIVEDUNIT_1__day_cell = 6.970072e18 dimensionless / (mole * second); MWDERIVEDUNIT_1__day_cell is "1/(day*cell)";
  unit MWDERIVEDUNIT_millimeter___3__day = metre^3 * 1.157407e-14 dimensionless / second; MWDERIVEDUNIT_millimeter___3__day is "millimeter^3/day";
  unit MWDERIVEDUNIT_1__day__cell = 6.970072e18 dimensionless / (mole * second); MWDERIVEDUNIT_1__day__cell is "1/day/cell";
  unit MWDERIVEDUNIT_1__day__molarity = metre^3 * 1.157407e-8 dimensionless / (mole * second); MWDERIVEDUNIT_1__day__molarity is "1/day/molarity";
  unit MWDERIVEDUNIT_mole__cell = 6.022142e23 dimensionless; MWDERIVEDUNIT_mole__cell is "mole/cell";
  unit MWDERIVEDUNIT_1__second_molecule__micrometer___2 = metre^2 * 6.022142e11 dimensionless / (mole * second); MWDERIVEDUNIT_1__second_molecule__micrometer___2 is "1/(second*molecule/micrometer^2)";
  unit MWDERIVEDUNIT_1__second = dimensionless / second; MWDERIVEDUNIT_1__second is "1/second";
  unit MWDERIVEDUNIT_liter__second = metre^3 * 1e-3 dimensionless / second; MWDERIVEDUNIT_liter__second is "liter/second";
  unit MWDERIVEDUNIT_milliliter__second = metre^3 * 1e-6 dimensionless / second; MWDERIVEDUNIT_milliliter__second is "milliliter/second";
  unit MWDERIVEDUNIT_liter__day = metre^3 * 1.157407e-8 dimensionless / second; MWDERIVEDUNIT_liter__day is "liter/day";
  unit MWDERIVEDUNIT_nanomole__day = mole * 1.157407e-14 dimensionless / second; MWDERIVEDUNIT_nanomole__day is "nanomole/day";
  unit MWDERIVEDUNIT_nanomole__liter = mole * 1e-6 dimensionless / metre^3; MWDERIVEDUNIT_nanomole__liter is "nanomole/liter";
  unit MWDERIVEDUNIT_1__micromolarity_nanometer_second = metre^2 * 1e12 dimensionless / (mole * second); MWDERIVEDUNIT_1__micromolarity_nanometer_second is "1/(micromolarity*nanometer*second)";
  unit MWDERIVEDUNIT_molecule__day = mole * 1.92192e-29 dimensionless / second; MWDERIVEDUNIT_molecule__day is "molecule/day";
  unit MWDERIVEDUNIT_1__molarity_second = metre^3 * 1e-3 dimensionless / (mole * second); MWDERIVEDUNIT_1__molarity_second is "1/(molarity*second)";
  unit MWDERIVEDUNIT_1__nanometer = 1e9 dimensionless / metre; MWDERIVEDUNIT_1__nanometer is "1/nanometer";
  unit MWBUILTINUNIT_molecule = 1.660539e-24 mole;
  unit MWDERIVEDUNIT_cell___2 = mole^2 * 2.757389e-48 dimensionless; MWDERIVEDUNIT_cell___2 is "cell^2";
  unit MWDERIVEDUNIT_nanomole__cell__hour = 1.672817e11 dimensionless / second; MWDERIVEDUNIT_nanomole__cell__hour is "nanomole/cell/hour";
  unit MWBUILTINPREFIX_pico_MWBUILTINUNIT_molarity = mole * 1e-9 dimensionless / metre^3; MWBUILTINPREFIX_pico_MWBUILTINUNIT_molarity is "picomolarity";
  unit MWDERIVEDUNIT_1__hour = 2.777778e-4 dimensionless / second; MWDERIVEDUNIT_1__hour is "1/hour";
  unit MWDERIVEDUNIT_cell__milliliter_day = mole * 1.92192e-23 dimensionless / (metre^3 * second); MWDERIVEDUNIT_cell__milliliter_day is "cell/(milliliter*day)";
  unit MWDERIVEDUNIT_microgram__hour = gram * 2.777778e-10 dimensionless / second; MWDERIVEDUNIT_microgram__hour is "microgram/hour";
  unit MWDERIVEDUNIT_microgram__liter = gram * 1e-3 dimensionless / metre^3; MWDERIVEDUNIT_microgram__liter is "microgram/liter";
  unit MWDERIVEDUNIT_liter__hour = metre^3 * 2.777778e-7 dimensionless / second; MWDERIVEDUNIT_liter__hour is "liter/hour";
  unit MWDERIVEDUNIT_meter___2 = metre^2 * dimensionless; MWDERIVEDUNIT_meter___2 is "meter^2";
  unit MWDERIVEDUNIT_gram__mole = gram * dimensionless / mole; MWDERIVEDUNIT_gram__mole is "gram/mole";
  unit MWDERIVEDUNIT_milligram__hour = gram * 2.777778e-7 dimensionless / second; MWDERIVEDUNIT_milligram__hour is "milligram/hour";
  unit MWDERIVEDUNIT_1__picomolarity = metre^3 * 1e9 dimensionless / mole; MWDERIVEDUNIT_1__picomolarity is "1/picomolarity";
  unit MWDERIVEDUNIT_1__micromolarity_minute_nanometer = metre^2 * 1.666667e10 dimensionless / (mole * second); MWDERIVEDUNIT_1__micromolarity_minute_nanometer is "1/(micromolarity*minute*nanometer)";
  unit MWDERIVEDUNIT_milligram__cell_day = gram * 6.970072e15 dimensionless / (mole * second); MWDERIVEDUNIT_milligram__cell_day is "milligram/(cell*day)";
  unit MWDERIVEDUNIT_milliliter__cell_day = metre^3 * 6.970072e12 dimensionless / (mole * second); MWDERIVEDUNIT_milliliter__cell_day is "milliliter/(cell*day)";
  unit MWDERIVEDUNIT_gram__milliliter = gram * 1000000 dimensionless / metre^3; MWDERIVEDUNIT_gram__milliliter is "gram/milliliter";
  unit MWDERIVEDUNIT_nanomolarity_liter__cell_day = 6.970072e9 dimensionless / second; MWDERIVEDUNIT_nanomolarity_liter__cell_day is "nanomolarity*liter/(cell*day)";
  unit MWDERIVEDUNIT_nanomole__cell_day = 6.970072e9 dimensionless / second; MWDERIVEDUNIT_nanomole__cell_day is "nanomole/(cell*day)";
  unit MWDERIVEDUNIT_picogram__cell_day = gram * 6970072 dimensionless / (mole * second); MWDERIVEDUNIT_picogram__cell_day is "picogram/(cell*day)";
  unit MWDERIVEDUNIT_1__cell_day = 6.970072e18 dimensionless / (mole * second); MWDERIVEDUNIT_1__cell_day is "1/(cell*day)";
  unit MWDERIVEDUNIT_nanomolarity__cell__day = 6.970072e12 dimensionless / (metre^3 * second); MWDERIVEDUNIT_nanomolarity__cell__day is "nanomolarity/cell/day";
  unit MWDERIVEDUNIT_nanomole__cell = 6.022142e14 dimensionless; MWDERIVEDUNIT_nanomole__cell is "nanomole/cell";
end
